simulations untitled: version=9
  simulation Fiesta1997
    clock
      start_date = 1/03/1997  # Select the start date of the simulation
      end_date = 10/11/1997  # Select the end date of the simulation
    summaryfile: filename=Fiesta1997.sum
    metfile met: filename=C:\development\apsim\Broccoli\Validation\DPI9798.met
    area Planting1
      registrations global
      manager
        rule Sowing fertiliser
          condition [modulename].[eventname]=[fertmodule] apply amount = [fert_amount_sow] (kg/ha), depth = 50 (mm), type = [fert_type_sow]
          category When should fertiliser be applied
            modulename = broccoli  # On which module should the event come from
            eventname = sowing  # On which event should fertiliser be applied
          category Fertiliser application details
            fertmodule = fertiliser  # Module used to apply the fertiliser
            fert_amount_sow = 300  # Amount of starter fertiliser at sowing (kg/ha)
            fert_type_sow = NO3_N  # Sowing fertiliser type
        rule Sow on a fixed date
          condition start_of_day:
            if (today = date('[date]') then
                                [crop] sow plants =[density], sowing_depth = [depth], cultivar = [cultivar], row_spacing = [row_spacing]
                    endif
          category Sowing criteria
            date = 11-mar  # Enter sowing date (dd-mmm)
          category Sowing parameters
            crop = broccoli  # Enter name of crop to sow
            density = 6  # Enter sowing density (plants/m2)
            depth = 50  # Enter sowing depth (mm)
            cultivar = Fiesta  # Enter cultivar
            row_spacing = 600  # Enter row spacing (mm)
        rule Harvest on a Growth Stage
          condition start_of_day:
            if ([crop].stage_name = '[stage]') then
                                [crop] harvest
                                [crop] end_crop
                    endif
          category Harvesting criteria
            stage = maturity  # Enter stage name
          category Harvesting parameters
            crop = broccoli  # Enter name of crop to sow
        rule Irrigate at sowing
          condition [modulename].[eventname]:
            if ([irrig_amount_evt] > 0) then
                        '[irrigatemodule]' apply amount = [irrig_amount_evt] (mm)
                     endif
          category When should irrigation be applied
            modulename = broccoli  # The module the event come from
            eventname = sowing  # Which event should irrigation be applied
          category Irrigation application details
            irrigatemodule = Irrigation  # Module used to apply the irrigation
            irrig_amount_evt = 50  # Amount of irrigation to apply (mm)
      fertiliser
      surfaceom surface organic matter
        PoolName = wheat  # Organic Matter pool name
        type = wheat  # Organic Matter type
        mass = 1000.  # Initial surface residue (kg/ha)
        cnr = 80.0  # C:N ration of initial residue
        standing_fraction = 0.0  # Fraction of residue standing
      outputfile: filename=Fiesta1997 Planting1.out
        variables My Variables -> My Variables
        events My Variables Events -> My Variables Events
      broccoli
      outputfile final: filename=Fiesta1997 Planting1 final.out
        variables FinalVariables -> FinalVariables
        events FinalVariables Events -> FinalVariables Events
      irrigation
        automatic_irrigation = on  # switch
        asw_depth = 600.0  # Depth to which ASW is calculated. (mm)
        crit_fr_asw = 0.5  # Fraction of ASW below which irrigation is applied (0-1.0)
        irrigation_efficiency = 1.0  # Efficiency of the irrigation. (0-1.0)
      Soil -> LawesSoil
    area Planting2
      registrations global
      manager
        rule Sowing fertiliser: same as Fiesta1997.Planting1.Manager.Sowing fertiliser
        rule Sow on a fixed date
          condition start_of_day:
            if (today = date('[date]') then
                                [crop] sow plants =[density], sowing_depth = [depth], cultivar = [cultivar], row_spacing = [row_spacing]
                    endif
          category Sowing criteria
            date = 20-mar  # Enter sowing date (dd-mmm)
          category Sowing parameters
            crop = broccoli  # Enter name of crop to sow
            density = 6  # Enter sowing density (plants/m2)
            depth = 50  # Enter sowing depth (mm)
            cultivar = Fiesta  # Enter cultivar
            row_spacing = 600  # Enter row spacing (mm)
        rule Irrigate at sowing: same as Fiesta1997.Planting1.Manager.Irrigate at sowing
        rule Harvest on a Growth Stage: same as Fiesta1997.Planting1.Manager.Harvest on a Growth Stage
      fertiliser
      surfaceom surface organic matter
        PoolName = wheat  # Organic Matter pool name
        type = wheat  # Organic Matter type
        mass = 1000.  # Initial surface residue (kg/ha)
        cnr = 80.0  # C:N ration of initial residue
        standing_fraction = 0.0  # Fraction of residue standing
      broccoli
      outputfile final: filename=Fiesta1997 Planting2 final.out
        variables FinalVariables -> FinalVariables
        events FinalVariables Events -> FinalVariables Events
      outputfile: filename=Fiesta1997 Planting2.out
        variables My Variables -> My Variables
        events My Variables Events -> My Variables Events
      irrigation
        automatic_irrigation = on  # switch
        asw_depth = 600.0  # Depth to which ASW is calculated. (mm)
        crit_fr_asw = 0.5  # Fraction of ASW below which irrigation is applied (0-1.0)
        irrigation_efficiency = 1.0  # Efficiency of the irrigation. (0-1.0)
      Soil -> LawesSoil
    area Planting3
      registrations global
      manager
        rule Sowing fertiliser: same as Fiesta1997.Planting1.Manager.Sowing fertiliser
        rule Sow on a fixed date
          condition start_of_day:
            if (today = date('[date]') then
                                [crop] sow plants =[density], sowing_depth = [depth], cultivar = [cultivar], row_spacing = [row_spacing]
                    endif
          category Sowing criteria
            date = 1-apr  # Enter sowing date (dd-mmm)
          category Sowing parameters
            crop = broccoli  # Enter name of crop to sow
            density = 6  # Enter sowing density (plants/m2)
            depth = 50  # Enter sowing depth (mm)
            cultivar = Fiesta  # Enter cultivar
            row_spacing = 600  # Enter row spacing (mm)
        rule Irrigate at sowing: same as Fiesta1997.Planting1.Manager.Irrigate at sowing
        rule Harvest on a Growth Stage: same as Fiesta1997.Planting1.Manager.Harvest on a Growth Stage
      fertiliser
      surfaceom surface organic matter
        PoolName = wheat  # Organic Matter pool name
        type = wheat  # Organic Matter type
        mass = 1000.  # Initial surface residue (kg/ha)
        cnr = 80.0  # C:N ration of initial residue
        standing_fraction = 0.0  # Fraction of residue standing
      broccoli
      outputfile final: filename=Fiesta1997 Planting3 final.out
        variables FinalVariables -> FinalVariables
        events FinalVariables Events -> FinalVariables Events
      outputfile: filename=Fiesta1997 Planting3.out
        variables My Variables -> My Variables
        events My Variables Events -> My Variables Events
      irrigation
        automatic_irrigation = on  # switch
        asw_depth = 600.0  # Depth to which ASW is calculated. (mm)
        crit_fr_asw = 0.5  # Fraction of ASW below which irrigation is applied (0-1.0)
        irrigation_efficiency = 1.0  # Efficiency of the irrigation. (0-1.0)
      Soil -> LawesSoil
    area Planting4
      registrations global
      manager
        rule Sowing fertiliser: same as Fiesta1997.Planting1.Manager.Sowing fertiliser
        rule Sow on a fixed date
          condition start_of_day:
            if (today = date('[date]') then
                                [crop] sow plants =[density], sowing_depth = [depth], cultivar = [cultivar], row_spacing = [row_spacing]
                    endif
          category Sowing criteria
            date = 10-apr  # Enter sowing date (dd-mmm)
          category Sowing parameters
            crop = broccoli  # Enter name of crop to sow
            density = 6  # Enter sowing density (plants/m2)
            depth = 50  # Enter sowing depth (mm)
            cultivar = Fiesta  # Enter cultivar
            row_spacing = 600  # Enter row spacing (mm)
        rule Irrigate at sowing: same as Fiesta1997.Planting1.Manager.Irrigate at sowing
        rule Harvest on a Growth Stage: same as Fiesta1997.Planting1.Manager.Harvest on a Growth Stage
      fertiliser
      surfaceom surface organic matter
        PoolName = wheat  # Organic Matter pool name
        type = wheat  # Organic Matter type
        mass = 1000.  # Initial surface residue (kg/ha)
        cnr = 80.0  # C:N ration of initial residue
        standing_fraction = 0.0  # Fraction of residue standing
      broccoli
      outputfile final: filename=Fiesta1997 Planting4 final.out
        variables FinalVariables -> FinalVariables
        events FinalVariables Events -> FinalVariables Events
      outputfile: filename=Fiesta1997 Planting4.out
        variables My Variables -> My Variables
        events My Variables Events -> My Variables Events
      irrigation
        automatic_irrigation = on  # switch
        asw_depth = 600.0  # Depth to which ASW is calculated. (mm)
        crit_fr_asw = 0.5  # Fraction of ASW below which irrigation is applied (0-1.0)
        irrigation_efficiency = 1.0  # Efficiency of the irrigation. (0-1.0)
      Soil -> LawesSoil
    area Planting5
      registrations global
      manager
        rule Sowing fertiliser: same as Fiesta1997.Planting1.Manager.Sowing fertiliser
        rule Sow on a fixed date
          condition start_of_day:
            if (today = date('[date]') then
                                [crop] sow plants =[density], sowing_depth = [depth], cultivar = [cultivar], row_spacing = [row_spacing]
                    endif
          category Sowing criteria
            date = 21-apr  # Enter sowing date (dd-mmm)
          category Sowing parameters
            crop = broccoli  # Enter name of crop to sow
            density = 6  # Enter sowing density (plants/m2)
            depth = 50  # Enter sowing depth (mm)
            cultivar = Fiesta  # Enter cultivar
            row_spacing = 600  # Enter row spacing (mm)
        rule Irrigate at sowing: same as Fiesta1997.Planting1.Manager.Irrigate at sowing
        rule Harvest on a Growth Stage: same as Fiesta1997.Planting1.Manager.Harvest on a Growth Stage
      fertiliser
      surfaceom surface organic matter
        PoolName = wheat  # Organic Matter pool name
        type = wheat  # Organic Matter type
        mass = 1000.  # Initial surface residue (kg/ha)
        cnr = 80.0  # C:N ration of initial residue
        standing_fraction = 0.0  # Fraction of residue standing
      broccoli
      outputfile final: filename=Fiesta1997 Planting5 final.out
        variables FinalVariables -> FinalVariables
        events FinalVariables Events -> FinalVariables Events
      outputfile: filename=Fiesta1997 Planting5.out
        variables My Variables -> My Variables
        events My Variables Events -> My Variables Events
      irrigation
        automatic_irrigation = on  # switch
        asw_depth = 600.0  # Depth to which ASW is calculated. (mm)
        crit_fr_asw = 0.5  # Fraction of ASW below which irrigation is applied (0-1.0)
        irrigation_efficiency = 1.0  # Efficiency of the irrigation. (0-1.0)
      Soil -> LawesSoil
    area Planting6
      registrations global
      manager
        rule Sowing fertiliser: same as Fiesta1997.Planting1.Manager.Sowing fertiliser
        rule Sow on a fixed date
          condition start_of_day:
            if (today = date('[date]') then
                                [crop] sow plants =[density], sowing_depth = [depth], cultivar = [cultivar], row_spacing = [row_spacing]
                    endif
          category Sowing criteria
            date = 1-may  # Enter sowing date (dd-mmm)
          category Sowing parameters
            crop = broccoli  # Enter name of crop to sow
            density = 6  # Enter sowing density (plants/m2)
            depth = 50  # Enter sowing depth (mm)
            cultivar = Fiesta  # Enter cultivar
            row_spacing = 600  # Enter row spacing (mm)
        rule Irrigate at sowing: same as Fiesta1997.Planting1.Manager.Irrigate at sowing
        rule Harvest on a Growth Stage: same as Fiesta1997.Planting1.Manager.Harvest on a Growth Stage
      fertiliser
      surfaceom surface organic matter
        PoolName = wheat  # Organic Matter pool name
        type = wheat  # Organic Matter type
        mass = 1000.  # Initial surface residue (kg/ha)
        cnr = 80.0  # C:N ration of initial residue
        standing_fraction = 0.0  # Fraction of residue standing
      broccoli
      outputfile final: filename=Fiesta1997 Planting6 final.out
        variables FinalVariables -> FinalVariables
        events FinalVariables Events -> FinalVariables Events
      outputfile: filename=Fiesta1997 Planting6.out
        variables My Variables -> My Variables
        events My Variables Events -> My Variables Events
      irrigation
        automatic_irrigation = on  # switch
        asw_depth = 600.0  # Depth to which ASW is calculated. (mm)
        crit_fr_asw = 0.5  # Fraction of ASW below which irrigation is applied (0-1.0)
        irrigation_efficiency = 1.0  # Efficiency of the irrigation. (0-1.0)
      Soil -> LawesSoil
    area Planting7
      registrations global
      manager
        rule Sowing fertiliser: same as Fiesta1997.Planting1.Manager.Sowing fertiliser
        rule Sow on a fixed date
          condition start_of_day:
            if (today = date('[date]') then
                                [crop] sow plants =[density], sowing_depth = [depth], cultivar = [cultivar], row_spacing = [row_spacing]
                    endif
          category Sowing criteria
            date = 12-may  # Enter sowing date (dd-mmm)
          category Sowing parameters
            crop = broccoli  # Enter name of crop to sow
            density = 6  # Enter sowing density (plants/m2)
            depth = 50  # Enter sowing depth (mm)
            cultivar = Fiesta  # Enter cultivar
            row_spacing = 600  # Enter row spacing (mm)
        rule Irrigate at sowing: same as Fiesta1997.Planting1.Manager.Irrigate at sowing
        rule Harvest on a Growth Stage: same as Fiesta1997.Planting1.Manager.Harvest on a Growth Stage
      fertiliser
      surfaceom surface organic matter
        PoolName = wheat  # Organic Matter pool name
        type = wheat  # Organic Matter type
        mass = 1000.  # Initial surface residue (kg/ha)
        cnr = 80.0  # C:N ration of initial residue
        standing_fraction = 0.0  # Fraction of residue standing
      broccoli
      outputfile final: filename=Fiesta1997 Planting7 final.out
        variables FinalVariables -> FinalVariables
        events FinalVariables Events -> FinalVariables Events
      outputfile: filename=Fiesta1997 Planting7.out
        variables My Variables -> My Variables
        events My Variables Events -> My Variables Events
      irrigation
        automatic_irrigation = on  # switch
        asw_depth = 600.0  # Depth to which ASW is calculated. (mm)
        crit_fr_asw = 0.5  # Fraction of ASW below which irrigation is applied (0-1.0)
        irrigation_efficiency = 1.0  # Efficiency of the irrigation. (0-1.0)
      Soil -> LawesSoil
    area Planting8
      registrations global
      manager
        rule Sowing fertiliser: same as Fiesta1997.Planting1.Manager.Sowing fertiliser
        rule Sow on a fixed date
          condition start_of_day:
            if (today = date('[date]') then
                                [crop] sow plants =[density], sowing_depth = [depth], cultivar = [cultivar], row_spacing = [row_spacing]
                    endif
          category Sowing criteria
            date = 22-may  # Enter sowing date (dd-mmm)
          category Sowing parameters
            crop = broccoli  # Enter name of crop to sow
            density = 6  # Enter sowing density (plants/m2)
            depth = 50  # Enter sowing depth (mm)
            cultivar = Fiesta  # Enter cultivar
            row_spacing = 600  # Enter row spacing (mm)
        rule Irrigate at sowing: same as Fiesta1997.Planting1.Manager.Irrigate at sowing
        rule Harvest on a Growth Stage: same as Fiesta1997.Planting1.Manager.Harvest on a Growth Stage
      fertiliser
      surfaceom surface organic matter
        PoolName = wheat  # Organic Matter pool name
        type = wheat  # Organic Matter type
        mass = 1000.  # Initial surface residue (kg/ha)
        cnr = 80.0  # C:N ration of initial residue
        standing_fraction = 0.0  # Fraction of residue standing
      broccoli
      outputfile final: filename=Fiesta1997 Planting8 final.out
        variables FinalVariables -> FinalVariables
        events FinalVariables Events -> FinalVariables Events
      outputfile: filename=Fiesta1997 Planting8.out
        variables My Variables -> My Variables
        events My Variables Events -> My Variables Events
      irrigation
        automatic_irrigation = on  # switch
        asw_depth = 600.0  # Depth to which ASW is calculated. (mm)
        crit_fr_asw = 0.5  # Fraction of ASW below which irrigation is applied (0-1.0)
        irrigation_efficiency = 1.0  # Efficiency of the irrigation. (0-1.0)
      Soil -> LawesSoil
    log: debugoutput=off; filename=log.txt
  simulation GreenBelt1997
    clock
      start_date = 1/03/1997  # Select the start date of the simulation
      end_date = 10/11/1997  # Select the end date of the simulation
    summaryfile: filename=GreenBelt1997.sum
    metfile met: filename=C:\development\apsim\Broccoli\Validation\DPI9798.met
    area Planting1
      registrations global
      manager
        rule Sowing fertiliser: same as Fiesta1997.Planting1.Manager.Sowing fertiliser
        rule Sow on a fixed date
          condition start_of_day:
            if (today = date('[date]') then
                                [crop] sow plants =[density], sowing_depth = [depth], cultivar = [cultivar], row_spacing = [row_spacing]
                    endif
          category Sowing criteria
            date = 11-mar  # Enter sowing date (dd-mmm)
          category Sowing parameters
            crop = broccoli  # Enter name of crop to sow
            density = 6  # Enter sowing density (plants/m2)
            depth = 50  # Enter sowing depth (mm)
            cultivar = greenbelt  # Enter cultivar
            row_spacing = 600  # Enter row spacing (mm)
        rule Harvest on a Growth Stage: same as Fiesta1997.Planting1.Manager.Harvest on a Growth Stage
        rule Irrigate at sowing: same as Fiesta1997.Planting1.Manager.Irrigate at sowing
      fertiliser
      surfaceom surface organic matter
        PoolName = wheat  # Organic Matter pool name
        type = wheat  # Organic Matter type
        mass = 1000.  # Initial surface residue (kg/ha)
        cnr = 80.0  # C:N ration of initial residue
        standing_fraction = 0.0  # Fraction of residue standing
      outputfile: filename=GreenBelt1997 Planting1.out
        variables My Variables -> My Variables
        events My Variables Events -> My Variables Events
      broccoli
      outputfile final: filename=GreenBelt1997 Planting1 final.out
        variables FinalVariables -> FinalVariables
        events FinalVariables Events -> FinalVariables Events
      irrigation
        automatic_irrigation = on  # switch
        asw_depth = 600.0  # Depth to which ASW is calculated. (mm)
        crit_fr_asw = 0.5  # Fraction of ASW below which irrigation is applied (0-1.0)
        irrigation_efficiency = 1.0  # Efficiency of the irrigation. (0-1.0)
      Soil -> LawesSoil
    area Planting2
      registrations global
      manager
        rule Sowing fertiliser: same as Fiesta1997.Planting1.Manager.Sowing fertiliser
        rule Sow on a fixed date
          condition start_of_day:
            if (today = date('[date]') then
                                [crop] sow plants =[density], sowing_depth = [depth], cultivar = [cultivar], row_spacing = [row_spacing]
                    endif
          category Sowing criteria
            date = 20-mar  # Enter sowing date (dd-mmm)
          category Sowing parameters
            crop = broccoli  # Enter name of crop to sow
            density = 6  # Enter sowing density (plants/m2)
            depth = 50  # Enter sowing depth (mm)
            cultivar = greenbelt  # Enter cultivar
            row_spacing = 600  # Enter row spacing (mm)
        rule Irrigate at sowing: same as Fiesta1997.Planting1.Manager.Irrigate at sowing
        rule Harvest on a Growth Stage: same as Fiesta1997.Planting1.Manager.Harvest on a Growth Stage
      fertiliser
      surfaceom surface organic matter
        PoolName = wheat  # Organic Matter pool name
        type = wheat  # Organic Matter type
        mass = 1000.  # Initial surface residue (kg/ha)
        cnr = 80.0  # C:N ration of initial residue
        standing_fraction = 0.0  # Fraction of residue standing
      broccoli
      outputfile final: filename=GreenBelt1997 Planting2 final.out
        variables FinalVariables -> FinalVariables
        events FinalVariables Events -> FinalVariables Events
      outputfile: filename=GreenBelt1997 Planting2.out
        variables My Variables -> My Variables
        events My Variables Events -> My Variables Events
      irrigation
        automatic_irrigation = on  # switch
        asw_depth = 600.0  # Depth to which ASW is calculated. (mm)
        crit_fr_asw = 0.5  # Fraction of ASW below which irrigation is applied (0-1.0)
        irrigation_efficiency = 1.0  # Efficiency of the irrigation. (0-1.0)
      Soil -> LawesSoil
    area Planting3
      registrations global
      manager
        rule Sowing fertiliser: same as Fiesta1997.Planting1.Manager.Sowing fertiliser
        rule Sow on a fixed date
          condition start_of_day:
            if (today = date('[date]') then
                                [crop] sow plants =[density], sowing_depth = [depth], cultivar = [cultivar], row_spacing = [row_spacing]
                    endif
          category Sowing criteria
            date = 1-apr  # Enter sowing date (dd-mmm)
          category Sowing parameters
            crop = broccoli  # Enter name of crop to sow
            density = 6  # Enter sowing density (plants/m2)
            depth = 50  # Enter sowing depth (mm)
            cultivar = greenbelt  # Enter cultivar
            row_spacing = 600  # Enter row spacing (mm)
        rule Irrigate at sowing: same as Fiesta1997.Planting1.Manager.Irrigate at sowing
        rule Harvest on a Growth Stage: same as Fiesta1997.Planting1.Manager.Harvest on a Growth Stage
      fertiliser
      surfaceom surface organic matter
        PoolName = wheat  # Organic Matter pool name
        type = wheat  # Organic Matter type
        mass = 1000.  # Initial surface residue (kg/ha)
        cnr = 80.0  # C:N ration of initial residue
        standing_fraction = 0.0  # Fraction of residue standing
      broccoli
      outputfile final: filename=GreenBelt1997 Planting3 final.out
        variables FinalVariables -> FinalVariables
        events FinalVariables Events -> FinalVariables Events
      outputfile: filename=GreenBelt1997 Planting3.out
        variables My Variables -> My Variables
        events My Variables Events -> My Variables Events
      irrigation
        automatic_irrigation = on  # switch
        asw_depth = 600.0  # Depth to which ASW is calculated. (mm)
        crit_fr_asw = 0.5  # Fraction of ASW below which irrigation is applied (0-1.0)
        irrigation_efficiency = 1.0  # Efficiency of the irrigation. (0-1.0)
      Soil -> LawesSoil
    area Planting4
      registrations global
      manager
        rule Sowing fertiliser: same as Fiesta1997.Planting1.Manager.Sowing fertiliser
        rule Sow on a fixed date
          condition start_of_day:
            if (today = date('[date]') then
                                [crop] sow plants =[density], sowing_depth = [depth], cultivar = [cultivar], row_spacing = [row_spacing]
                    endif
          category Sowing criteria
            date = 10-apr  # Enter sowing date (dd-mmm)
          category Sowing parameters
            crop = broccoli  # Enter name of crop to sow
            density = 6  # Enter sowing density (plants/m2)
            depth = 50  # Enter sowing depth (mm)
            cultivar = greenbelt  # Enter cultivar
            row_spacing = 600  # Enter row spacing (mm)
        rule Irrigate at sowing: same as Fiesta1997.Planting1.Manager.Irrigate at sowing
        rule Harvest on a Growth Stage: same as Fiesta1997.Planting1.Manager.Harvest on a Growth Stage
      fertiliser
      surfaceom surface organic matter
        PoolName = wheat  # Organic Matter pool name
        type = wheat  # Organic Matter type
        mass = 1000.  # Initial surface residue (kg/ha)
        cnr = 80.0  # C:N ration of initial residue
        standing_fraction = 0.0  # Fraction of residue standing
      broccoli
      outputfile final: filename=GreenBelt1997 Planting4 final.out
        variables FinalVariables -> FinalVariables
        events FinalVariables Events -> FinalVariables Events
      outputfile: filename=GreenBelt1997 Planting4.out
        variables My Variables -> My Variables
        events My Variables Events -> My Variables Events
      irrigation
        automatic_irrigation = on  # switch
        asw_depth = 600.0  # Depth to which ASW is calculated. (mm)
        crit_fr_asw = 0.5  # Fraction of ASW below which irrigation is applied (0-1.0)
        irrigation_efficiency = 1.0  # Efficiency of the irrigation. (0-1.0)
      Soil -> LawesSoil
    area Planting5
      registrations global
      manager
        rule Sowing fertiliser: same as Fiesta1997.Planting1.Manager.Sowing fertiliser
        rule Sow on a fixed date
          condition start_of_day:
            if (today = date('[date]') then
                                [crop] sow plants =[density], sowing_depth = [depth], cultivar = [cultivar], row_spacing = [row_spacing]
                    endif
          category Sowing criteria
            date = 21-apr  # Enter sowing date (dd-mmm)
          category Sowing parameters
            crop = broccoli  # Enter name of crop to sow
            density = 6  # Enter sowing density (plants/m2)
            depth = 50  # Enter sowing depth (mm)
            cultivar = greenbelt  # Enter cultivar
            row_spacing = 600  # Enter row spacing (mm)
        rule Irrigate at sowing: same as Fiesta1997.Planting1.Manager.Irrigate at sowing
        rule Harvest on a Growth Stage: same as Fiesta1997.Planting1.Manager.Harvest on a Growth Stage
      fertiliser
      surfaceom surface organic matter
        PoolName = wheat  # Organic Matter pool name
        type = wheat  # Organic Matter type
        mass = 1000.  # Initial surface residue (kg/ha)
        cnr = 80.0  # C:N ration of initial residue
        standing_fraction = 0.0  # Fraction of residue standing
      broccoli
      outputfile final: filename=GreenBelt1997 Planting5 final.out
        variables FinalVariables -> FinalVariables
        events FinalVariables Events -> FinalVariables Events
      outputfile: filename=GreenBelt1997 Planting5.out
        variables My Variables -> My Variables
        events My Variables Events -> My Variables Events
      irrigation
        automatic_irrigation = on  # switch
        asw_depth = 600.0  # Depth to which ASW is calculated. (mm)
        crit_fr_asw = 0.5  # Fraction of ASW below which irrigation is applied (0-1.0)
        irrigation_efficiency = 1.0  # Efficiency of the irrigation. (0-1.0)
      Soil -> LawesSoil
    area Planting6
      registrations global
      manager
        rule Sowing fertiliser: same as Fiesta1997.Planting1.Manager.Sowing fertiliser
        rule Sow on a fixed date
          condition start_of_day:
            if (today = date('[date]') then
                                [crop] sow plants =[density], sowing_depth = [depth], cultivar = [cultivar], row_spacing = [row_spacing]
                    endif
          category Sowing criteria
            date = 1-may  # Enter sowing date (dd-mmm)
          category Sowing parameters
            crop = broccoli  # Enter name of crop to sow
            density = 6  # Enter sowing density (plants/m2)
            depth = 50  # Enter sowing depth (mm)
            cultivar = greenbelt  # Enter cultivar
            row_spacing = 600  # Enter row spacing (mm)
        rule Irrigate at sowing: same as Fiesta1997.Planting1.Manager.Irrigate at sowing
        rule Harvest on a Growth Stage: same as Fiesta1997.Planting1.Manager.Harvest on a Growth Stage
      fertiliser
      surfaceom surface organic matter
        PoolName = wheat  # Organic Matter pool name
        type = wheat  # Organic Matter type
        mass = 1000.  # Initial surface residue (kg/ha)
        cnr = 80.0  # C:N ration of initial residue
        standing_fraction = 0.0  # Fraction of residue standing
      broccoli
      outputfile final: filename=GreenBelt1997 Planting6 final.out
        variables FinalVariables -> FinalVariables
        events FinalVariables Events -> FinalVariables Events
      outputfile: filename=GreenBelt1997 Planting6.out
        variables My Variables -> My Variables
        events My Variables Events -> My Variables Events
      irrigation
        automatic_irrigation = on  # switch
        asw_depth = 600.0  # Depth to which ASW is calculated. (mm)
        crit_fr_asw = 0.5  # Fraction of ASW below which irrigation is applied (0-1.0)
        irrigation_efficiency = 1.0  # Efficiency of the irrigation. (0-1.0)
      Soil -> LawesSoil
    area Planting7
      registrations global
      manager
        rule Sowing fertiliser: same as Fiesta1997.Planting1.Manager.Sowing fertiliser
        rule Sow on a fixed date
          condition start_of_day:
            if (today = date('[date]') then
                                [crop] sow plants =[density], sowing_depth = [depth], cultivar = [cultivar], row_spacing = [row_spacing]
                    endif
          category Sowing criteria
            date = 12-may  # Enter sowing date (dd-mmm)
          category Sowing parameters
            crop = broccoli  # Enter name of crop to sow
            density = 6  # Enter sowing density (plants/m2)
            depth = 50  # Enter sowing depth (mm)
            cultivar = greenbelt  # Enter cultivar
            row_spacing = 600  # Enter row spacing (mm)
        rule Irrigate at sowing: same as Fiesta1997.Planting1.Manager.Irrigate at sowing
        rule Harvest on a Growth Stage: same as Fiesta1997.Planting1.Manager.Harvest on a Growth Stage
      fertiliser
      surfaceom surface organic matter
        PoolName = wheat  # Organic Matter pool name
        type = wheat  # Organic Matter type
        mass = 1000.  # Initial surface residue (kg/ha)
        cnr = 80.0  # C:N ration of initial residue
        standing_fraction = 0.0  # Fraction of residue standing
      broccoli
      outputfile final: filename=GreenBelt1997 Planting7 final.out
        variables FinalVariables -> FinalVariables
        events FinalVariables Events -> FinalVariables Events
      outputfile: filename=GreenBelt1997 Planting7.out
        variables My Variables -> My Variables
        events My Variables Events -> My Variables Events
      irrigation
        automatic_irrigation = on  # switch
        asw_depth = 600.0  # Depth to which ASW is calculated. (mm)
        crit_fr_asw = 0.5  # Fraction of ASW below which irrigation is applied (0-1.0)
        irrigation_efficiency = 1.0  # Efficiency of the irrigation. (0-1.0)
      Soil -> LawesSoil
    area Planting8
      registrations global
      manager
        rule Sowing fertiliser: same as Fiesta1997.Planting1.Manager.Sowing fertiliser
        rule Sow on a fixed date
          condition start_of_day:
            if (today = date('[date]') then
                                [crop] sow plants =[density], sowing_depth = [depth], cultivar = [cultivar], row_spacing = [row_spacing]
                    endif
          category Sowing criteria
            date = 22-may  # Enter sowing date (dd-mmm)
          category Sowing parameters
            crop = broccoli  # Enter name of crop to sow
            density = 6  # Enter sowing density (plants/m2)
            depth = 50  # Enter sowing depth (mm)
            cultivar = greenbelt  # Enter cultivar
            row_spacing = 600  # Enter row spacing (mm)
        rule Irrigate at sowing: same as Fiesta1997.Planting1.Manager.Irrigate at sowing
        rule Harvest on a Growth Stage: same as Fiesta1997.Planting1.Manager.Harvest on a Growth Stage
      fertiliser
      surfaceom surface organic matter
        PoolName = wheat  # Organic Matter pool name
        type = wheat  # Organic Matter type
        mass = 1000.  # Initial surface residue (kg/ha)
        cnr = 80.0  # C:N ration of initial residue
        standing_fraction = 0.0  # Fraction of residue standing
      broccoli
      outputfile final: filename=GreenBelt1997 Planting8 final.out
        variables FinalVariables -> FinalVariables
        events FinalVariables Events -> FinalVariables Events
      outputfile: filename=GreenBelt1997 Planting8.out
        variables My Variables -> My Variables
        events My Variables Events -> My Variables Events
      irrigation
        automatic_irrigation = on  # switch
        asw_depth = 600.0  # Depth to which ASW is calculated. (mm)
        crit_fr_asw = 0.5  # Fraction of ASW below which irrigation is applied (0-1.0)
        irrigation_efficiency = 1.0  # Efficiency of the irrigation. (0-1.0)
      Soil -> LawesSoil
    log: debugoutput=off; filename=log.txt
  simulation Marathon1997
    clock
      start_date = 1/03/1997  # Select the start date of the simulation
      end_date = 10/11/1997  # Select the end date of the simulation
    summaryfile: filename=GreenBelt1997.sum
    metfile met: filename=C:\development\apsim\Broccoli\Validation\DPI9798.met
    area Planting1
      registrations global
      manager
        rule Sowing fertiliser: same as Fiesta1997.Planting1.Manager.Sowing fertiliser
        rule Sow on a fixed date
          condition start_of_day:
            if (today = date('[date]') then
                                [crop] sow plants =[density], sowing_depth = [depth], cultivar = [cultivar], row_spacing = [row_spacing]
                    endif
          category Sowing criteria
            date = 11-mar  # Enter sowing date (dd-mmm)
          category Sowing parameters
            crop = broccoli  # Enter name of crop to sow
            density = 6  # Enter sowing density (plants/m2)
            depth = 50  # Enter sowing depth (mm)
            cultivar = marathon  # Enter cultivar
            row_spacing = 600  # Enter row spacing (mm)
        rule Harvest on a Growth Stage: same as Fiesta1997.Planting1.Manager.Harvest on a Growth Stage
        rule Irrigate at sowing: same as Fiesta1997.Planting1.Manager.Irrigate at sowing
      fertiliser
      surfaceom surface organic matter
        PoolName = wheat  # Organic Matter pool name
        type = wheat  # Organic Matter type
        mass = 1000.  # Initial surface residue (kg/ha)
        cnr = 80.0  # C:N ration of initial residue
        standing_fraction = 0.0  # Fraction of residue standing
      outputfile: filename=GreenBelt1997 Planting1.out
        variables My Variables -> My Variables
        events My Variables Events -> My Variables Events
      broccoli
      outputfile final: filename=GreenBelt1997 Planting1 final.out
        variables FinalVariables -> FinalVariables
        events FinalVariables Events -> FinalVariables Events
      irrigation
        automatic_irrigation = on  # switch
        asw_depth = 600.0  # Depth to which ASW is calculated. (mm)
        crit_fr_asw = 0.5  # Fraction of ASW below which irrigation is applied (0-1.0)
        irrigation_efficiency = 1.0  # Efficiency of the irrigation. (0-1.0)
      Soil -> LawesSoil
    area Planting2
      registrations global
      manager
        rule Sowing fertiliser: same as Fiesta1997.Planting1.Manager.Sowing fertiliser
        rule Sow on a fixed date
          condition start_of_day:
            if (today = date('[date]') then
                                [crop] sow plants =[density], sowing_depth = [depth], cultivar = [cultivar], row_spacing = [row_spacing]
                    endif
          category Sowing criteria
            date = 20-mar  # Enter sowing date (dd-mmm)
          category Sowing parameters
            crop = broccoli  # Enter name of crop to sow
            density = 6  # Enter sowing density (plants/m2)
            depth = 50  # Enter sowing depth (mm)
            cultivar = marathon  # Enter cultivar
            row_spacing = 600  # Enter row spacing (mm)
        rule Irrigate at sowing: same as Fiesta1997.Planting1.Manager.Irrigate at sowing
        rule Harvest on a Growth Stage: same as Fiesta1997.Planting1.Manager.Harvest on a Growth Stage
      fertiliser
      surfaceom surface organic matter
        PoolName = wheat  # Organic Matter pool name
        type = wheat  # Organic Matter type
        mass = 1000.  # Initial surface residue (kg/ha)
        cnr = 80.0  # C:N ration of initial residue
        standing_fraction = 0.0  # Fraction of residue standing
      broccoli
      outputfile final: filename=GreenBelt1997 Planting2 final.out
        variables FinalVariables -> FinalVariables
        events FinalVariables Events -> FinalVariables Events
      outputfile: filename=GreenBelt1997 Planting2.out
        variables My Variables -> My Variables
        events My Variables Events -> My Variables Events
      irrigation
        automatic_irrigation = on  # switch
        asw_depth = 600.0  # Depth to which ASW is calculated. (mm)
        crit_fr_asw = 0.5  # Fraction of ASW below which irrigation is applied (0-1.0)
        irrigation_efficiency = 1.0  # Efficiency of the irrigation. (0-1.0)
      Soil -> LawesSoil
    area Planting3
      registrations global
      manager
        rule Sowing fertiliser: same as Fiesta1997.Planting1.Manager.Sowing fertiliser
        rule Sow on a fixed date
          condition start_of_day:
            if (today = date('[date]') then
                                [crop] sow plants =[density], sowing_depth = [depth], cultivar = [cultivar], row_spacing = [row_spacing]
                    endif
          category Sowing criteria
            date = 1-apr  # Enter sowing date (dd-mmm)
          category Sowing parameters
            crop = broccoli  # Enter name of crop to sow
            density = 6  # Enter sowing density (plants/m2)
            depth = 50  # Enter sowing depth (mm)
            cultivar = marathon  # Enter cultivar
            row_spacing = 600  # Enter row spacing (mm)
        rule Irrigate at sowing: same as Fiesta1997.Planting1.Manager.Irrigate at sowing
        rule Harvest on a Growth Stage: same as Fiesta1997.Planting1.Manager.Harvest on a Growth Stage
      fertiliser
      surfaceom surface organic matter
        PoolName = wheat  # Organic Matter pool name
        type = wheat  # Organic Matter type
        mass = 1000.  # Initial surface residue (kg/ha)
        cnr = 80.0  # C:N ration of initial residue
        standing_fraction = 0.0  # Fraction of residue standing
      broccoli
      outputfile final: filename=GreenBelt1997 Planting3 final.out
        variables FinalVariables -> FinalVariables
        events FinalVariables Events -> FinalVariables Events
      outputfile: filename=GreenBelt1997 Planting3.out
        variables My Variables -> My Variables
        events My Variables Events -> My Variables Events
      irrigation
        automatic_irrigation = on  # switch
        asw_depth = 600.0  # Depth to which ASW is calculated. (mm)
        crit_fr_asw = 0.5  # Fraction of ASW below which irrigation is applied (0-1.0)
        irrigation_efficiency = 1.0  # Efficiency of the irrigation. (0-1.0)
      Soil -> LawesSoil
    area Planting4
      registrations global
      manager
        rule Sowing fertiliser: same as Fiesta1997.Planting1.Manager.Sowing fertiliser
        rule Sow on a fixed date
          condition start_of_day:
            if (today = date('[date]') then
                                [crop] sow plants =[density], sowing_depth = [depth], cultivar = [cultivar], row_spacing = [row_spacing]
                    endif
          category Sowing criteria
            date = 10-apr  # Enter sowing date (dd-mmm)
          category Sowing parameters
            crop = broccoli  # Enter name of crop to sow
            density = 6  # Enter sowing density (plants/m2)
            depth = 50  # Enter sowing depth (mm)
            cultivar = marathon  # Enter cultivar
            row_spacing = 600  # Enter row spacing (mm)
        rule Irrigate at sowing: same as Fiesta1997.Planting1.Manager.Irrigate at sowing
        rule Harvest on a Growth Stage: same as Fiesta1997.Planting1.Manager.Harvest on a Growth Stage
      fertiliser
      surfaceom surface organic matter
        PoolName = wheat  # Organic Matter pool name
        type = wheat  # Organic Matter type
        mass = 1000.  # Initial surface residue (kg/ha)
        cnr = 80.0  # C:N ration of initial residue
        standing_fraction = 0.0  # Fraction of residue standing
      broccoli
      outputfile final: filename=GreenBelt1997 Planting4 final.out
        variables FinalVariables -> FinalVariables
        events FinalVariables Events -> FinalVariables Events
      outputfile: filename=GreenBelt1997 Planting4.out
        variables My Variables -> My Variables
        events My Variables Events -> My Variables Events
      irrigation
        automatic_irrigation = on  # switch
        asw_depth = 600.0  # Depth to which ASW is calculated. (mm)
        crit_fr_asw = 0.5  # Fraction of ASW below which irrigation is applied (0-1.0)
        irrigation_efficiency = 1.0  # Efficiency of the irrigation. (0-1.0)
      Soil -> LawesSoil
    area Planting5
      registrations global
      manager
        rule Sowing fertiliser: same as Fiesta1997.Planting1.Manager.Sowing fertiliser
        rule Sow on a fixed date
          condition start_of_day:
            if (today = date('[date]') then
                                [crop] sow plants =[density], sowing_depth = [depth], cultivar = [cultivar], row_spacing = [row_spacing]
                    endif
          category Sowing criteria
            date = 21-apr  # Enter sowing date (dd-mmm)
          category Sowing parameters
            crop = broccoli  # Enter name of crop to sow
            density = 6  # Enter sowing density (plants/m2)
            depth = 50  # Enter sowing depth (mm)
            cultivar = marathon  # Enter cultivar
            row_spacing = 600  # Enter row spacing (mm)
        rule Irrigate at sowing: same as Fiesta1997.Planting1.Manager.Irrigate at sowing
        rule Harvest on a Growth Stage: same as Fiesta1997.Planting1.Manager.Harvest on a Growth Stage
      fertiliser
      surfaceom surface organic matter
        PoolName = wheat  # Organic Matter pool name
        type = wheat  # Organic Matter type
        mass = 1000.  # Initial surface residue (kg/ha)
        cnr = 80.0  # C:N ration of initial residue
        standing_fraction = 0.0  # Fraction of residue standing
      broccoli
      outputfile final: filename=GreenBelt1997 Planting5 final.out
        variables FinalVariables -> FinalVariables
        events FinalVariables Events -> FinalVariables Events
      outputfile: filename=GreenBelt1997 Planting5.out
        variables My Variables -> My Variables
        events My Variables Events -> My Variables Events
      irrigation
        automatic_irrigation = on  # switch
        asw_depth = 600.0  # Depth to which ASW is calculated. (mm)
        crit_fr_asw = 0.5  # Fraction of ASW below which irrigation is applied (0-1.0)
        irrigation_efficiency = 1.0  # Efficiency of the irrigation. (0-1.0)
      Soil -> LawesSoil
    area Planting6
      registrations global
      manager
        rule Sowing fertiliser: same as Fiesta1997.Planting1.Manager.Sowing fertiliser
        rule Sow on a fixed date
          condition start_of_day:
            if (today = date('[date]') then
                                [crop] sow plants =[density], sowing_depth = [depth], cultivar = [cultivar], row_spacing = [row_spacing]
                    endif
          category Sowing criteria
            date = 1-may  # Enter sowing date (dd-mmm)
          category Sowing parameters
            crop = broccoli  # Enter name of crop to sow
            density = 6  # Enter sowing density (plants/m2)
            depth = 50  # Enter sowing depth (mm)
            cultivar = marathon  # Enter cultivar
            row_spacing = 600  # Enter row spacing (mm)
        rule Irrigate at sowing: same as Fiesta1997.Planting1.Manager.Irrigate at sowing
        rule Harvest on a Growth Stage: same as Fiesta1997.Planting1.Manager.Harvest on a Growth Stage
      fertiliser
      surfaceom surface organic matter
        PoolName = wheat  # Organic Matter pool name
        type = wheat  # Organic Matter type
        mass = 1000.  # Initial surface residue (kg/ha)
        cnr = 80.0  # C:N ration of initial residue
        standing_fraction = 0.0  # Fraction of residue standing
      broccoli
      outputfile final: filename=GreenBelt1997 Planting6 final.out
        variables FinalVariables -> FinalVariables
        events FinalVariables Events -> FinalVariables Events
      outputfile: filename=GreenBelt1997 Planting6.out
        variables My Variables -> My Variables
        events My Variables Events -> My Variables Events
      irrigation
        automatic_irrigation = on  # switch
        asw_depth = 600.0  # Depth to which ASW is calculated. (mm)
        crit_fr_asw = 0.5  # Fraction of ASW below which irrigation is applied (0-1.0)
        irrigation_efficiency = 1.0  # Efficiency of the irrigation. (0-1.0)
      Soil -> LawesSoil
    area Planting7
      registrations global
      manager
        rule Sowing fertiliser: same as Fiesta1997.Planting1.Manager.Sowing fertiliser
        rule Sow on a fixed date
          condition start_of_day:
            if (today = date('[date]') then
                                [crop] sow plants =[density], sowing_depth = [depth], cultivar = [cultivar], row_spacing = [row_spacing]
                    endif
          category Sowing criteria
            date = 12-may  # Enter sowing date (dd-mmm)
          category Sowing parameters
            crop = broccoli  # Enter name of crop to sow
            density = 6  # Enter sowing density (plants/m2)
            depth = 50  # Enter sowing depth (mm)
            cultivar = marathon  # Enter cultivar
            row_spacing = 600  # Enter row spacing (mm)
        rule Irrigate at sowing: same as Fiesta1997.Planting1.Manager.Irrigate at sowing
        rule Harvest on a Growth Stage: same as Fiesta1997.Planting1.Manager.Harvest on a Growth Stage
      fertiliser
      surfaceom surface organic matter
        PoolName = wheat  # Organic Matter pool name
        type = wheat  # Organic Matter type
        mass = 1000.  # Initial surface residue (kg/ha)
        cnr = 80.0  # C:N ration of initial residue
        standing_fraction = 0.0  # Fraction of residue standing
      broccoli
      outputfile final: filename=GreenBelt1997 Planting7 final.out
        variables FinalVariables -> FinalVariables
        events FinalVariables Events -> FinalVariables Events
      outputfile: filename=GreenBelt1997 Planting7.out
        variables My Variables -> My Variables
        events My Variables Events -> My Variables Events
      irrigation
        automatic_irrigation = on  # switch
        asw_depth = 600.0  # Depth to which ASW is calculated. (mm)
        crit_fr_asw = 0.5  # Fraction of ASW below which irrigation is applied (0-1.0)
        irrigation_efficiency = 1.0  # Efficiency of the irrigation. (0-1.0)
      Soil -> LawesSoil
    area Planting8
      registrations global
      manager
        rule Sowing fertiliser: same as Fiesta1997.Planting1.Manager.Sowing fertiliser
        rule Sow on a fixed date
          condition start_of_day:
            if (today = date('[date]') then
                                [crop] sow plants =[density], sowing_depth = [depth], cultivar = [cultivar], row_spacing = [row_spacing]
                    endif
          category Sowing criteria
            date = 22-may  # Enter sowing date (dd-mmm)
          category Sowing parameters
            crop = broccoli  # Enter name of crop to sow
            density = 6  # Enter sowing density (plants/m2)
            depth = 50  # Enter sowing depth (mm)
            cultivar = marathon  # Enter cultivar
            row_spacing = 600  # Enter row spacing (mm)
        rule Irrigate at sowing: same as Fiesta1997.Planting1.Manager.Irrigate at sowing
        rule Harvest on a Growth Stage: same as Fiesta1997.Planting1.Manager.Harvest on a Growth Stage
      fertiliser
      surfaceom surface organic matter
        PoolName = wheat  # Organic Matter pool name
        type = wheat  # Organic Matter type
        mass = 1000.  # Initial surface residue (kg/ha)
        cnr = 80.0  # C:N ration of initial residue
        standing_fraction = 0.0  # Fraction of residue standing
      broccoli
      outputfile final: filename=GreenBelt1997 Planting8 final.out
        variables FinalVariables -> FinalVariables
        events FinalVariables Events -> FinalVariables Events
      outputfile: filename=GreenBelt1997 Planting8.out
        variables My Variables -> My Variables
        events My Variables Events -> My Variables Events
      irrigation
        automatic_irrigation = on  # switch
        asw_depth = 600.0  # Depth to which ASW is calculated. (mm)
        crit_fr_asw = 0.5  # Fraction of ASW below which irrigation is applied (0-1.0)
        irrigation_efficiency = 1.0  # Efficiency of the irrigation. (0-1.0)
      Soil -> LawesSoil
  simulation Mulgowie2005
    clock
      start_date = 1/1/2005  # Select the start date of the simulation
      end_date = 10/11/2005  # Select the end date of the simulation
    summaryfile: filename=Mulgowie2005.sum
    metfile met: filename=D:\development\apsim\Broccoli\Validation\UQG2005.met
    area Planting1
      registrations global
      manager: same as GreenBelt1997.Planting1.Manager
      fertiliser
      surfaceom surface organic matter
        PoolName = wheat  # Organic Matter pool name
        type = wheat  # Organic Matter type
        mass = 1000.  # Initial surface residue (kg/ha)
        cnr = 80.0  # C:N ration of initial residue
        standing_fraction = 0.0  # Fraction of residue standing
      outputfile: filename=Mulgowie2005 Planting1.out
        variables My Variables
          variable:
            dd/mm/yyyy as Date
            broccoli.biomass_wt
            broccoli.leaf_no
            broccoli.lai
            broccoli.floral_initiation_das
            broccoli.maturity_das
            broccoli.stage
            broccoli.cum_vernal_days
            broccoli.tt_tot
            broccoli.dlt_cumvd
            broccoli.swdef_photo
            broccoli.nfact_photo
            broccoli.temp_stress_photo
            Irrigation.irrigation
            broccoli.dlt_leaf_no
            broccoli.dlt_node_no
            broccoli.final_leaf_no
            broccoli.emergence_das
            broccoli.node_no_sen
            broccoli.node_no_fx
            sw_dep()
        events My Variables Events: event=Daily
      irrigation
        automatic_irrigation = on  # switch
        asw_depth = 300.0  # Depth to which ASW is calculated. (mm)
        crit_fr_asw = 0.5  # Fraction of ASW below which irrigation is applied (0-1.0)
        irrigation_efficiency = 1.0  # Efficiency of the irrigation. (0-1.0)
      broccoli
      outputfile final: filename=Mulgowie2005 Planting1 final.out
        variables My Variables
          variable:
            broccoli.sowing_date
            dd/mm/yyyy
            broccoli.floral_initiation_das
            broccoli.maturity_das
            broccoli.green_biomass_wt
            broccoli.pod_wt
            broccoli.leaf_no
        events My Variables Events: event=broccoli.harvesting
      Soil DPIGatton -> DPIGatton
    log: debugoutput=off; filename=log.txt
  folder shared
    Soil #037 - UQ, Lawes,Black Vertosol: region=Lockyer; site=UQ, Lawes; SoilType=Black Vertosol; nearesttown=Gatton, Q 4343; comment=oc and ph estimated; naturalvegetation=Blue Gum, Moreton Bay Ash, Tea Tree; U=6; Cona=3.5; Salb=0.13; DiffusConst=40; DiffusSlope=16; CN2Bare=73; CNRed=20; CNCov=0.8; RootCN=40; RootWT=200; SoilCN=12.5; EnrACoeff=7.4; EnrBCoeff=0.2
      InitWater
        profile
          layer:
            sw     thickness
            0.410  150
            0.430  150
            0.460  300
            0.440  300
            0.400  300
            0.410  300
            0.380  300
      InitNitrogen
        profile
          layer:
            no3    nh4    thickness
            6.500  0.600  150
            2.100  0.100  150
            2.100  0.100  300
            1.700  0.100  300
            1.700  0.100  300
            1.700  0.100  300
            1.700  0.100  300
      profile
        layer:
          thickness  bd     ll15   airdry  dul    sat    swcon  fbiom  finert  oc     ph  ll wheat  kl wheat  xf wheat  ll canola  kl canola  xf canola  ll Chickpea  kl Chickpea  xf Chickpea  ll Sorghum  kl Sorghum  xf Sorghum  ll Fababean  kl Fababean  xf Fababean
          150        1.320  0.260  0.130   0.410  0.470  0.300  0.030  0.400   1.240  7   0.260     0.100     1         0.260      0.100      1          0.260        0.100        1            0.260       0.100       1           0.260        0.100        1
          150        1.300  0.260  0.234   0.430  0.480  0.300  0.020  0.600   1.240  7   0.260     0.100     1         0.300      0.100      1          0.260        0.100        1            0.260       0.100       1           0.300        0.100        1
          300        1.230  0.260  0.260   0.460  0.510  0.300  0.010  0.800   1.250  7   0.260     0.080     1         0.390      0.080      1          0.260        0.080        1            0.350       0.100       1           0.420        0.080        1
          300        1.270  0.260  0.260   0.440  0.490  0.300  0.010  0.900   1.100  7   0.260     0.060     1         0.360      0.060      1          0.290        0.060        1            0.320       0.080       1           0.400        0.060        1
          300        1.370  0.250  0.250   0.400  0.450  0.300  0.010  0.950   0.710  7   0.250     0.040     1         0.310      0.040      1          0.320        0.040        1            0.290       0.060       1           0.350        0.040        1
          300        1.350  0.280  0.280   0.410  0.460  0.300  0.010  0.950   0.340  7   0.290     0.020     1         0.280      0.020      1          0.310        0.020        1            0.310       0.040       1           0.350        0.020        1
          300        1.350  0.310  0.310   0.380  0.460  0.300  0.010  0.950   0.260  7   0.360     0.010     1         0.320      0.010      1          0.370        0.010        1            0.310       0.020       1           0.380        0.010        1
    Soil LawesSoil: region=Lockyer; site=UQ, Lawes; SoilType=Prarie; nearesttown=Gatton, Q 4343; comment=oc and ph estimated; naturalvegetation=Blue Gum, Moreton Bay Ash, Tea Tree; U=6; Cona=3.5; Salb=0.13; DiffusConst=40; DiffusSlope=16; CN2Bare=73; CNRed=20; CNCov=0.8; RootCN=40; RootWT=200; SoilCN=12.5; EnrACoeff=7.4; EnrBCoeff=0.2
      InitWater
        profile
          layer:
            sw     thickness
            0.190  150
            0.210  150
            0.200  300
            0.190  300
            0.150  300
            0.320  300
            0.340  300
      InitNitrogen: same as shared.#037 - UQ, Lawes,Black Vertosol.InitNitrogen
      profile
        layer:
          thickness  bd     ll15   airdry  dul    sat    swcon  fbiom  finert  oc     ph  ll wheat  kl wheat  xf wheat  ll Chickpea  kl Chickpea  xf Chickpea  ll Broccoli  xf Broccoli  kl Broccoli
          150        1.380  0.200  0.100   0.380  0.450  0.300  0.030  0.400   1.200  7   0.200     0.100     1         0.200        0.100        1            0.200        1.000        0.060
          150        1.380  0.210  0.189   0.380  0.450  0.300  0.020  0.600   1.200  7   0.210     0.100     1         0.210        0.100        1            0.210        1.000        0.060
          300        1.280  0.200  0.200   0.440  0.490  0.300  0.010  0.800   1.200  7   0.200     0.080     1         0.200        0.080        1            0.200        1.000        0.060
          300        1.380  0.190  0.190   0.400  0.450  0.300  0.010  0.900   1.100  7   0.190     0.060     1         0.220        0.060        1            0.190        1.000        0.060
          300        1.400  0.150  0.150   0.390  0.440  0.300  0.010  0.950   0.700  7   0.150     0.040     1         0.220        0.040        1            0.150        0.000        0.000
          300        1.460  0.320  0.320   0.370  0.420  0.300  0.010  0.950   0.300  7   0.320     0.020     1         0.340        0.020        1            0.320        0.000        0.000
          300        1.470  0.335  0.329   0.340  0.420  0.300  0.010  0.950   0.300  7   0.340     0.010     1         0.330        0.010        1            0.340        0.000        0.000
    Soil DPIGatton: region=Lockyer; site=UQ, Lawes; SoilType=Prarie; nearesttown=Gatton, Q 4343; comment=oc and ph estimated; naturalvegetation=Blue Gum, Moreton Bay Ash, Tea Tree; U=6; Cona=3.5; Salb=0.13; DiffusConst=40; DiffusSlope=16; CN2Bare=90; CNRed=20; CNCov=0.8; RootCN=40; RootWT=200; SoilCN=12.5; EnrACoeff=7.4; EnrBCoeff=0.2
      InitWater
        profile
          layer:
            sw     thickness
            0.180  150
            0.250  150
            0.230  300
            0.280  300
            0.340  300
      InitNitrogen
        profile
          layer:
            no3     nh4    thickness
            18.500  0.600  150
            9.200   0.100  150
            11.800  0.100  300
            11.200  0.100  300
            10.300  0.100  300
      profile
        layer:
          thickness  bd     ll15   airdry  dul    sat    swcon  fbiom  finert  oc     ph  ll SweetCorn  kl SweetCorn  xf SweetCorn  ll Broccoli  kl Broccoli  xf Broccoli
          150        1.260  0.140  0.100   0.370  0.450  0.500  0.030  0.400   1.250  7   0.140         0.200         1.000         0.140        0.050        1
          150        1.450  0.210  0.200   0.410  0.450  0.500  0.020  0.600   1.060  7   0.210         0.080         0.300         0.210        0.050        0.300
          300        1.270  0.210  0.200   0.400  0.450  0.500  0.010  0.800   0.810  7   0.300         0.080         1.000         0.210        0.050        1
          300        1.330  0.210  0.200   0.430  0.470  0.500  0.010  0.900   0.700  7   0.310         0.040         1.000         0.210        0.050        0
          300        1.410  0.210  0.200   0.390  0.440  0.500  0.010  0.950   0.700  7   0.270         0.040         1.000         0.210        0.040        0
    variables My Variables
      variable:
        dd/mm/yyyy as Date
        broccoli.das
        broccoli.biomass_wt
        broccoli.node_no
        broccoli.lai
        ep
        eo
        broccoli.floral_initiation_das
        broccoli.maturity_das
        broccoli.stage
        broccoli.cumvd
        broccoli.tt_tot()
        broccoli.swdef_photo
        broccoli.nfact_photo
        broccoli.temp_stress_photo
        Irrigation.irrigation
        broccoli.dlt_leaf_no
        broccoli.dlt_node_no
        broccoli.final_leaf_no
        broccoli.emergence_das
        broccoli.node_no_sen
        broccoli.node_no_fx
        sw_dep()
        broccoli.leaf_wt
        broccoli.stem_wt
        sw
    events My Variables Events: event=Daily
    variables FinalVariables
      variable:
        broccoli.sowing_date
        dd/mm/yyyy
        broccoli.floral_initiation_das
        broccoli.maturity_das
        broccoli.green_biomass_wt
        broccoli.floret_wt
        broccoli.stage
        broccoli.cumvd
        broccoli.tt_tot()
        broccoli.swdef_photo
        broccoli.nfact_photo
        broccoli.temp_stress_photo
        Irrigation.irrigation
        broccoli.dlt_leaf_no
        broccoli.dlt_node_no
        broccoli.final_leaf_no
        broccoli.emergence_das
        broccoli.node_no_sen
        broccoli.node_no_fx
        sw_dep()
    events FinalVariables Events: event=broccoli.harvesting
  folder Lawes2006
    simulation Lawes06 Planting1Wet
      clock
        start_date = 1/01/2006  # Select the start date of the simulation
        end_date = 1/10/2006  # Select the end date of the simulation
      summaryfile: filename=Lawes06.sum
      metfile met: filename=C:\development\apsim\Broccoli\Validation\DPI2006.met
      area Block
        registrations global
        manager
          rule Sowing fertiliser: same as Fiesta1997.Planting1.Manager.Sowing fertiliser
          rule Sow on a fixed date
            condition start_of_day:
              if (today = date('[date]') then
                                  [crop] sow plants =[density], sowing_depth = [depth], cultivar = [cultivar], row_spacing = [row_spacing]
                      endif
            category Sowing criteria
              date = 14-mar  # Enter sowing date (dd-mmm)
            category Sowing parameters
              crop = broccoli  # Enter name of crop to sow
              density = 4  # Enter sowing density (plants/m2)
              depth = 50  # Enter sowing depth (mm)
              cultivar = greenbelt  # Enter cultivar
              row_spacing = 600  # Enter row spacing (mm)
          rule Harvest on a Growth Stage: same as Fiesta1997.Planting1.Manager.Harvest on a Growth Stage
          rule Irrigate at sowing: same as Fiesta1997.Planting1.Manager.Irrigate at sowing
        fertiliser
        surfaceom surface organic matter
          PoolName = wheat  # Organic Matter pool name
          type = wheat  # Organic Matter type
          mass = 1000.  # Initial surface residue (kg/ha)
          cnr = 80.0  # C:N ration of initial residue
          standing_fraction = 0.0  # Fraction of residue standing
        outputfile: filename=Lawes06 Planting1Wet.out
          variables My Variables -> My Variables
          events My Variables Events -> My Variables Events
        broccoli
        outputfile final: filename=Lawes06 Planting1Wet final.out
          variables FinalVariables -> FinalVariables
          events FinalVariables Events -> FinalVariables Events
        Soil -> DPIGatton
        irrigation
          automatic_irrigation = on  # switch
          asw_depth = 600.0  # Depth to which ASW is calculated. (mm)
          crit_fr_asw = 0.5  # Fraction of ASW below which irrigation is applied (0-1.0)
          irrigation_efficiency = 1.0  # Efficiency of the irrigation. (0-1.0)
    simulation Lawes06 Planting2Wet
      clock
        start_date = 1/06/2006  # Select the start date of the simulation
        end_date = 1/10/2006  # Select the end date of the simulation
      summaryfile: filename=Lawes06.sum
      metfile met: filename=C:\development\apsim\Broccoli\Validation\DPI2006.met
      area Block
        registrations global
        manager
          rule Sowing fertiliser: same as Fiesta1997.Planting1.Manager.Sowing fertiliser
          rule Sow on a fixed date
            condition start_of_day:
              if (today = date('[date]') then
                                  [crop] sow plants =[density], sowing_depth = [depth], cultivar = [cultivar], row_spacing = [row_spacing]
                      endif
            category Sowing criteria
              date = 1-jun  # Enter sowing date (dd-mmm)
            category Sowing parameters
              crop = broccoli  # Enter name of crop to sow
              density = 4  # Enter sowing density (plants/m2)
              depth = 50  # Enter sowing depth (mm)
              cultivar = greenbelt  # Enter cultivar
              row_spacing = 600  # Enter row spacing (mm)
          rule Harvest on a Growth Stage: same as Fiesta1997.Planting1.Manager.Harvest on a Growth Stage
          rule Irrigate at sowing
            condition [modulename].[eventname]:
              if ([irrig_amount_evt] > 0) then
                          '[irrigatemodule]' apply amount = [irrig_amount_evt] (mm)
                       endif
            category When should irrigation be applied
              modulename = broccoli  # The module the event come from
              eventname = sowing  # Which event should irrigation be applied
            category Irrigation application details
              irrigatemodule = Irrigation  # Module used to apply the irrigation
              irrig_amount_evt = 10  # Amount of irrigation to apply (mm)
        fertiliser
        surfaceom surface organic matter
          PoolName = wheat  # Organic Matter pool name
          type = wheat  # Organic Matter type
          mass = 1000.  # Initial surface residue (kg/ha)
          cnr = 80.0  # C:N ration of initial residue
          standing_fraction = 0.0  # Fraction of residue standing
        outputfile: filename=Lawes06 Planting1Wet.out
          variables My Variables -> My Variables
          events My Variables Events -> My Variables Events
        broccoli
        outputfile final: filename=Lawes06 Planting1Wet final.out
          variables FinalVariables -> FinalVariables
          events FinalVariables Events -> FinalVariables Events
        Soil -> DPIGatton
        irrigation
          automatic_irrigation = off  # switch
          asw_depth = 600.0  # Depth to which ASW is calculated. (mm)
          crit_fr_asw = 0.5  # Fraction of ASW below which irrigation is applied (0-1.0)
          irrigation_efficiency = 1.0  # Efficiency of the irrigation. (0-1.0)
        operations
          20-jun  irrigation apply amount = 20
          30-jun  irrigation apply amount = 20
          10-jul  irrigation apply amount = 20
          20-jul  irrigation apply amount = 20
          30-jul  irrigation apply amount = 30
          10-aug  irrigation apply amount = 30
          20-aug  irrigation apply amount = 30
          30-aug  irrigation apply amount = 25
          10-sep  irrigation apply amount = 20
          20-sep  irrigation apply amount = 20
