simulations untitled: version=5
  simulation Sample Butterfly pea Simulation
    clock
      start_date = 1/01/1989  # Select the start date of the simulation
      end_date = 21/05/1989  # Select the end date of the simulation
    summaryfile: filename=Sample Butterfly pea Simulation.sum
    metfile met: filename=C:\development\apsim\met\sample\emerald.met
    area paddock
      registrations global
      manager
        rule Sowing rule
          condition start_of_day:
            if (paddock_is_fallow() = 1 and FallowIn <> 'yes' and (NextCrop = 0 or NextCrop = '[crop]')) then
                     if (date_within('[date1], [date2]') = 1) then
                        if (rain[[rainnumdays]] >= [raincrit] AND esw >= [esw_amount]) OR
                            ('[must_sow]' = 'yes' AND today = date('[date2]'))) THEN
                           ChooseNextCrop = 'yes'   ! for rotations
                           [crop] sow plants =[density], sowing_depth = [depth], cultivar = [cultivar], row_spacing = [row_spacing]
                        endif
                        if today = date('[date2]') then
                           ChooseNextCrop = 'yes'
                        endif
                     endif
                  endif
          category Sowing criteria
            date1 = 31-jan  # Enter sowing window START date (dd-mmm)
            date2 = 31-jan  # Enter sowing window END date (dd-mmm)
            must_sow = yes  # Must sow?
            raincrit = 30  # Amount of rainfall
            rainnumdays = 3  # Number of days of rainfall
            esw_amount = 200  # Enter minimum allowable available soil water (mm)
          category Sowing parameters
            crop = butterflypea  # Enter name of crop to sow
            density = 20  # Enter sowing density (plants/m2)
            depth = 30  # Enter sowing depth (mm)
            cultivar = milgarra  # Enter cultivar
            row_spacing = 300  # Enter row spacing (mm)
      fertiliser
      surfaceom surface organic matter
        PoolName = wheat  # Organic Matter pool name
        type = wheat  # Organic Matter type
        mass = 1000.  # Initial surface residue (kg/ha)
        cnr = 80.0  # C:N ratio of initial residue
        standing_fraction = 0.0  # Fraction of residue standing
      outputfile: filename=Sample Butterfly pea Simulation.out
        variables My Variables
          variable:
            dd/mm/yyyy as Date
            butterflypea.das
            butterflypea.lai
            butterflypea.biomass
            butterflypea.leaf_n
            butterflypea.n_fixed_tops
            butterflypea.root_n
            butterflypea.sw_stress_photo
            rain
            radn
            butterflypea.sw_stress_pheno
            butterflypea.sw_stress_fixation
            butterflypea.sw_stress_expan
            butterflypea.stage_name
        events My Variables Events: event=Daily
      butterflypea
      Soil #063 - Roma Res Stn, Roma,Brown Vertosol: region=Maranoa; site=Roma Res Stn, Roma; nearesttown=Roma, Q 4455; naturalvegetation=Mitchell grass, scattered Poplar Box; WaterFormat=VolumetricPercent
        DataSource=Data provided by B Robinson, S Cawley, G Thomas, extracted from ESD; estimated OC (WB*1.3); estimated pH; unknown EC, Cl
        Water: U=6; Cona=3.5; Salb=0.13; DiffusConst=40; DiffusSlope=16; CN2Bare=73; CNRed=20; CNCov=0.8
          layer:
            thickness  bd    ll15  airdry  dul   sat   swcon
            100        1.29  0.2   0.1     0.4   0.48  0.3
            100        1.32  0.22  0.198   0.41  0.47  0.3
            200        1.32  0.24  0.24    0.42  0.47  0.3
            200        1.33  0.26  0.26    0.42  0.47  0.3
            100        1.39  0.28  0.28    0.4   0.45  0.3
        Nitrogen: RootCN=40; RootWT=200; SoilCN=12.5; EnrACoeff=7.4; EnrBCoeff=0.2
          layer:
            fbiom  finert  oc    ph
            0.035  0.4     1.19  8.2
            0.02   0.6     1.01  8.5
            0.015  0.8     0.45  8.6
            0.015  0.9     0.3   8.6
            0.01   0.95    0.2   7.4
        InitWater
          sw=[0.38, 0.26, 0.25, 0.262, 0.28]
        other
          layer:
            ec  cl
            0   0
            0   0
            0   0
            0   0
            0   0
        InitNitrogen
          layer:
            no3  nh4
            6.5  0.6
            2.1  0.1
            2.1  0.1
            1.7  0.1
            1.7  0.1
        SoilCrop Wheat
          layer:
            ll    kl
            0.2   0.06
            0.22  0.06
            0.24  0.04
            0.26  0.04
            0.28  0.03
        SoilCrop Barley
          kl=[0.07, 0.07, 0.07, 0.05, 0.05]
        SoilCrop Butterflypea
          layer:
            ll    xf  kl
            0.2   1   0.08
            0.22  1   0.08
            0.24  1   0.08
            0.26  1   0.08
            0.28  1   0.05
  shared
