folder Simulations: version=14
  simulation MelliodoraW30
    clock
      start_date = 01/01/1889  # Select the start date of the simulation
      end_date = 04/09/2006  # Select the end date of the simulation
    summaryfile: filename=Continuous Wheat Simulation.sum
    metfile met -> /Simulations/shared/met
    area paddock
      registrations global
      operations
        21-feb  Emelliodora establish plants = 62500, init_section = seedling
        21-feb  'Wellcamp Water' reset
        21-feb  Irrigation apply amount = 30
        21-aug  emelliodora kill
      outputfile -> /Simulations/shared/outputfile
      irrigation
        automatic_irrigation = off
        asw_depth = 600.0  # Depth to which ASW is calculated. (mm)
        crit_fr_asw = 0.5  # Fraction of ASW below which irrigation is applied (0-1.0)
        irrigation_efficiency = 1.0  # Efficiency of the irrigation. (0-1.0)
      surfaceom surface organic matter -> /Simulations/shared/surface organic matter
      Emelliodora -> /Simulations/shared/Emelliodora
      manager OutputCalculator -> /Simulations/shared/OutputCalculator
      micromet: soilalbedo=0.13; a_interception=0.0; b_interception=0.0; c_interception=0.0; d_interception=0.0
      soil WellCamp -> /Simulations/shared/WellCamp
  simulation MelliodoraW60
    clock
      start_date = 01/01/1889  # Select the start date of the simulation
      end_date = 04/09/2006  # Select the end date of the simulation
    summaryfile: filename=Continuous Wheat Simulation.sum
    metfile met -> /Simulations/shared/met
    area paddock
      registrations global
      operations
        21-feb  Emelliodora establish plants = 62500, init_section = seedling
        21-feb  'Wellcamp Water' reset
        21-feb  Irrigation apply amount = 60
        21-aug  emelliodora kill
      outputfile -> /Simulations/shared/outputfile
      irrigation
        automatic_irrigation = off
        asw_depth = 600.0  # Depth to which ASW is calculated. (mm)
        crit_fr_asw = 0.5  # Fraction of ASW below which irrigation is applied (0-1.0)
        irrigation_efficiency = 1.0  # Efficiency of the irrigation. (0-1.0)
      surfaceom surface organic matter -> /Simulations/shared/surface organic matter
      Emelliodora -> /Simulations/shared/Emelliodora
      manager OutputCalculator -> /Simulations/shared/OutputCalculator
      micromet: soilalbedo=0.13; a_interception=0.0; b_interception=0.0; c_interception=0.0; d_interception=0.0
      soil WellCamp -> /Simulations/shared/WellCamp
  simulation MelliodoraW90
    clock
      start_date = 01/01/1889  # Select the start date of the simulation
      end_date = 04/09/2006  # Select the end date of the simulation
    summaryfile: filename=Continuous Wheat Simulation.sum
    metfile met -> /Simulations/shared/met
    area paddock
      registrations global
      operations
        21-feb  Emelliodora establish plants = 62500, init_section = seedling
        21-feb  'Wellcamp Water' reset
        21-feb  Irrigation apply amount = 90
        21-aug  emelliodora kill
      outputfile -> /Simulations/shared/outputfile
      irrigation
        automatic_irrigation = off
        asw_depth = 600.0  # Depth to which ASW is calculated. (mm)
        crit_fr_asw = 0.5  # Fraction of ASW below which irrigation is applied (0-1.0)
        irrigation_efficiency = 1.0  # Efficiency of the irrigation. (0-1.0)
      surfaceom surface organic matter -> /Simulations/shared/surface organic matter
      Emelliodora -> /Simulations/shared/Emelliodora
      manager OutputCalculator -> /Simulations/shared/OutputCalculator
      micromet: soilalbedo=0.13; a_interception=0.0; b_interception=0.0; c_interception=0.0; d_interception=0.0
      soil WellCamp -> /Simulations/shared/WellCamp
  folder shared
    outputfile
      variables
        variables: dd/mm/yyyy as Date, day, lai, adm_green(1) as stem_wt, foliage_mass as leaf_wt, fw, fn, rain, irrigation, es, sw, sw_dep(), ft, plantleaf, plantstem, plantla, plantbiomass, swsi, plants, slai, no3(), nh4(), root_depth, rlv, ep, eo, rtr, sw150, petr, peta, ffasw, height, ftcanopy, sw_demand, sw_supply, runoff, cum_stress, esw, fwcanopy, ga, biomass, fvpd
      events Reporting Frequency: event=emelliodora.killing
    Emelliodora
    surfaceom surface organic matter
      PoolName = wheat  # Organic Matter pool name
      type = wheat  # Organic Matter type
      mass = 0.1  # Initial surface residue (kg/ha)
      cnr = 80.0  # C:N ratio of initial residue
      standing_fraction = 0.0  # Fraction of residue standing
    metfile met: filename=C:\development\apsim\Emelliodora\Sensibility\Dalby.met
    climatechange ShelterEffects
      maxtmodifier = 0  # Change in maximum temperature in degrees celsius
      mintmodifier = 0  # Change in minimum temperature in degrees celsius
      rainmodifier = 0  # Relative change in rainfall
      radiationmodifier = 0.82  # Relative change in radiation
      co2 = 350  # Atmospheric C02 concentration (ppm)
    manager OutputCalculator
      on init:
```
 
plantbiomass = 0 
plantleaf = 0
plantstem = 0
plantla = 0
SWSI = 0
nodes = 0
RTR = 0
sw150 = 0
windspeed = 5.55 ! (m/s) ! 20 km/h average at both 9am and 3pm
```
      on endofday:
```
if lai > 0 then
   plantbiomass = biomass/plants*1000
   plantleaf = foliage_mass/plants*1000
   plantstem = adm_green(1)/ plants*1000
   plantla = lai * 10000 / plants
   SWSI = SWSI + (1.0 - swdef_photo)
   RTR = ep / (eo * cover_green)
endif
  sw150 = sw_dep(1) + sw_dep(2) + sw_dep(3) + sw_dep(4) + sw_dep(5) + sw_dep(6)
  sw60 = sw_dep(1) + sw_dep(2) + sw_dep(3)
  ll60 = ll15_dep(1) + ll15_dep(2) + ll15_dep(3)
  dul60 = dul_dep(1) + dul_dep(2) + dul_dep(3)
```
    soil WellCamp: Site=Jimbour; Region=South East Queensland; LocalName=Waco; SoilType=Black Vertosol; NearestTown=Jimbour, Q 4352; NaturalVegetation=Grassland, mainly Qld bluegrass; Cona=5; DiffusConst=20; DiffusSlope=8; U=5; Salb=0.09; Cn2Bare=85; CnRed=0; CnCov=0.8; CnCanopyFact=1; RootCn=40; RootWt=200; SoilCn=12.5; EnrACoeff=7.4; EnrBCoeff=0.2
      ec=[0.84, 0.84, 0.84, 0.84]
      profile
        layer:
          thickness  bd    ll15  airdry  dul   sat   sw       swcon  oc    ph   fbiom  finert  no3  nh4  ec    ll Emelliodora  xf Emelliodora  kl Emelliodora
          150        0.9   0.19  0.19    0.54  0.59  9999.99  0.3    1.04  8.4  0.025  0.4     6.5  0.6  0.2   0.19            0.21            0.013
          150        1.01  0.32  0.25    0.52  0.58  9999.99  0.3    0.89  8.8  0.02   0.6     2.1  0.1  0.25  0.32            0.2             0.013
          300        1.02  0.38  0.3     0.52  0.59  9999.99  0.3    0.89  9    0.015  0.8     2.1  0.1  0.31  0.38            1               0.017
          300        1     0.3   0.25    0.48  0.53  9999.99  0.3    0.89  9.2  0.01   0.9     1.7  0.1  0.4   0.3             1               0.02
          300        1.06  0.25  0.21    0.42  0.47  9999.99  0.3    0.77  9.2  0.01   0.95    1.7  0.1  0.59  0.25            1               0.025
          300        1.14  0.28  0.21    0.4   0.45  9999.99  0.3    0.45  9.1  0.01   0.95    1.7  0.1  0.84  0.28            1               0.025
          300        1.23  0.3   0.21    0.4   0.45  9999.99  0.3    0.45  9.1  0.01   0.95    1.7  0.1  0.84  0.3             1               0.025
          300        1.23  0.3   0.21    0.4   0.45  9999.99  0.3    0.45  9.1  0.01   0.95    1.7  0.1  0.84  0.3             1               0.025
          400        1.23  0.3   0.21    0.4   0.45  9999.99  0.3    0.45  9.1  0.01   0.95    1.7  0.1  -     0.3             1               0.025
          500        1.23  0.3   0.21    0.4   0.45  9999.99  0.3    0.45  9.1  0.01   0.95    1.7  0.1  -     0.3             1               0.025
          500        1.23  0.3   0.21    0.4   0.45  9999.99  0.3    0.45  9.1  0.01   0.95    1.7  0.1  -     0.3             0               0.025
          500        1.23  0.3   0.21    0.4   0.45  9999.99  0.3    0.45  9.1  0.01   0.95    1.7  0.1  -     0.3             0               0.025
      InitWater: RelativeTo=Emelliodora
        PercentMethod: Percent=0.00; Distributed=Filled from top
      InitNitrogen
        profile
          layer:
            no3    nh4    thickness
            6.503  0.599  150
            5      0.100  150
            5      0.100  300
            5      0.100  300
            5      0.100  300
            5      0.100  300
            5      0.100  300
            5      0.100  300
            5      0.100  400
            5      0.100  500
            5      0.100  500
            5      0.100  500
