folder Simulations: version=9
  simulation Sample Potato Simulation
    metfile met: filename=C:\development\apsim\met\sample\Gatton.met
    clock
      start_date = 1/01/1999  # Select the start date of the simulation
      end_date = 31/12/1999  # Select the end date of the simulation
    summaryfile: filename=Continuous Wheat Simulation.sum
    area paddock
      registrations global
      manager
        rule Sowing rule
          condition start_of_day:
            if (paddock_is_fallow() = 1 and FallowIn <> 'yes' and (NextCrop = 0 or NextCrop = '[crop]')) then
                     if (date_within('[date1], [date2]') = 1) then
                        if (rain[[rainnumdays]] >= [raincrit] AND esw >= [esw_amount]) OR
                            ('[must_sow]' = 'yes' AND today = date('[date2]'))) THEN
                           ChooseNextCrop = 'yes'   ! for rotations
                           stf = st(1) / 10.
                           if (stf < 0) then
                              stf = 0
                           endif
                           if (stf > 1) then
                              stf = 1
                           endif
                           swf = (sw(1) - ll(1))/(dul(1) - ll(1))
                           if (swf < 0) then
                              swf = 0
                           endif
                           if (swf > 1) then
                              swf = 1
                           endif
                           density = [seeds] !* [age]/2000. * stf * swf
                           [crop] sow plants = density, sowing_depth = [depth], cultivar = [cultivar], row_spacing = [row_spacing], crop_class = [class]
                        endif
                        if today = date('[date2]') then
                           ChooseNextCrop = 'yes'
                        endif
                     endif
                  endif
          category Sowing criteria
            date1 = 15-may  # Enter sowing window START date (dd-mmm)
            date2 = 10-jul  # Enter sowing window END date (dd-mmm)
            must_sow = yes  # Must sow?
            raincrit = 10  # Amount of rainfall
            rainnumdays = 7  # Number of days of rainfall
            esw_amount = 10  # Enter minimum allowable available soil water (mm)
          category Sowing parameters
            crop = potato  # Enter name of crop to sow
            seeds = 5  # Enter sowing density (seeds/m2)
            depth = 30  # Enter sowing depth (mm)
            cultivar = russet  # Enter cultivar
            class = plant  # Enter crop growth class
            age = 1000  # Enter physiological age (deg days)
            row_spacing = 250  # Enter row spacing (mm)
        rule Harvesting rule
          condition end_of_day:
            if [crop].stage_name = 'maturity' or [crop].plant_status = 'dead' then
                          [crop]  harvest
                          [crop]  end_crop
                       endif
          category Harvesting criteria
            crop = potato  # Enter name of crop to harvest when ripe
        rule Sowing fertiliser
          condition [modulename].[eventname]=[fertmodule] apply amount = [fert_amount_sow] (kg/ha), depth = 50 (mm), type = [fert_type_sow]
          category When should fertiliser be applied
            modulename = potato  # On which module should the event come from
            eventname = sowing  # On which event should fertiliser be applied
          category Fertiliser application details
            fertmodule = fertiliser  # Module used to apply the fertiliser
            fert_amount_sow = 150  # Amount of starter fertiliser at sowing (kg/ha)
            fert_type_sow = urea_N  # Sowing fertiliser type
      fertiliser
      surfaceom surface organic matter
        PoolName = wheat  # Organic Matter pool name
        type = wheat  # Organic Matter type
        mass = 1000.  # Initial surface residue (kg/ha)
        cnr = 80.0  # C:N ratio of initial residue
        standing_fraction = 0.0  # Fraction of residue standing
      outputfile
        variables
          variables: dd/mm/yyyy as Date, biomass, lai, leaf_wt, stem_wt, tuber_wt, st(1), plants, node_no, node_no_fx, leaf_no
        events Reporting Frequency: event=Daily
      soil Loam: Site=Jimbour; Region=South East Queensland; LocalName=Waco; SoilType=Loam; NearestTown=Jimbour, Q 4352; NaturalVegetation=Grassland, mainly Qld bluegrass; Cona=3.5; DiffusConst=40; DiffusSlope=16; U=6; Salb=0.13; Cn2Bare=73; CnRed=20; CnCov=0.8; CnCanopyFact=1; RootCn=40; RootWt=200; SoilCn=12.5; EnrACoeff=7.4; EnrBCoeff=0.2
        profile
          layer:
            thickness  bd    ll15  airdry  dul   sat   sw       swcon  oc    ph   fbiom  finert  no3  nh4  ec    ll Potato  kl Potato  xf Potato  ll Wheat  kl Wheat  xf Wheat
            150        1.02  0.29  0.15    0.54  0.59  9999.99  0.3    1.04  8.4  0.025  0.4     6.5  0.6  0.2   0.29       0.06       1          0.29      0.06      1
            150        1.03  0.29  0.26    0.53  0.58  9999.99  0.3    0.89  8.8  0.02   0.6     2.1  0.1  0.25  0.29       0.06       1          0.29      0.06      1
            300        1.02  0.29  0.29    0.54  0.59  9999.99  0.3    0.89  9    0.015  0.8     2.1  0.1  0.31  0.29       0.06       1          0.29      0.06      1
            300        1.02  0.29  0.29    0.54  0.58  9999.99  0.3    0.89  9.2  0.01   0.9     1.7  0.1  0.4   0.29       0.06       1          0.29      0.06      1
            300        1.06  0.3   0.3     0.52  0.57  9999.99  0.3    0.77  9.2  0.01   0.95    1.7  0.1  0.59  0.3        0.06       1          0.3       0.06      1
            300        1.11  0.31  0.31    0.5   0.55  9999.99  0.3    0.45  9.1  0.01   0.95    1.7  0.1  0.84  0.31       0.06       1          0.31      0.06      1
        InitWater
          percentmethod: percent=1; distributed=filled from top
        InitNitrogen
          profile
            layer:
              no3      nh4       thickness
              6.50295  0.599008  150
              2.10098  0.100001  150
              2.10098  0.100001  300
              1.70099  0.100001  300
              1.70099  0.100001  300
              1.70099  0.100001  300
      potato
