simulations SweetCornValidation: version=5
  simulation NZIrrigation
    clock
      start_date = 30/10/1996  # Select the start date of the simulation
      end_date = 22/03/1997  # Select the end date of the simulation
    summaryfile: filename=NZIrrigation.sum
    metfile met: filename=D:\development\apsim\SweetCorn\Validation\Lincoln9697.met
    area FI
      registrations global
      fertiliser
      surfaceom surface organic matter
        PoolName = wheat  # Organic Matter pool name
        type = wheat  # Organic Matter type
        mass = 10  # Initial surface residue (kg/ha)
        cnr = 80.0  # C:N ration of initial residue
        standing_fraction = 0.0  # Fraction of residue standing
      SweetCorn
      outputfile: filename=NZIrrigation FI.out
        variables My Variables -> My Variables
        events My Variables Events -> My Variables Events
      irrigation
        automatic_irrigation = switch  # switch
        asw_depth = 600.0  # Depth to which ASW is calculated. (mm)
        crit_fr_asw = 0.5  # Fraction of ASW below which irrigation is applied (0-1.0)
        irrigation_efficiency = 1.0  # Efficiency of the irrigation. (0-1.0)
      soil -> Lincoln
      manager -> LincolnCrop
    area FD
      registrations global
      fertiliser
      surfaceom surface organic matter
        PoolName = wheat  # Organic Matter pool name
        type = wheat  # Organic Matter type
        mass = 10  # Initial surface residue (kg/ha)
        cnr = 80.0  # C:N ration of initial residue
        standing_fraction = 0.0  # Fraction of residue standing
      SweetCorn
      irrigation
        automatic_irrigation = off  # switch
        asw_depth = 600.0  # Depth to which ASW is calculated. (mm)
        crit_fr_asw = 0.5  # Fraction of ASW below which irrigation is applied (0-1.0)
        irrigation_efficiency = 1.0  # Efficiency of the irrigation. (0-1.0)
      outputfile: filename=NZIrrigation FD.out
        variables My Variables -> My Variables
        events My Variables Events -> My Variables Events
      soil -> Lincoln
      manager -> LincolnCrop
  simulation Lawes
    clock
      start_date = 20/11/2005  # Select the start date of the simulation
      end_date = 16/02/2006  # Select the end date of the simulation
    summaryfile: filename=Lawes.sum
    metfile met: filename=D:\development\apsim\SweetCorn\Validation\Lawes.met
    area RD
      registrations global
      fertiliser
      surfaceom surface organic matter
        PoolName = wheat  # Organic Matter pool name
        type = wheat  # Organic Matter type
        mass = 10  # Initial surface residue (kg/ha)
        cnr = 80.0  # C:N ration of initial residue
        standing_fraction = 0.0  # Fraction of residue standing
      SweetCorn
      outputfile: filename=Lawes RD.out
        variables My Variables -> My Variables
        events My Variables Events -> My Variables Events
      outputfile FinalOutput: filename=Lawes RD FinalOutput.out
        variables FinalVariables -> FinalVariables
        events FinalVariables Events -> FinalVariables Events
      Soil -> DPIGatton
      manager -> LawesCrop
      operations
        22-nov  Irrigation apply amount = 12
        8-dec  Irrigation apply amount = 3.8
        10-dec  Irrigation apply amount = 14.9
        13-dec  Irrigation apply amount = 7.6
        15-dec  Irrigation apply amount = 10
        20-dec  fertiliser apply amount = 15, type = no3_n, depth = 50
        20-dec  Irrigation apply amount = 9.8
        22-dec  Irrigation apply amount = 9.3
        23-dec  Irrigation apply amount = 13.6
        24-dec  Irrigation apply amount = 6.6
        29-dec  Irrigation apply amount = 21.1
        4-jan  Irrigation apply amount = 13.7
        5-jan  fertiliser apply amount = 15, type = no3_n, depth = 50
        6-jan  Irrigation apply amount = 14.8
        14-jan  Irrigation apply amount = 13
        17-jan  Irrigation apply amount = 19.4
        19-jan  Irrigation apply amount = 12.5
        25-jan  fertiliser apply amount = 15, type = no3_n, depth = 50
        26-jan  Irrigation apply amount = 13.5
        28-jan  Irrigation apply amount = 19.1
        31-jan  Irrigation apply amount = 14.1
        3-feb  Irrigation apply amount = 26
        8-feb  Irrigation apply amount = 19
        11-feb  Irrigation apply amount = 16.6
        13-feb  Sweetcorn harvest
        13-feb  Sweetcorn end_crop
      irrigation
        automatic_irrigation = off  # switch
        asw_depth = 600.0  # Depth to which ASW is calculated. (mm)
        crit_fr_asw = 0.5  # Fraction of ASW below which irrigation is applied (0-1.0)
        irrigation_efficiency = 1.0  # Efficiency of the irrigation. (0-1.0)
    area Dry
      registrations global
      fertiliser
      surfaceom surface organic matter
        PoolName = wheat  # Organic Matter pool name
        type = wheat  # Organic Matter type
        mass = 10  # Initial surface residue (kg/ha)
        cnr = 80.0  # C:N ration of initial residue
        standing_fraction = 0.0  # Fraction of residue standing
      SweetCorn
      outputfile: filename=Lawes Dry.out
        variables My Variables -> My Variables
        events My Variables Events -> My Variables Events
      Soil -> DPIGatton
      outputfile FinalOutput: filename=Lawes Dry FinalOutput.out
        variables FinalVariables -> FinalVariables
        events FinalVariables Events -> FinalVariables Events
      manager -> LawesCrop
      operations
        22-nov  irrigation apply amount = 12
        8-dec  irrigation apply amount = 4
        10-dec  irrigation apply amount = 14.5
        20-dec  irrigation apply amount = 9.2
        20-dec  fertiliser apply amount = 15, type = no3_n, depth = 50
        22-dec  irrigation apply amount = 5.6
        23-dec  irrigation apply amount = 6.8
        24-dec  irrigation apply amount = 10.1
        5-jan  fertiliser apply amount = 15, type = no3_n, depth = 50
        6-jan  irrigation apply amount = 7.2
        25-jan  fertiliser apply amount = 15, type = no3_n, depth = 50
        26-jan  irrigation apply amount = 7
        13-feb  Sweetcorn harvest
        13-feb  Sweetcorn end_crop
      irrigation
        automatic_irrigation = off  # switch
        asw_depth = 600.0  # Depth to which ASW is calculated. (mm)
        crit_fr_asw = 0.5  # Fraction of ASW below which irrigation is applied (0-1.0)
        irrigation_efficiency = 1.0  # Efficiency of the irrigation. (0-1.0)
  folder shared
    soil Lincoln: Site=UQ, Lawes; Region=Lockyer; SoilType=Black Vertosol; NearestTown=Gatton, Q 4343; NaturalVegetation=Blue Gum, Moreton Bay Ash, Tea Tree; Comment=oc and ph not measured; WaterFormat=VolumetricPercent
      Water: Cona=3.5; DiffusConst=40; DiffusSlope=16; U=6; Salb=0.13; Cn2Bare=73; CnRed=20; CnCov=0.8
        layer:
          thickness  bd    ll15  airdry  dul   sat   sw       swcon
          150        1.32  0.10  0.05    0.29  0.35  9999.99  0.3
          150        1.3   0.10  0.10    0.29  0.35  9999.99  0.3
          300        1.23  0.10  0.10    0.29  0.35  9999.99  0.3
          300        1.27  0.10  0.10    0.29  0.35  9999.99  0.3
          300        1.37  0.10  0.10    0.29  0.35  9999.99  0.3
          300        1.35  0.10  0.10    0.29  0.35  9999.99  0.3
          300        1.35  0.10  0.10    0.29  0.35  9999.99  0.3
      Nitrogen: CnCanopyFact=1; RootCn=40; RootWt=200; SoilCn=12.5; EnrACoeff=7.4; EnrBCoeff=0.2
        layer:
          fbiom  finert  no3  nh4  oc    ph
          0.03   0.4     6.5  0.6  1.24  7
          0.02   0.6     2.1  0.1  1.24  7
          0.01   0.8     2.1  0.1  1.25  7
          0.01   0.9     1.7  0.1  1.1   7
          0.01   0.95    1.7  0.1  0.71  7
          0.01   0.95    1.7  0.1  0.34  7
          0.01   0.95    1.7  0.1  0.26  7
      InitWater
        PercentMethod: Percent=0.83; Distributed=Filled from top
      InitNitrogen
        layer:
          no3      nh4
          6.49399  0.608229
          2.09806  0.101371
          2.09806  0.101371
          1.69843  0.101371
          1.69843  0.101371
          1.69843  0.101371
          1.69843  0.101371
      SoilCrop SweetCorn
        layer:
          ll    kl    xf
          0.10  0.10  1.00
          0.10  0.10  1.00
          0.10  0.08  1.00
          0.10  0.06  1.00
          0.10  0.04  1.00
          0.10  0.02  1.00
          0.10  0.01  1.00
    manager LincolnCrop
      rule Harvesting rule
        condition end_of_day:
          if [crop].stage_name = 'harvest_ripe' or [crop].plant_status = 'dead' then
                        [crop]  harvest
                        [crop]  end_crop
                     endif
        category Harvesting criteria
          crop = Sweetcorn  # Enter name of crop to harvest when ripe
      rule Sowing fertiliser
        condition [modulename].[eventname]=[fertmodule] apply amount = [fert_amount_sow] (kg/ha), depth = 50 (mm), type = [fert_type_sow]
        category When should fertiliser be applied
          modulename = SweetCorn  # On which module should the event come from
          eventname = sowing  # On which event should fertiliser be applied
        category Fertiliser application details
          fertmodule = fertiliser  # Module used to apply the fertiliser
          fert_amount_sow = 24  # Amount of starter fertiliser at sowing (kg/ha)
          fert_type_sow = NO3_N  # Sowing fertiliser type
      rule Sow on a fixed date
        condition start_of_day:
          if (today = date('[date]') then
                              [crop] sow plants =[density], sowing_depth = [depth], cultivar = [cultivar], row_spacing = [row_spacing]
                  endif
        category Sowing criteria
          date = 30-oct  # Enter sowing date (dd-mmm)
        category Sowing parameters
          crop = SweetCorn  # Enter name of crop to sow
          density = 5.7  # Enter sowing density (plants/m2)
          depth = 50  # Enter sowing depth (mm)
          cultivar = challenger  # Enter cultivar
          row_spacing = 700  # Enter row spacing (mm)
      rule Fertilise on fixed date
        condition start_of_day:
          if (today = date('[fert_date]') then
                      N_topsoil = no3(1) + nh4(1) + no3(2) + nh4(2)
                      if (N_topsoil < [fert_criteria]) then
                         [fertmodule] apply amount = [fert_amount] (kg/ha), depth = 50 (mm), type = [fert_type] ()
                      endif
                   endif
        category When should fertiliser be applied
          fert_date = 20-nov  # Enter fertiliser date (dd-mmm)
          fert_criteria = 1000  # Don't add fertiliser if N in top 2 layers exceeds (kg/ha)
        category Fertiliser application details
          fertmodule = fertiliser  # Module used to apply the fertiliser
          fert_amount = 200  # Amount of fertiliser to apply (kg/ha)
          fert_type = urea_N  # Sowing fertiliser type
    Soil DPIGatton: region=Lockyer; site=UQ, Lawes; SoilType=Prarie; nearesttown=Gatton, Q 4343; comment=oc and ph estimated; naturalvegetation=Blue Gum, Moreton Bay Ash, Tea Tree; WaterFormat=VolumetricPercent
      Water: U=6; Cona=3.5; Salb=0.13; DiffusConst=40; DiffusSlope=16; CN2Bare=90; CNRed=20; CNCov=0.8
        layer:
          thickness  bd     ll15  airdry  dul   sat   swcon
          150        1.260  0.14  0.10    0.37  0.45  0.50
          150        1.450  0.21  0.20    0.41  0.46  0.50
          300        1.270  0.30  0.20    0.40  0.45  0.50
          300        1.330  0.31  0.20    0.43  0.47  0.50
          300        1.410  0.27  0.20    0.39  0.44  0.50
          300        1.390  0.36  0.20    0.40  0.45  0.50
      Nitrogen: RootCN=40; RootWT=200; SoilCN=12.5; EnrACoeff=7.4; EnrBCoeff=0.2
        layer:
          fbiom  finert  oc    ph
          0.03   0.4     1.25  7
          0.02   0.6     1.06  7
          0.01   0.8     0.81  7
          0.01   0.9     0.70  7
          0.01   0.95    0.70  7
          0.01   0.95    0.70  7
      InitWater
        sw=[0.28, 0.35, 0.37, 0.42, 0.37, 0.36]
      other
      InitNitrogen
        layer:
          no3     nh4
          18.500  0.6
          9.200   0.1
          11.800  0.1
          11.200  0.1
          10.300  0.1
          14.000  0.1
      SoilCrop SweetCorn
        layer:
          ll    kl    xf
          0.14  0.20  1.00
          0.21  0.08  0.30
          0.30  0.08  1.00
          0.31  0.04  1.00
          0.27  0.04  1.00
          0.36  0.02  1.00
    manager LawesCrop
      rule Harvesting rule
        condition end_of_day:
          if [crop].stage_name = 'harvest_ripe' or [crop].plant_status = 'dead' then
                        [crop]  harvest
                        [crop]  end_crop
                     endif
        category Harvesting criteria
          crop = Sweetcorn  # Enter name of crop to harvest when ripe
      rule Sow on a fixed date
        condition start_of_day:
          if (today = date('[date]') then
                              [crop] sow plants =[density], sowing_depth = [depth], cultivar = [cultivar], row_spacing = [row_spacing]
                  endif
        category Sowing criteria
          date = 21-nov  # Enter sowing date (dd-mmm)
        category Sowing parameters
          crop = SweetCorn  # Enter name of crop to sow
          density = 5.7  # Enter sowing density (plants/m2)
          depth = 50  # Enter sowing depth (mm)
          cultivar = h5  # Enter cultivar
          row_spacing = 700  # Enter row spacing (mm)
    operations
    variables My Variables
      variables: dd/mmm/yyyy as Date, SweetCorn.zadok_stage, SweetCorn.lai, SweetCorn.leaf_wt, SweetCorn.stem_wt, SweetCorn.head_wt, SweetCorn.biomass_wt, SweetCorn.swdef_photo, SweetCorn.node_no, SweetCorn.node_no_sen, SweetCorn.node_no_fx, SweetCorn.nfact_photo, SweetCorn.temp_stress_photo, SweetCorn.tt_tot, SweetCorn.das, Irrigation.irrigation, SweetCorn.root_depth, DPIGatton Water.sw_dep(), DPIGatton Water.sw, SweetCorn.dlt_lai_pot, SweetCorn.ep, SweetCorn.sw_demand, SweetCorn.nfact_expan, SweetCorn.swdef_expan, DPIGatton Water.runoff, DPIGatton Water.es, wheat.nfact_expan, wheat.root_depth, wheat.ep, eo
    events My Variables Events: event=Daily
    variables FinalVariables
      variables: dd/mm/yyyy as Date, SweetCorn.leaf_area_max, SweetCorn.leaf_area, SweetCorn.leaf_wt, SweetCorn.stem_wt, SweetCorn.head_wt, SweetCorn.biomass_wt, SweetCorn.swdef_photo, SweetCorn.node_no, SweetCorn.node_no_sen, SweetCorn.node_no_fx, SweetCorn.nfact_photo, SweetCorn.temp_stress_photo, SweetCorn.tt_tot, SweetCorn.das, Irrigation.irrigation, SweetCorn.root_depth, DPIGatton Water.sw_dep(), DPIGatton Water.sw, SweetCorn.dlt_lai_pot, SweetCorn.ep, SweetCorn.sw_demand, SweetCorn.nfact_expan, SweetCorn.swdef_expan, DPIGatton Water.runoff, DPIGatton Water.es, wheat.nfact_expan, wheat.root_depth, wheat.ep, eo
    events FinalVariables Events: event=SweetCorn.harvesting
  simulation Lawes{2}
    clock
      start_date = 20/11/2005  # Select the start date of the simulation
      end_date = 16/02/2006  # Select the end date of the simulation
    summaryfile: filename=Lawes{2}.sum
    metfile met: filename=D:\development\apsim\SweetCorn\Validation\Lawes.met
    area RD
      registrations global
      fertiliser
      surfaceom surface organic matter
        PoolName = wheat  # Organic Matter pool name
        type = wheat  # Organic Matter type
        mass = 10  # Initial surface residue (kg/ha)
        cnr = 80.0  # C:N ration of initial residue
        standing_fraction = 0.0  # Fraction of residue standing
      SweetCorn
      outputfile: filename=Lawes{2} RD.out
        variables My Variables -> My Variables
        events My Variables Events -> My Variables Events
      outputfile FinalOutput: filename=Lawes{2} RD FinalOutput.out
        variables FinalVariables -> FinalVariables
        events FinalVariables Events -> FinalVariables Events
      Soil -> DPIGatton
      manager -> LawesCrop
      operations: same as Lawes.RD.operations
      irrigation
        automatic_irrigation = off  # switch
        asw_depth = 600.0  # Depth to which ASW is calculated. (mm)
        crit_fr_asw = 0.5  # Fraction of ASW below which irrigation is applied (0-1.0)
        irrigation_efficiency = 1.0  # Efficiency of the irrigation. (0-1.0)
