simulations untitled: version=14
  simulation PacSeeds
    clock
      start_date = 1/09/2004  # Select the start date of the simulation
      end_date = 30/06/2005  # Select the end date of the simulation
    summaryfile: filename=PacSeeds.sum
    metfile met: filename=lawes0405.met
    area Planting1
      registrations global
      folder Manager folder
        manager Harvesting rule
          crop = SweetSorghum  # Enter name of crop to harvest when ripe
          on end_of_day:
```
           if [crop].StageName = 'harvest_ripe' or [crop].plant_status = 'dead' then
              [crop]  harvest
              [crop]  end_crop
           endif
```
        manager Sowing fertiliser
          modulename = SweetSorghum  # On which module should the event come from
          eventname = sowing  # On which event should fertiliser be applied
          fertmodule = fertiliser  # Module used to apply the fertiliser
          fert_amount_sow = 300  # Amount of starter fertiliser at sowing (kg/ha)
          fert_type_sow = NO3_N  # Sowing fertiliser type
          on [modulename].[eventname]:
```
        [fertmodule] apply amount = [fert_amount_sow] (kg/ha), depth = 50 (mm), type = [fert_type_sow]
```
        manager Sow on a fixed date
          date = 15-sep  # Enter sowing date (dd-mmm)
          crop = SweetSorghum  # Enter name of crop to sow
          density = 10  # Enter sowing density (plants/m2)
          depth = 50  # Enter sowing depth (mm)
          cultivar = sugargraze  # Enter cultivar
          row_spacing = 600  # Enter row spacing (mm)
          on start_of_day:
```
      if (today = date('[date]') then
                    [crop] sow plants =[density], sowing_depth = [depth], cultivar = [cultivar], row_spacing = [row_spacing]
        endif
```
      fertiliser
      surfaceom surface organic matter
        PoolName = wheat  # Organic Matter pool name
        type = wheat  # Organic Matter type
        mass = 1000.  # Initial surface residue (kg/ha)
        cnr = 80.0  # C:N ration of initial residue
        standing_fraction = 0.0  # Fraction of residue standing
      soil LawesSoil -> /untitled/shared/LawesSoil
      SweetSorghum
      outputfile: filename=PacSeeds Planting1.out
        variables My Variables
          variables: dd/mm/yyyy as Date, SweetSorghum.zadok_stage, SweetSorghum.lai, SweetSorghum.LeafGreenWt, SweetSorghum.StemGreenWt, SweetSorghum.head_wt, SweetSorghum.biomass_wt
        events My Variables Events: event=Daily
      irrigation
        automatic_irrigation = on  # switch
        asw_depth = 600.0  # Depth to which ASW is calculated. (mm)
        crit_fr_asw = 0.5  # Fraction of ASW below which irrigation is applied (0-1.0)
        irrigation_efficiency = 1.0  # Efficiency of the irrigation. (0-1.0)
    area Planting2
      registrations global
      folder Manager folder
        manager Harvesting rule
          crop = SweetSorghum  # Enter name of crop to harvest when ripe
          on end_of_day:
          script: same as in PacSeeds.Planting1.Manager folder.Harvesting rule
        manager Sowing fertiliser: same as PacSeeds.Planting1.Manager folder.Sowing fertiliser
        manager Sow on a fixed date
          date = 12-jan  # Enter sowing date (dd-mmm)
          crop = SweetSorghum  # Enter name of crop to sow
          density = 10  # Enter sowing density (plants/m2)
          depth = 50  # Enter sowing depth (mm)
          cultivar = sugargraze  # Enter cultivar
          row_spacing = 600  # Enter row spacing (mm)
          on start_of_day:
          script: same as in PacSeeds.Planting1.Manager folder.Sow on a fixed date
      fertiliser
      surfaceom surface organic matter
        PoolName = wheat  # Organic Matter pool name
        type = wheat  # Organic Matter type
        mass = 1000.  # Initial surface residue (kg/ha)
        cnr = 80.0  # C:N ration of initial residue
        standing_fraction = 0.0  # Fraction of residue standing
      soil LawesSoil -> /untitled/shared/LawesSoil
      SweetSorghum
      outputfile: filename=PacSeeds Planting2.out
        variables My Variables
          variables: dd/mm/yyyy as Date, SweetSorghum.zadok_stage, SweetSorghum.lai, SweetSorghum.LeafGreenWt, SweetSorghum.StemGreenWt, SweetSorghum.head_wt, SweetSorghum.biomass_wt
        events My Variables Events: event=Daily
      irrigation
        automatic_irrigation = on  # switch
        asw_depth = 600.0  # Depth to which ASW is calculated. (mm)
        crit_fr_asw = 0.5  # Fraction of ASW below which irrigation is applied (0-1.0)
        irrigation_efficiency = 1.0  # Efficiency of the irrigation. (0-1.0)
  folder shared
    soil LawesSoil: Site=UQ, Lawes; Region=Lockyer; SoilType=Black Vertosol; NearestTown=Gatton, Q 4343; NaturalVegetation=Blue Gum, Moreton Bay Ash, Tea Tree; Comment=oc and ph not measured; Cona=3.5; DiffusConst=40; DiffusSlope=16; U=6; Salb=0.13; Cn2Bare=73; CnRed=20; CnCov=0.8; CnCanopyFact=1; RootCn=40; RootWt=200; SoilCn=12.5; EnrACoeff=7.4; EnrBCoeff=0.2
      InitWater
        PercentMethod: Percent=0.83; Distributed=Filled from top
      InitNitrogen
        profile
          layer:
            no3    nh4    thickness
            6.494  0.608  150
            2.098  0.101  150
            2.098  0.101  300
            1.698  0.101  300
            1.698  0.101  300
            1.698  0.101  300
            1.698  0.101  300
      profile
        layer:
          thickness  bd     ll15   airdry  dul    sat    sw        swcon  fbiom  finert  no3    nh4    oc     ph  ll SweetSorghum  kl SweetSorghum  xf SweetSorghum
          150        1.320  0.260  0.130   0.410  0.470  9999.990  0.300  0.030  0.400   6.500  0.600  1.240  7   0.260            0.100            1
          150        1.300  0.260  0.234   0.430  0.480  9999.990  0.300  0.020  0.600   2.100  0.100  1.240  7   0.260            0.100            1
          300        1.230  0.260  0.260   0.460  0.510  9999.990  0.300  0.010  0.800   2.100  0.100  1.250  7   0.260            0.080            1
          300        1.270  0.260  0.260   0.440  0.490  9999.990  0.300  0.010  0.900   1.700  0.100  1.100  7   0.260            0.060            1
          300        1.370  0.250  0.250   0.400  0.450  9999.990  0.300  0.010  0.950   1.700  0.100  0.710  7   0.250            0.040            1
          300        1.350  0.280  0.280   0.410  0.460  9999.990  0.300  0.010  0.950   1.700  0.100  0.340  7   0.290            0.020            1
          300        1.350  0.310  0.310   0.380  0.460  9999.990  0.300  0.010  0.950   1.700  0.100  0.260  7   0.380            0.010            1
  simulation Lawes0102
    clock
      start_date = 1/11/2001  # Select the start date of the simulation
      end_date = 30/06/2002  # Select the end date of the simulation
    summaryfile: filename=Lawes0102.sum
    metfile met: filename=UQG0102.met
    area Planting1
      registrations global
      folder Manager folder
        manager Harvesting rule
          crop = SweetSorghum  # Enter name of crop to harvest when ripe
          on end_of_day:
          script: same as in PacSeeds.Planting1.Manager folder.Harvesting rule
        manager Sowing fertiliser: same as PacSeeds.Planting1.Manager folder.Sowing fertiliser
        manager Sow on a fixed date
          date = 23-nov  # Enter sowing date (dd-mmm)
          crop = SweetSorghum  # Enter name of crop to sow
          density = 10  # Enter sowing density (plants/m2)
          depth = 50  # Enter sowing depth (mm)
          cultivar = sugargraze  # Enter cultivar
          row_spacing = 600  # Enter row spacing (mm)
          on start_of_day:
          script: same as in PacSeeds.Planting1.Manager folder.Sow on a fixed date
      fertiliser
      surfaceom surface organic matter
        PoolName = wheat  # Organic Matter pool name
        type = wheat  # Organic Matter type
        mass = 1000.  # Initial surface residue (kg/ha)
        cnr = 80.0  # C:N ration of initial residue
        standing_fraction = 0.0  # Fraction of residue standing
      soil LawesSoil -> /untitled/shared/LawesSoil
      SweetSorghum
      outputfile: filename=Lawes0102 Planting1.out
        variables My Variables
          variables: dd/mm/yyyy as Date, SweetSorghum.zadok_stage, SweetSorghum.lai, SweetSorghum.LeafGreenWt, SweetSorghum.StemGreenWt, SweetSorghum.head_wt, SweetSorghum.biomass_wt
        events My Variables Events: event=Daily
      irrigation
        automatic_irrigation = on  # switch
        asw_depth = 600.0  # Depth to which ASW is calculated. (mm)
        crit_fr_asw = 0.5  # Fraction of ASW below which irrigation is applied (0-1.0)
        irrigation_efficiency = 1.0  # Efficiency of the irrigation. (0-1.0)
    area Planting2
      registrations global
      folder Manager folder
        manager Harvesting rule
          crop = SweetSorghum  # Enter name of crop to harvest when ripe
          on end_of_day:
          script: same as in PacSeeds.Planting1.Manager folder.Harvesting rule
        manager Sowing fertiliser: same as PacSeeds.Planting1.Manager folder.Sowing fertiliser
        manager Sow on a fixed date
          date = 21-dec  # Enter sowing date (dd-mmm)
          crop = SweetSorghum  # Enter name of crop to sow
          density = 10  # Enter sowing density (plants/m2)
          depth = 50  # Enter sowing depth (mm)
          cultivar = sugargraze  # Enter cultivar
          row_spacing = 600  # Enter row spacing (mm)
          on start_of_day:
          script: same as in PacSeeds.Planting1.Manager folder.Sow on a fixed date
      fertiliser
      surfaceom surface organic matter
        PoolName = wheat  # Organic Matter pool name
        type = wheat  # Organic Matter type
        mass = 1000.  # Initial surface residue (kg/ha)
        cnr = 80.0  # C:N ration of initial residue
        standing_fraction = 0.0  # Fraction of residue standing
      soil LawesSoil -> /untitled/shared/LawesSoil
      SweetSorghum
      outputfile: filename=Lawes0102 Planting2.out
        variables My Variables
          variables: dd/mm/yyyy as Date, SweetSorghum.zadok_stage, SweetSorghum.lai, SweetSorghum.LeafGreenWt, SweetSorghum.StemGreenWt, SweetSorghum.head_wt, SweetSorghum.biomass_wt
        events My Variables Events: event=Daily
      irrigation
        automatic_irrigation = on  # switch
        asw_depth = 600.0  # Depth to which ASW is calculated. (mm)
        crit_fr_asw = 0.5  # Fraction of ASW below which irrigation is applied (0-1.0)
        irrigation_efficiency = 1.0  # Efficiency of the irrigation. (0-1.0)
    area Planting3
      registrations global
      folder Manager folder
        manager Harvesting rule
          crop = SweetSorghum  # Enter name of crop to harvest when ripe
          on end_of_day:
          script: same as in PacSeeds.Planting1.Manager folder.Harvesting rule
        manager Sowing fertiliser: same as PacSeeds.Planting1.Manager folder.Sowing fertiliser
        manager Sow on a fixed date
          date = 22-jan  # Enter sowing date (dd-mmm)
          crop = SweetSorghum  # Enter name of crop to sow
          density = 10  # Enter sowing density (plants/m2)
          depth = 50  # Enter sowing depth (mm)
          cultivar = sugargraze  # Enter cultivar
          row_spacing = 600  # Enter row spacing (mm)
          on start_of_day:
          script: same as in PacSeeds.Planting1.Manager folder.Sow on a fixed date
      fertiliser
      surfaceom surface organic matter
        PoolName = wheat  # Organic Matter pool name
        type = wheat  # Organic Matter type
        mass = 1000.  # Initial surface residue (kg/ha)
        cnr = 80.0  # C:N ration of initial residue
        standing_fraction = 0.0  # Fraction of residue standing
      soil LawesSoil -> /untitled/shared/LawesSoil
      SweetSorghum
      outputfile: filename=Lawes0102 Planting3.out
        variables My Variables
          variables: dd/mm/yyyy as Date, SweetSorghum.zadok_stage, SweetSorghum.lai, SweetSorghum.LeafGreenWt, SweetSorghum.StemGreenWt, SweetSorghum.head_wt, SweetSorghum.biomass_wt
        events My Variables Events: event=Daily
      irrigation
        automatic_irrigation = on  # switch
        asw_depth = 600.0  # Depth to which ASW is calculated. (mm)
        crit_fr_asw = 0.5  # Fraction of ASW below which irrigation is applied (0-1.0)
        irrigation_efficiency = 1.0  # Efficiency of the irrigation. (0-1.0)
    area Planting4
      registrations global
      folder Manager folder
        manager Harvesting rule
          crop = SweetSorghum  # Enter name of crop to harvest when ripe
          on end_of_day:
          script: same as in PacSeeds.Planting1.Manager folder.Harvesting rule
        manager Sowing fertiliser: same as PacSeeds.Planting1.Manager folder.Sowing fertiliser
        manager Sow on a fixed date
          date = 21-feb  # Enter sowing date (dd-mmm)
          crop = SweetSorghum  # Enter name of crop to sow
          density = 10  # Enter sowing density (plants/m2)
          depth = 50  # Enter sowing depth (mm)
          cultivar = sugargraze  # Enter cultivar
          row_spacing = 600  # Enter row spacing (mm)
          on start_of_day:
          script: same as in PacSeeds.Planting1.Manager folder.Sow on a fixed date
      fertiliser
      surfaceom surface organic matter
        PoolName = wheat  # Organic Matter pool name
        type = wheat  # Organic Matter type
        mass = 1000.  # Initial surface residue (kg/ha)
        cnr = 80.0  # C:N ration of initial residue
        standing_fraction = 0.0  # Fraction of residue standing
      soil LawesSoil -> /untitled/shared/LawesSoil
      SweetSorghum
      outputfile: filename=Lawes0102 Planting4.out
        variables My Variables
          variables: dd/mm/yyyy as Date, SweetSorghum.zadok_stage, SweetSorghum.lai, SweetSorghum.LeafGreenWt, SweetSorghum.StemGreenWt, SweetSorghum.head_wt, SweetSorghum.biomass_wt
        events My Variables Events: event=Daily
      irrigation
        automatic_irrigation = on  # switch
        asw_depth = 600.0  # Depth to which ASW is calculated. (mm)
        crit_fr_asw = 0.5  # Fraction of ASW below which irrigation is applied (0-1.0)
        irrigation_efficiency = 1.0  # Efficiency of the irrigation. (0-1.0)
