folder Simulations: version=15
  simulation YPBase
    clock
    siloinput Met
      station_number = 77007
    patchinput: filename=C:\Users\hol353\ApsimWork\YieldProphet\grower.rain
    summaryfile: filename=Continuous Wheat Simulation.sum
    area Paddock
      registrations global
      folder Management
        manager GrossMargin
          category =  # Cost properties
          FertiliserCost = 1.2  # Cost of N fertiliser ($/ha)
          FertiliserApplicationCost = 15  # Cost of N application ($/ha)
          WaterCost = 150  # Cost of water ($/Ml)
          category =  # Price properties
          Price = 140  # Price ($/t)
          ProteinContent = 10.5  # Minimum protein for classification ($/t)
          ProteinIncrement = 2  # Protein increment payment ($/t)
          on post:
```
   ! Reset the bank to zero the day after harvest.
   if (ResetBank = 1 or today = met_start_date) then
      Bank = 0
      ResetBank = 0
      TwoTimesCost = 0              
   endif

   ! Keep track of the number of fertiliser applications.
   if (fertilizer > 0)then
      Cost = [FertiliserCost] * fertilizer + [FertiliserApplicationCost]
      Bank = Bank - Cost
      if ScenarioApplication = 'yes' then
         TwoTimesCost = TwoTimesCost + 2 * Cost
      endif
   endif

   ! Keep track of the number of irrigation applications.
   if (irrig_tot > 0)then
      Cost = [WaterCost] * (irrig_tot / 100)
      Bank = Bank - Cost
      if ScenarioApplication = 'yes' then
         TwoTimesCost = TwoTimesCost + 2 * Cost
      endif
   endif

   ! Calculate gross margin at harvest.
   if StageName = 'harvest_ripe' or plant_status = 'dead' then
      if (grain_protein > [ProteinContent]) then
         FullPrice = [Price] + (grain_protein - [ProteinContent]) * 2 * [ProteinIncrement]
      else
         FullPrice = [Price]
      endif
      Bank = Bank + FullPrice * WetYield
      ResetBank = 1
   endif
```
          on init:
```
      Bank = 0
      ResetBank = 0
      TwoTimesCost = 0
```
        manager Reset
          category =  # When should a reset be done
          ResetDate = 1-apr  # Enter date of reset (dd-mmm)
          category =  # Reset details
          soilmodule = Soil  # Name of your soil module
          surfaceommodule = SurfaceOM  # Name of your surface organic matter module
          resetWater = yes  # Reset soil water?
          resetNitrogen = yes  # Reset soil nitrogen?
          resetSurfaceOM = yes  # Reset surface organic matter?
          on start_of_day:
```
   ! If the reset date is after the sow date then we want to reset on both sowing and on the reset date.
   ! Otherwise, just reset on the reset date.
   DoReset = 0
   if (date('[ResetDate]')> SowDate) then
      if (today = date('[ResetDate]') or today = SowDate) then
         DoReset = 1
      endif
   elseif (today = date('[ResetDate]')) then
         DoReset = 1
   endif

   if (DoReset = 1) then
      resetWater = '[resetWater]'
      resetNitrogen  = '[resetNitrogen]'
      resetSurfaceOM = '[resetSurfaceOM]'
      if (resetWater = 'yes') then
          '[soilmodule] Water' reset
      endif
      if (resetNitrogen = 'yes') then
          '[soilmodule] Nitrogen' reset
      endif
      if (resetSurfaceOM = 'yes') then
          '[surfaceommodule]' reset
      endif
      act_mods reseting
   endif
```
        manager Sow
          category =  # Sowing criteria
          sowdate = 15-may  # Enter sowing date (dd-mmm)
          category =  # Sowing parameters
          crop = wheat  # Enter name of crop to sow
          SowingDensity = 100  # Enter sowing density (plants/m2)
          depth = 30  # Enter sowing depth (mm)
          cultivar = yitpi  # Enter cultivar
          class = plant  # Enter crop growth class
          RowSpacing = 250  # Enter row spacing (mm, m for sorghum)
          skiprow = solid  # Skip row (sorghum only)
          ftn = 1  # Enter Fertile Tiller No. (sorghum only)
          on start_of_day:
```
   CropSown  = '[crop]'
   if (today = date('[sowdate]') then
      sow_year = year
      [crop] sow plants =[SowingDensity], sowing_depth = [depth], cultivar = [cultivar], row_spacing = [RowSpacing], crop_class = [class], tiller_no_fertile = [ftn] (), skip = [skiprow]
   endif
```
        manager Sowing tillage
          category =  # Tillage details
          surfaceommodule = SurfaceOM  # Module used to apply the tillage
          tillage_type = planter
          tillage_depth = 50  # User_defined depth of seedbed preparation (mm)
          tillage_f_incorp = 0.1  # User_defined fraction of surface residues to incorporate (0-1)
          on sowing:
```
         '[surfaceommodule]' tillage type = [tillage_type], f_incorp = [tillage_f_incorp] (), tillage_depth = [tillage_depth]
```
        manager Harvest
          category =  # Harvesting criteria
          crop = wheat  # Enter name of crop to harvest when ripe
          on end_of_day:
```
           if [crop].StageName = 'harvest_ripe' or [crop].plant_status = 'dead' then
              [crop]  harvest
              [crop]  end_crop
           endif
```
        manager Yield moisture correction
          on start_of_day:
```
   if CropSown = 'canola' then
      MoistureContent = 8       ! %
   else
      MoistureContent = 12     ! %
   endif
   WetYield = yield / (1 - MoistureContent/100) / 1000
```
        manager MildFrost
          category =  # Condition1 properties
          VariableName1 = Z  # Name of 1st APSIM variable to check (e.g. stage_name)
          LowerBound1 = 60  # Lower bound of variable1
          UpperBound1 = 69.99  # Upper bound of variable1
          category =  # Condition2 properties
          VariableName2 = mint  # Name of 2nd APSIM variable to bound check (e.g. maxt, mint, avtemp)
          LowerBound2 = 0  # Lower bound of variable2
          UpperBound2 = 2  # Upper bound of variable2
          category =  # Event properties
          EventName = MildFrost  # Name of event to publish when above 2 conditions are met
          on post:
```
          if ([VariableName1] >= [LowerBound1] and 
              [VariableName1] <= [UpperBound1] and
              [VariableName2] >= [LowerBound2] and 
              [VariableName2] <= [UpperBound2]) then
             act_mods [EventName]
          endif
```
        manager ModerateFrost
          category =  # Condition1 properties
          VariableName1 = Z  # Name of 1st APSIM variable to check (e.g. stage_name)
          LowerBound1 = 60  # Lower bound of variable1
          UpperBound1 = 75.99  # Upper bound of variable1
          category =  # Condition2 properties
          VariableName2 = mint  # Name of 2nd APSIM variable to bound check (e.g. maxt, mint, avtemp)
          LowerBound2 = -2  # Lower bound of variable2
          UpperBound2 = 0  # Upper bound of variable2
          category =  # Event properties
          EventName = ModerateFrost  # Name of event to publish when above 2 conditions are met
          on post:
          script: same as in YPBase.Paddock.Management.MildFrost
        manager SevereFrost
          category =  # Condition1 properties
          VariableName1 = Z  # Name of 1st APSIM variable to check (e.g. stage_name)
          LowerBound1 = 60  # Lower bound of variable1
          UpperBound1 = 79.99  # Upper bound of variable1
          category =  # Condition2 properties
          VariableName2 = mint  # Name of 2nd APSIM variable to bound check (e.g. maxt, mint, avtemp)
          LowerBound2 = -100  # Lower bound of variable2
          UpperBound2 = -2  # Upper bound of variable2
          category =  # Event properties
          EventName = SevereFrost  # Name of event to publish when above 2 conditions are met
          on post:
          script: same as in YPBase.Paddock.Management.MildFrost
        manager MildHeatShock
          category =  # Condition1 properties
          VariableName1 = Z  # Name of 1st APSIM variable to check (e.g. stage_name)
          LowerBound1 = 70  # Lower bound of variable1
          UpperBound1 = 79.99  # Upper bound of variable1
          category =  # Condition2 properties
          VariableName2 = maxt  # Name of 2nd APSIM variable to bound check (e.g. maxt, mint, avtemp)
          LowerBound2 = 32  # Lower bound of variable2
          UpperBound2 = 34  # Upper bound of variable2
          category =  # Event properties
          EventName = MildHeatShock  # Name of event to publish when above 2 conditions are met
          on post:
          script: same as in YPBase.Paddock.Management.MildFrost
        manager ModerateHeatShock
          category =  # Condition1 properties
          VariableName1 = Z  # Name of 1st APSIM variable to check (e.g. stage_name)
          LowerBound1 = 70  # Lower bound of variable1
          UpperBound1 = 79.99  # Upper bound of variable1
          category =  # Condition2 properties
          VariableName2 = maxt  # Name of 2nd APSIM variable to bound check (e.g. maxt, mint, avtemp)
          LowerBound2 = 34  # Lower bound of variable2
          UpperBound2 = 36  # Upper bound of variable2
          category =  # Event properties
          EventName = ModerateHeatShock  # Name of event to publish when above 2 conditions are met
          on post:
          script: same as in YPBase.Paddock.Management.MildFrost
        manager SevereHeatShock
          category =  # Condition1 properties
          VariableName1 = Z  # Name of 1st APSIM variable to check (e.g. stage_name)
          LowerBound1 = 70  # Lower bound of variable1
          UpperBound1 = 79.99  # Upper bound of variable1
          category =  # Condition2 properties
          VariableName2 = maxt  # Name of 2nd APSIM variable to bound check (e.g. maxt, mint, avtemp)
          LowerBound2 = 36  # Lower bound of variable2
          UpperBound2 = 100  # Upper bound of variable2
          category =  # Event properties
          EventName = SevereHeatShock  # Name of event to publish when above 2 conditions are met
          on post:
          script: same as in YPBase.Paddock.Management.MildFrost
        manager Fertilise
          category =  # When should fertiliser be applied
          FertDate = 1/1/1800  # Enter fertiliser date (dd-mmm)
          FertDateFull =  # Fertiliser date (not used)
          category =  # Fertiliser application details
          FertModule = fertiliser  # Module used to apply the fertiliser
          FertAmount = 0  # Amount of fertiliser to apply (kg/ha)
          FertType = NO3_N  # Fertiliser type
          Scenario = no  # Is this a scenario fertiliser?
          on start_of_day:
```
   if (today = date('[FertDate]') then
      ScenarioApplication = '[Scenario]'
      [FertModule] apply amount = [FertAmount] (kg/ha), depth = 20 (mm), type = [FertType] ()
   endif
```
        manager Irrigate
          category =  # When should irrigation be applied
          IrrigateDate = 1/1/1800  # Enter irrigation date (dd-mmm)
          IrrigateDateFull =  # Full irrigation date (not used)
          category =  # Irrigation application details
          IrrigateModule = Irrigation  # Module used to apply the irrigation
          IrrigateAmount = 0  # Amount of irrigation to apply (mm)
          IrrigateEfficiency = 1  # Irrigation efficiency (0-1)
          Scenario = no  # Is this a scenario irrigation?
          on start_of_day:
```
   if (today = date('[IrrigateDate]') then
      ScenarioApplication = '[Scenario]'
      '[IrrigateModule]' set irrigation_efficiency = [IrrigateEfficiency]
      '[IrrigateModule]' apply amount = [IrrigateAmount] (mm)
   endif
```
        manager Tillage
          category =  # When should tillage be done
          TillageDate = 1/1/1800  # Enter tillage date (dd-mmm)
          TillageDateFull =  # Tillage date full (not used)
          category =  # Tillage application details
          Disturbance = low
          tillage_depth = 100  # User_defined depth of seedbed preparation (mm)
          Scenario =  # Scenario application? (not used)
          on start_of_day:
```
   if (today = date('[TillageDate]') then
      if ('[Disturbance]' = 'low') then
         SurfaceOM tillage type = user_defined, f_incorp = 0.2, tillage_depth = [tillage_depth]
      elseif ('[Disturbance]' = 'medium') then
         SurfaceOM tillage type = user_defined, f_incorp = 0.5, tillage_depth = [tillage_depth]
      else
         SurfaceOM tillage type = user_defined, f_incorp = 0.8, tillage_depth = [tillage_depth]
      endif
   endif
```
        manager Constants
          on init:
```
TodayDate = 0 
TodayDateFull = 0
StartSeasonDate = 0
StartSeasonDateFull = 0
ResetDate = 0
ResetDateFull = 0
SowDateFull = 0
SowDate = 0
```
          on start_of_day:
```
TodayDate=date('02-Jul')
TodayDateFull=date('02/07/2008')
StartSeasonDate=date('01-Apr')
StartSeasonDateFull=date('01/04/2008')
ResetDate=date('23-May')
ResetDateFull=date('23/05/2008')
SowDateFull=date('06/05/2008')
SowDate=date('06-May')
```
        manager Script
          on post:
```
   ! Work out when to start doing a daily output of variables.
   ! = min(start season date, reset date, sow date)
   if (StartDailyDate = 0) then
      if (StartSeasonDateFull <= SowDateFull and StartSeasonDateFull <= ResetDateFull) then
         StartDailyDate = StartSeasonDateFull)
      elseif (SowDateFull <= ResetDateFull) then
         StartDailyDate = SowDateFull
      else
         StartDailyDate = ResetDateFull
      endif
   endif

   if (today >= StartDailyDate) then
      act_mods OnDailyOutput

      ! Create a variable that = 1 during the current fallow and has a value
      ! of 0 when not in current fallow.
      if (DaysAfterSowing > 0) then
         CurrentCropFound = 1
      endif
      if (CurrentCropFound = 1 and DaysAfterSowing = 0) then
         CurrentFallow = 1
      endif

   endif

   ! -------------------------------------------------------------
   ! Create a special decile date that starts at 
   ! this years start of growing season date 
   ! and steps up month at a time
   ! -------------------------------------------------------------
   if (today = StartSeasonDate) then
      DecileDate = StartSeasonDateFull 
      DoDecileOutput = 1
   elseif (start_month = 1) then
      DecileDate = add_months('DecileDate, 1')
   endif
   if (DoDecileOutput = 1 and today < StartSeasonDateFull and start_month = 1) then
      act_mods OnDecileOutput
   endif

   ! -------------------------------------------------------------
   ! Create 'thismonth' and 'threemonthstime'
   ! events so that Tracker can do its future 
   ! rain calculations
   ! -------------------------------------------------------------
   if (month = month(TodayDateFull)) then
      act_mods ThisMonth
      ThreeMonthsTimeDate = today + 90
   endif
   if (today = ThreeMonthsTimeDate) then
      act_mods ThreeMonthsTime
   endif

   ! -----------------------------------------
   ! Improved Zadok_stage
   ! -----------------------------------------
   if (zadok_stage < 30) then
      Z = node_no + 8
      if (Z > 16) then
         Z = 16
      endif
   else
      Z = zadok_stage
   endif
```
          on end_of_day, sowing, harvesting, reseting:
```
   AvTemp = (maxt + mint) / 2
   AmountWaterLeft = SwToday - CritSWToday
   AmountWaterAboveCLL = SwToday - CLLToday
   if (AmountWaterAboveCLL < 0) then
      AmountWaterAboveCLL = 0
   endif
   Nitrogen = no3() + nh4()
   AvailableWater = sw_dep() - ll_dep()
   NUptakeKgHa = no3_uptake() * -1                            ! convert to positive number
   NInPlant = (biomass_n * 10) + (RootGreenN * 10)    ! unit conversion g/m2 to kg/ha

   ! convert kg/ha to t/ha & correct for 13% moisture and then take 80% of it - Hay yield.
   HayBiomass= 0.8 * (biomass / (1 - 13/100) / 1000)    


   if (DaysAfterSowing = 1) then
      Zadok11Das = 0
      Zadok12Das = 0
      Zadok13Das = 0
      Zadok14Das = 0
      Zadok15Das = 0
      Zadok16Das = 0
      Zadok30Das = 0
      Zadok31Das = 0
      Zadok32Das = 0
      Zadok37Das = 0
      Zadok39Das = 0
      Zadok45Das = 0
      Zadok55Das = 0
      Zadok65Das = 0
      Zadok75Das = 0
   endif
   if (Z >= 11 and Zadok11Das = 0) then
      Zadok11Das = DaysAfterSowing
   elseif (Z >= 12 and Zadok12Das = 0) then
      Zadok12Das = DaysAfterSowing
   elseif (Z >= 13 and Zadok13Das = 0) then
      Zadok13Das = DaysAfterSowing
   elseif (Z >= 14 and Zadok14Das = 0) then
      Zadok14Das = DaysAfterSowing
   elseif (Z >= 15 and Zadok15Das = 0) then
      Zadok15Das = DaysAfterSowing
   elseif (Z >= 16 and Zadok16Das = 0) then
      Zadok16Das = DaysAfterSowing
   elseif (Z >= 30 and Zadok30Das = 0) then
      Zadok30Das = DaysAfterSowing
   elseif (Z >= 31 and Zadok31Das = 0) then
      Zadok31Das = DaysAfterSowing
   elseif (Z >= 32 and Zadok32Das = 0) then
      Zadok32Das = DaysAfterSowing
   elseif (Z >= 37 and Zadok37Das = 0) then
      Zadok37Das = DaysAfterSowing
   elseif (Z >= 39 and Zadok39Das = 0) then
      Zadok39Das = DaysAfterSowing
   elseif (Z >= 45 and Zadok45Das = 0) then
      Zadok45Das = DaysAfterSowing
   elseif (Z >= 55 and Zadok55Das = 0) then
      Zadok55Das = DaysAfterSowing
   elseif (Z >= 65 and Zadok65Das = 0) then
      Zadok65Das = DaysAfterSowing
   elseif (Z >= 75 and Zadok75Das = 0) then
      Zadok75Das = DaysAfterSowing
   endif
```
          on start_of_day:
```
   if (today = StartSeasonDate-1) then
      act_mods EndSeason
   elseif (today = StartSeasonDate) then
      act_mods StartSeason
   endif

   if (today = TodayDate) then
      act_mods CurrentDay
   endif
```
          on init:
```
      CurrentFallow = 0
      Z = 0
      Zadok11Das = 0
      Zadok12Das = 0
      Zadok13Das = 0
      Zadok14Das = 0
      Zadok15Das = 0
      Zadok16Das = 0
      Zadok30Das = 0
      Zadok31Das = 0
      Zadok32Das = 0
      Zadok37Das = 0
      Zadok39Das = 0
      Zadok45Das = 0
      Zadok55Das = 0
      Zadok65Das = 0
      Zadok75Das = 0
      StartDailyDate = 0
      CurrentCropFound = 0
      DecileDate  = 0
      DoDecileOutput  = 0
      ThreeMonthsTimeDate  = 0
```
        manager CanolaOilConc
          on start_of_day:
```
   if (DaysAfterSowing = 1) then
      cum_temp = 0
      cum_swdef = 0
      cum_days = 0

   elseif (StageName = 'start_grain_fill' or
                StageName = 'end_grain_fill' or
                StageName = 'maturity' or
                StageName = 'harvest_ripe') then
      cum_temp = cum_temp + (maxt + mint) / 2
      cum_swdef = cum_swdef + swdef_photo
      cum_days = cum_days + 1
   endif

   ! calculate canola oil content
   if (cum_days > 0) then
      avg_temp = cum_temp / cum_days
      avg_swdef = cum_swdef / cum_days
      if (avg_temp <= 14) then
         oil_conc =  47
      else
         oil_conc = (47 - ((avg_temp - 14)*1.21)) - (1.91*(1 - avg_swdef^2))
      endif
   else
      oil_conc = 0
   endif
```
          on init:
```
      cum_temp = 0
      cum_swdef = 0
      cum_days = 0
```
        manager StubbleRemoved
          StubbleRemovedDate = 1/1/1800  # Enter date to remove stubble on
          StubbleRemovedDateFull = 1/1/1800  # Enter full date to remove stubble on (not used)
          StubbleRemovedAmount = 30  # Amount of stubble removed (%)
          on start_of_day:
```
   if (today = date('[StubbleRemovedDate]') then
      [Name]Percent = [StubbleRemovedAmount] / 100
      SurfaceOM tillage type = user_defined, f_incorp = [Name]Percent , tillage_depth = 0
   endif
```
      fertiliser
      irrigation
        automatic_irrigation = off
        asw_depth = 600.0  # Depth to which ASW is calculated. (mm)
        crit_fr_asw = 0.5  # Fraction of ASW below which irrigation is applied (0-1.0)
        irrigation_efficiency = 1.0  # Efficiency of the irrigation. (0-1.0)
        default_no3_conc = 0.0  # Nitrate concentration (ppm N)
        default_nh4_conc = 0.0  # Ammonium concentration (ppm N)
        default_cl_conc = 0.0  # Chloride concentration (ppm Cl)
      surfaceom
        PoolName = wheat  # Organic Matter pool name
        type = wheat  # Organic Matter type
        mass = 1000  # Initial surface residue (kg/ha)
        cnr = 80  # C:N ratio of initial residue
        standing_fraction = 0  # Fraction of residue standing
      wheat
      barley (disabled)
      canola (disabled)
      oats (disabled)
      sorghum (disabled)
      outputfile Yearly
        events Reporting Frequency: event=harvesting
        variables
          variable:
            dd/mm/yyyy as Date
            sow_year
            DaysAfterSowing
            simulation_end_date format dd/mm/yyyy
            biomass
            wetyield
            Grain_protein
            grain_n
            grain_no
            oil_conc
            leaf_no
            sw_stress_expan
            sw_stress_photo
            n_stress_expan
            n_stress_photo
            Hay
            Z
            Zadok11Das
            Zadok12Das
            Zadok13Das
            Zadok14Das
            Zadok15Das
            Zadok16Das
            Zadok30Das
            Zadok31Das
            Zadok32Das
            Zadok37Das
            Zadok39Das
            Zadok45Das
            Zadok55Das
            Zadok65Das
            Zadok75Das
            flowering_das
            maturity_das
            root_depth
            Bank
            TwoTimesCost
            CurrentFallow
            MildFrostCount
            ModerateFrostCount
            SevereFrostCount
            MildHeatShockCount
            ModerateHeatShockCount
            SevereHeatShockCount
            InCropRain
            InCropIrrigation
            rain
            runoff
            SumRunoffToSowing
            drain
            es
            ep
            sw_dep()
            AvailableWater
            AvailableWaterAtSowing
            AmountWaterLeft
            ll_dep()
            no3()
            nh4()
            Nitrogen
            NitrogenAtSowing
            NUptakeKgHa
            soil_loss
            SumSoilLossToSowing
            dlt_n_min_tot()
            dnit()
            leach_no3
            NInPlant
            CLLToday
            DulToday
            SwToday
            CritSWToday
          Constants: Title=GrowerName,PaddockName
      outputfile Daily
        events Reporting Frequency: event=OnDailyOutput
        variables
          variable:
            dd/mm/yyyy as Date
            sow_year
            DaysAfterSowing
            simulation_end_date format dd/mm/yyyy
            biomass
            wetyield
            Grain_protein
            grain_n
            grain_no
            oil_conc
            leaf_no
            sw_stress_expan
            sw_stress_photo
            n_stress_expan
            n_stress_photo
            Hay
            Z
            node_no
            flowering_das
            maturity_das
            root_depth
            Bank
            TwoTimesCost
            CurrentFallow
            InCropRain
            rain
            irrig_tot
            irrigation
            runoff
            drain
            es
            ep
            sw_dep()
            AvailableWater
            AmountWaterLeft
            ll_dep()
            fertilizer
            no3()
            nh4()
            Nitrogen
            NUptakeKgHa
            soil_loss
            dlt_n_min_tot()
            dnit()
            leach_no3
            NInPlant
            CLLToday
            DulToday
            SwToday
            CritSWToday
            dlayer
            air_dry
            ll
            sw
            dul
            sat
          Constants: Title=GrowerName,PaddockName
      outputfile Decile: filename=sample.out
        events Reporting Frequency: event=OnDecileOutput
        variables
          variables: dd/mm/yyyy as Date, DecileDate format dd/mm/yyyy, month, SeasonalRainUnPatched
          Constants: Title=GrowerName,PaddockName
      outputfile FutureRain: filename=sample.out
        events Reporting Frequency: event=ThreeMonthsTime
        variables
          variables: Sow_year, RainInComingMonths
          Constants: Title=GrowerName,PaddockName
      tracker
        variable:
          sum of unpatched_rain on start_of_day from StartSeason to EndSeason as SeasonalRainUnPatched
          sum of unpatched_rain on start_of_day from ThisMonth to ThreeMonthsTime as RainInComingMonths
          value of HayBiomass on flowering as Hay
          count of MildFrost from sowing to harvesting as MildFrostCount
          count of ModerateFrost from sowing to harvesting as ModerateFrostCount
          count of SevereFrost from sowing to harvesting as SevereFrostCount
          count of MildHeatShock from sowing to harvesting as MildHeatShockCount
          count of ModerateHeatShock from sowing to harvesting as ModerateHeatShockCount
          count of SevereHeatShock from sowing to harvesting as SevereHeatShockCount
          sum of runoff on end_of_day from CurrentDay to sowing as SumRunoffToSowing
          sum of soil_loss on end_of_day  from CurrentDay to sowing as SumSoilLossToSowing
          value of AvailableWater on sowing as AvailableWaterAtSowing
          value of Nitrogen on sowing as NitrogenAtSowing
          sum of rain on end_of_day from sowing to harvesting as InCropRain
          sum of irrigation on end_of_day from sowing to harvesting as InCropIrrigation
      soil: Cona=2; U=2; CN2Bare=73; Salb=0.13; DiffusConst=88; DiffusSlope=35.4; CNRed=20; CNCov=0.8; RootCN=45; RootWT=1500; SoilCN=12.5; EnrACoeff=7.4; EnrBCoeff=0.2
        profile
          layer:
            thickness  ll15  airdry  dul   sat   swcon  bd     ph   oc   fbiom  finert  ll wheat  kl wheat  xf wheat  ll barley  kl barley  xf barley  ll oats  kl oats  xf oats  ll canola  kl canola  xf canola  ll sorghum  kl sorghum  xf sorghum
            100        0.12  0.07    0.33  0.46  0.3    1.36   8    1.5  0.03   0.4     0.12      0.06      1         0.12       0.06       1          0.12     0.06     1        0.12       0.06       1          0.12        0.06        1
            150        0.17  0.15    0.34  0.48  0.3    1.293  8.1  0.5  0.02   0.6     0.17      0.06      0.9       0.17       0.06       0.9        0.17     0.06     1        0.17       0.06       1          0.17        0.06        1
            150        0.17  0.17    0.34  0.48  0.3    1.293  8.1  0.5  0.02   0.7     0.17      0.04      0.9       0.17       0.04       0.9        0.17     0.06     1        0.17       0.06       1          0.17        0.06        1
            150        0.21  0.21    0.35  0.45  0.3    1.374  8.2  0.5  0.02   0.8     0.21      0.04      0.7       0.21       0.04       0.7        0.21     0.06     1        0.21       0.06       1          0.21        0.06        1
            150        0.21  0.21    0.35  0.45  0.3    1.374  8.2  0.5  0.01   0.9     0.21      0.04      0.7       0.21       0.04       0.7        0.21     0.06     1        0.21       0.06       1          0.21        0.06        1
            300        0.24  0.24    0.35  0.44  0.3    1.412  8.3  0.5  0.01   0.9     0.24      0.04      0.5       0.24       0.04       0.5        0.24     0.06     1        0.24       0.06       1          0.24        0.06        1
            300        0.25  0.25    0.35  0.43  0.3    1.423  8.4  0.5  0.01   1       0.25      0.02      0.5       0.25       0.02       0.5        0.25     0.06     1        0.25       0.06       1          0.25        0.06        1
            300        0.28  0.28    0.34  0.42  0.3    1.455  7    0.5  0.01   1       0.28      0.02      0.4       0.28       0.02       0.4        0.28     0.06     1        0.28       0.06       1          0.28        0.06        1
        soilsample Soil sample 1: WaterFormat=GravimetricPercent; date=16/01/2008 12:00:00 AM
          profile
            layer:
              thickness  sw     no3  nh4
              100        0.08   7.2  1.6
              300        0.184  2.4  0.78
              300        0.229  1    1
              300        0.253  1    0.7
              300        0.26   1    0.7
        soilsample Soil sample 2
          profile
            layer:
              thickness  oc    ph   ec    cl
              100        0.72  7.9  0.26  50
              300        -     8.3  0.62  220
              300        -     8.7  1.3   770
              300        -     8.7  1.65  1100
              300        -     8.6  2     1500
      erosion
        model = freebairn  # Model Name
        slope = 0  # Slope of plot in percent (%)
        slope_length = 60  # Length of plot (m)
        k_factor = 0.4  # Soil erodibility factor (t/ha/EI 30 )
        p_factor = 1  # Supporting practise factor (unitless)
        bed_depth = 5000  # Depth to bedrock (mm)
        profile_reduction = off
        profile_layer_merge = 0.05  # Fraction of original size in which the lowest layer is merged into the layer above (0-1)
        minimum_depth = 100  # If the profile erodes to this depth, the simulation is stopped (mm)
      YPCalc
  simulation NUnlimited -> /Simulations/YPBase
    area Paddock -> /Simulations/YPBase/Paddock
      folder Management -> /Simulations/YPBase/Paddock/Management
        manager NUnlimited
          on post:
```
   if (today = ResetDate) then
       fertiliser apply amount = 300 (kg/ha), depth = 20 (mm), type = no3_n
   endif
```
      irrigation -> /Simulations/YPBase/Paddock/Irrigation
        default_no3_conc = 0.0  # Nitrate concentration (ppm N)
        default_nh4_conc = 0.0  # Ammonium concentration (ppm N)
        default_cl_conc = 0.0  # Chloride concentration (ppm Cl)
  simulation Next10Days -> /Simulations/YPBase
    area Paddock -> /Simulations/YPBase/Paddock
      folder Management -> /Simulations/YPBase/Paddock/Management
        manager Next10DaysLogic
          on post:
```
   ! -------------------------------------------------------------
   ! Fire an event if we're in a window from
   ! now + 10 days.
   ! -------------------------------------------------------------
   if (today = TodayDate) then
      StartTenDayWindow = today 
      EndTenDayWindow = today + 10      
   endif
   if (today >= StartTenDayWindow and today < EndTenDayWindow)  then
      rain = 0
      Daily do_end_day_output
   endif
```
          on init:
```
StartTenDayWindow  = 0
EndTenDayWindow = 0
```
      irrigation -> /Simulations/YPBase/Paddock/Irrigation
        default_no3_conc = 0.0  # Nitrate concentration (ppm N)
        default_nh4_conc = 0.0  # Ammonium concentration (ppm N)
        default_cl_conc = 0.0  # Chloride concentration (ppm Cl)
      outputfile Daily: filename=sample.out; events=Reporting Frequency
        variables
          variables: today as Date format dd/mm, year, es, ep, NUptakeKgHa, AmountWaterLeft, AmountWaterAboveCLL, Nitrogen, Z, root_depth, CLLToday, DulToday, SwToday, CritSWToday
          Constants: Title=BCG^Manangatang 2008 Risk Management - Low Input; Crop=Wheat
