simulations ALL BarleyData_AMM: version=9
  shared
  simulation Barley_HB90Sow1_3
    clock
      start_date = 26/04/1990  # Select the start date of the simulation
      end_date = 23/10/1990  # Select the end date of the simulation
    summaryfile: filename=Barley_HB90Sow1_3.sum
    metfile met: filename=.\HB90Sow1.met
    area paddock
      registrations global
      outputfile: events=My Variables Events
        variables My Variables
          variable:
            dd/mm/yyyy as Date
            barley.das
            barley.stage
            barley.biomass_wt
            barley.leaf_wt as dmLeaf
            barley.stem_wt as dmStem
            barley.grain_wt as dmGrain
            barley.biomass_n as nBiomass
            barley.stem_n as nStem
            barley.n_green(4) as nRachis
            barley.grain_n as nGrain
            barley.n_senesced() as nSenLeaf
            barley.n_conc_grain as nConcGrain
            barley.grain_no
            barley.lai
            barley.root_depth
            barley.swdef_expan
            barley.swdef_pheno
            barley.swdef_photo
            barley.nfact_expan
            barley.nfact_pheno
            barley.nfact_photo
            eo
            es
            esw
            water_table
            barley.leaves_per_node
            barley.leaf_no
            barley.node_no
            Irrigation.irrigation
      manager
        rule Sow on a fixed date
          condition start_of_day:
            if (today = date('[date]') then
                          [crop] sow plants =[density], sowing_depth = [depth], cultivar = [cultivar], row_spacing = [row_spacing]
                     endif
          category Sowing criteria
            date = 26/04/1990  # Enter sowing date (d/m/yyyy)
          category Sowing parameters
            crop = barley  # Enter name of crop to sow
            density = 100  # Enter sowing density (plants/m2)
            depth = 50  # Enter sowing depth (mm)
            cultivar = Grimmett  # Enter cultivar
            row_spacing = 250  # Enter row spacing (mm)
        rule Harvesting rule
          condition end_of_day:
            if (paddock_is_fallow() = 0) then
                           outputfile do_output
                        endif
                       if [crop].stage_name = 'harvest_ripe' or [crop].plant_status = 'dead' then
                          [crop]  harvest
                          [crop]  end_crop
                       endif
          category Harvesting criteria
            crop = barley  # Enter name of crop to harvest when ripe
        rule Fertilise at sowing
          condition [modulename].[eventname]=[fertmodule] apply amount = [fert_amount_sow] (kg/ha), depth = 50 (mm), type = [fert_type_sow]
          category When should fertiliser be applied
            modulename = barley  # On which module should the event come from
            eventname = sowing  # On which event should fertiliser be applied
          category Fertiliser application details
            fertmodule = fertiliser  # Module used to apply the fertiliser
            fert_amount_sow = 130.0  # Amount of starter fertiliser at sowing (kg/ha)
            fert_type_sow = urea_N  # Sowing fertiliser type
      soil M Block90: Site=HRS; Region=Warwick; LocalName=HRS; SoilType=HMM90; NearestTown=Unknown; NaturalVegetation=Unknown; Cona=6.5; DiffusConst=88; DiffusSlope=35; U=2; Salb=0.2; Cn2Bare=85; CnRed=20; CnCov=0.8; CnCanopyFact=0.8; RootCn=50; RootWt=1000; SoilCn=12.5; EnrACoeff=7.4; EnrBCoeff=0.2
        InitWater
          profile
            layer:
              sw     thickness
              0.420  100
              0.420  100
              0.460  200
              0.460  200
              0.430  200
              0.400  200
              0.370  200
              0.330  200
              0.320  200
              0.330  200
        InitNitrogen
          profile
            layer:
              no3    nh4    thickness
              4.293  0.596  100
              4.293  0.099  100
              1.717  0.099  200
              0.859  0.099  200
              0.859  0.099  200
              0.859  0.099  200
              0.859  0.099  200
              0.859  0.099  200
              0.859  0.099  200
              0.859  0.099  200
        profile
          layer:
            thickness  bd     ll15   airdry  dul    sat    sw     swcon  oc     ph     fbiom  finert  no3    nh4    ll Barley  kl Barley  xf Barley
            100        0.930  0.200  0.080   0.420  0.450  0.420  0.300  1.190  6.300  0.050  0.450   0.050  0.600  0.200      0.090      1
            100        0.970  0.200  0.190   0.420  0.450  0.420  0.300  0.590  6.400  0.020  0.600   0.050  0.100  0.200      0.090      1
            200        1      0.230  0.230   0.460  0.480  0.460  0.300  0.450  6.500  0.010  0.750   0.020  0.100  0.230      0.090      1
            200        1.010  0.260  0.260   0.460  0.480  0.460  0.300  0.300  6.600  0.010  0.900   0.010  0.100  0.260      0.090      1
            200        1.030  0.260  0.260   0.430  0.450  0.430  0.300  0.200  6.600  0.010  0.900   0.010  0.100  0.260      0.080      1
            200        1.060  0.280  0.280   0.400  0.410  0.400  0.300  0.160  6.500  0.010  0.900   0.010  0.100  0.280      0.070      1
            200        1.110  0.250  0.250   0.370  0.380  0.370  0.300  0.170  6.500  0.010  0.900   0.010  0.100  0.250      0.060      1
            200        1.150  0.280  0.280   0.330  0.370  0.330  0.300  0.170  6.500  0.050  0.900   0.010  0.100  0.280      0.050      1
            200        1.200  0.300  0.300   0.320  0.370  0.320  0.300  0.170  6.500  0.020  0.900   0.010  0.100  0.300      0.050      1
            200        1.250  0.310  0.310   0.330  0.370  0.330  0.300  0.170  6.500  0.010  0.900   0.010  0.100  0.310      0.040      1
      barley
      logic Calculator
        on init:
```
sd = 0
```
        on end_of_day:
```
[cr]if (sw_demand > 0) then[cr]   sd = sw_supply / sw_demand[cr]else[cr]   sd = 1[cr]endif[cr][cr]if (sd > 1) then[cr]   sd = 1[cr]endif[cr]
```
      logic Irrigator
      fertiliser
      logic Fertilizer
      irrigation
        automatic_irrigation = on  # switch
        asw_depth = 1800  # Depth to which ASW is calculated. (mm)
        crit_fr_asw = 0.8  # Fraction of ASW below which irrigation is applied (0-1.0)
        irrigation_efficiency = 1.0  # Efficiency of the irrigation. (0-1.0)
  simulation Barley_HB90Sow2_3
    clock
      start_date = 5/06/1990  # Select the start date of the simulation
      end_date = 14/11/1990  # Select the end date of the simulation
    summaryfile: filename=Barley_HB90Sow2_3.sum
    metfile met: filename=HB90Sow2.met
    area paddock
      registrations global
      outputfile: same as Barley_HB90Sow1_3.paddock.outputfile
      manager
        rule Sow on a fixed date
          condition start_of_day:
            if (today = date('[date]') then
                          [crop] sow plants =[density], sowing_depth = [depth], cultivar = [cultivar], row_spacing = [row_spacing]
                     endif
          category Sowing criteria
            date = 5/06/1990  # Enter sowing date (d/m/yyyy)
          category Sowing parameters
            crop = barley  # Enter name of crop to sow
            density = 100  # Enter sowing density (plants/m2)
            depth = 50  # Enter sowing depth (mm)
            cultivar = Grimmett  # Enter cultivar
            row_spacing = 250  # Enter row spacing (mm)
        rule Harvesting rule: same as Barley_HB90Sow1_3.paddock.Manager.Harvesting rule
        rule Fertilise at sowing: same as Barley_HB90Sow1_3.paddock.Manager.Fertilise at sowing
      soil M Block90: Site=HRS; Region=Warwick; LocalName=HRS; SoilType=HMM90; NearestTown=Unknown; NaturalVegetation=Unknown; Cona=6.5; DiffusConst=88; DiffusSlope=35; U=2; Salb=0.2; Cn2Bare=85; CnRed=20; CnCov=0.8; CnCanopyFact=0.8; RootCn=50; RootWt=1000; SoilCn=12.5; EnrACoeff=7.4; EnrBCoeff=0.2
        InitWater: same as Barley_HB90Sow1_3.paddock.M Block90.InitWater
        InitNitrogen
          profile
            layer:
              no3    nh4    thickness
              2.688  0.596  100
              2.577  0.099  100
              1.250  0.099  200
              1.238  0.099  200
              1.214  0.099  200
              1.179  0.099  200
              1.126  0.099  200
              1.087  0.099  200
              1.042  0.099  200
              1      0.099  200
        profile: same as Barley_HB90Sow1_3.paddock.M Block90.profile
      barley
      logic Calculator
        on init:
```
sd = 0
```
        on end_of_day:
        script: same as in Barley_HB90Sow1_3.paddock.Calculator
      fertiliser
      logic Fertilizer
      irrigation
        automatic_irrigation = on  # switch
        asw_depth = 1800  # Depth to which ASW is calculated. (mm)
        crit_fr_asw = 0.8  # Fraction of ASW below which irrigation is applied (0-1.0)
        irrigation_efficiency = 1.0  # Efficiency of the irrigation. (0-1.0)
  simulation Barley_HB90Sow3_3
    clock
      start_date = 7/08/1990  # Select the start date of the simulation
      end_date = 3/12/1990  # Select the end date of the simulation
    summaryfile: filename=Barley_HB90Sow3_3.sum
    metfile met: filename=HB90Sow3.met
    area paddock
      registrations global
      outputfile: same as Barley_HB90Sow1_3.paddock.outputfile
      manager
        rule Sow on a fixed date
          condition start_of_day:
            if (today = date('[date]') then
                          [crop] sow plants =[density], sowing_depth = [depth], cultivar = [cultivar], row_spacing = [row_spacing]
                     endif
          category Sowing criteria
            date = 7/08/1990  # Enter sowing date (d/m/yyyy)
          category Sowing parameters
            crop = barley  # Enter name of crop to sow
            density = 100  # Enter sowing density (plants/m2)
            depth = 50  # Enter sowing depth (mm)
            cultivar = Grimmett  # Enter cultivar
            row_spacing = 250  # Enter row spacing (mm)
        rule Harvesting rule: same as Barley_HB90Sow1_3.paddock.Manager.Harvesting rule
        rule Fertilise at sowing: same as Barley_HB90Sow1_3.paddock.Manager.Fertilise at sowing
      soil M Block90: Site=HRS; Region=Warwick; LocalName=HRS; SoilType=HMM90; NearestTown=Unknown; NaturalVegetation=Unknown; Cona=6.5; DiffusConst=88; DiffusSlope=35; U=2; Salb=0.2; Cn2Bare=85; CnRed=20; CnCov=0.8; CnCanopyFact=0.8; RootCn=50; RootWt=1000; SoilCn=12.5; EnrACoeff=7.4; EnrBCoeff=0.2
        InitWater: same as Barley_HB90Sow1_3.paddock.M Block90.InitWater
        InitNitrogen
          profile
            layer:
              no3    nh4    thickness
              3.226  0.596  100
              3.093  0.099  100
              1.500  0.099  200
              1.485  0.099  200
              1.456  0.099  200
              1.415  0.099  200
              1.351  0.099  200
              1.304  0.099  200
              1.250  0.099  200
              1.200  0.099  200
        profile: same as Barley_HB90Sow1_3.paddock.M Block90.profile
      barley
      logic Calculator
        on init:
```
sd = 0
```
        on end_of_day:
        script: same as in Barley_HB90Sow1_3.paddock.Calculator
      logic Irrigator
      fertiliser
      logic Fertilizer
      irrigation
        automatic_irrigation = on  # switch
        asw_depth = 1800  # Depth to which ASW is calculated. (mm)
        crit_fr_asw = 0.8  # Fraction of ASW below which irrigation is applied (0-1.0)
        irrigation_efficiency = 1.0  # Efficiency of the irrigation. (0-1.0)
  simulation Barley_HRS87-2MP_1
    clock
      start_date = 2/04/1987  # Select the start date of the simulation
      end_date = 19/09/1987  # Select the end date of the simulation
    summaryfile: filename=Barley_HRS87-2MP_1.sum
    metfile met: filename=HRS87-2MP.met
    area paddock
      registrations global
      outputfile: same as Barley_HB90Sow1_3.paddock.outputfile
      manager
        rule Sow on a fixed date
          condition start_of_day:
            if (today = date('[date]') then
                          [crop] sow plants =[density], sowing_depth = [depth], cultivar = [cultivar], row_spacing = [row_spacing]
                     endif
          category Sowing criteria
            date = 2/04/1987  # Enter sowing date (d/m/yyyy)
          category Sowing parameters
            crop = barley  # Enter name of crop to sow
            density = 68.9  # Enter sowing density (plants/m2)
            depth = 50  # Enter sowing depth (mm)
            cultivar = Grimmett  # Enter cultivar
            row_spacing = 250  # Enter row spacing (mm)
        rule Harvesting rule: same as Barley_HB90Sow1_3.paddock.Manager.Harvesting rule
        rule Fertilise at sowing
          condition [modulename].[eventname]=[fertmodule] apply amount = [fert_amount_sow] (kg/ha), depth = 50 (mm), type = [fert_type_sow]
          category When should fertiliser be applied
            modulename = barley  # On which module should the event come from
            eventname = sowing  # On which event should fertiliser be applied
          category Fertiliser application details
            fertmodule = fertiliser  # Module used to apply the fertiliser
            fert_amount_sow = 80  # Amount of starter fertiliser at sowing (kg/ha)
            fert_type_sow = urea_N  # Sowing fertiliser type
      soil M Block87: Site=HRS; Region=Warwick; LocalName=HRS; SoilType=HMM87; NearestTown=Unknown; NaturalVegetation=Unknown; Cona=3.5; DiffusConst=88; DiffusSlope=35.4; U=6; Salb=0.13; Cn2Bare=85; CnRed=20; CnCov=0.8; CnCanopyFact=0.8; RootCn=50; RootWt=1000; SoilCn=12.5; EnrACoeff=7.4; EnrBCoeff=0.2
        InitWater
          profile
            layer:
              sw     thickness
              0.371  100
              0.418  100
              0.442  100
              0.455  100
              0.438  100
              0.435  100
              0.366  200
              0.320  200
              0.335  200
              0.337  200
        InitNitrogen
          profile
            layer:
              no3     nh4    thickness
              16.754  1.298  100
              2.432   0.999  100
              2.432   0.999  100
              1.756   0.799  100
              1.486   0.799  100
              2.162   0.499  100
              1.351   0.499  200
              1.351   0.499  200
              1.351   0.499  200
              1.351   0.499  200
        profile
          layer:
            thickness  bd     ll15   airdry  dul    sat    sw     swcon  oc     ph     fbiom  finert  no3    nh4    ll Barley  kl Barley  xf Barley
            100        1.300  0.180  0.160   0.400  0.450  0.371  0.100  1.030  8.200  0.050  0.390   1.240  1.300  0.180      0.090      1
            100        1.300  0.220  0.220   0.450  0.460  0.418  0.100  0.860  8.500  0.020  0.470   0.180  1      0.220      0.090      1
            100        1.290  0.260  0.260   0.470  0.480  0.442  0.100  0.770  8.600  0.010  0.520   0.180  1      0.260      0.090      1
            100        1.310  0.270  0.270   0.480  0.490  0.455  0.100  0.650  8.600  0.010  0.620   0.130  0.800  0.270      0.090      1
            100        1.350  0.300  0.300   0.490  0.490  0.438  0.100  0.540  7.400  0.010  0.740   0.110  0.800  0.300      0.090      1
            100        1.360  0.300  0.300   0.480  0.486  0.435  0.100  0.480  5.300  0.010  0.830   0.160  0.500  0.300      0.080      1
            200        1.360  0.270  0.270   0.430  0.440  0.366  0.100  0.040  5      0.010  0.930   0.100  0.500  0.270      0.070      1
            200        1.350  0.230  0.230   0.380  0.390  0.320  0.100  0.540  7.400  0.010  0.930   0.100  0.500  0.230      0.060      1
            200        1.360  0.240  0.240   0.370  0.380  0.335  0.100  0.480  5.300  0.010  0.930   0.100  0.500  0.240      0.050      1
            200        1.360  0.230  0.230   0.380  0.390  0.337  0.100  0.430  5      0.010  0.930   0.100  0.500  0.230      0.040      1
      barley
      logic Calculator
        on init:
```
sd = 0
```
        on end_of_day:
        script: same as in Barley_HB90Sow1_3.paddock.Calculator
      irrigation
        automatic_irrigation = off  # switch
        asw_depth = 600.0  # Depth to which ASW is calculated. (mm)
        crit_fr_asw = 0.9  # Fraction of ASW below which irrigation is applied (0-1.0)
        irrigation_efficiency = 1.0  # Efficiency of the irrigation. (0-1.0)
      logic Irrigator
      fertiliser
      logic Fertilizer
  simulation Barley_HRS87-3MP_1
    clock
      start_date = 26/05/1987  # Select the start date of the simulation
      end_date = 31/10/1987  # Select the end date of the simulation
    summaryfile: filename=Barley_HRS87-3MP_1.sum
    metfile met: filename=HRS87-3MP.met
    area paddock
      registrations global
      outputfile: same as Barley_HB90Sow1_3.paddock.outputfile
      manager
        rule Sow on a fixed date
          condition start_of_day:
            if (today = date('[date]') then
                          [crop] sow plants =[density], sowing_depth = [depth], cultivar = [cultivar], row_spacing = [row_spacing]
                     endif
          category Sowing criteria
            date = 26/05/1987  # Enter sowing date (d/m/yyyy)
          category Sowing parameters
            crop = barley  # Enter name of crop to sow
            density = 99.93  # Enter sowing density (plants/m2)
            depth = 50  # Enter sowing depth (mm)
            cultivar = Grimmett  # Enter cultivar
            row_spacing = 250  # Enter row spacing (mm)
        rule Harvesting rule: same as Barley_HB90Sow1_3.paddock.Manager.Harvesting rule
        rule Fertilise at sowing: same as Barley_HRS87-2MP_1.paddock.Manager.Fertilise at sowing
      soil M Block87: same as Barley_HRS87-2MP_1.paddock.M Block87
      barley
      logic Calculator
        on init:
```
sd = 0
```
        on end_of_day:
        script: same as in Barley_HB90Sow1_3.paddock.Calculator
      irrigation
        automatic_irrigation = off  # switch
        asw_depth = 600.0  # Depth to which ASW is calculated. (mm)
        crit_fr_asw = 0.9  # Fraction of ASW below which irrigation is applied (0-1.0)
        irrigation_efficiency = 1.0  # Efficiency of the irrigation. (0-1.0)
      logic Irrigator
      fertiliser
      logic Fertilizer
  simulation Barley_HRSRO-DD_1
    clock
      start_date = 24/06/1991  # Select the start date of the simulation
      end_date = 20/11/1991  # Select the end date of the simulation
    summaryfile: filename=Barley_HRSRO-DD_1.sum
    metfile met: filename=HRSRO - DD.met
    area paddock
      registrations global
      outputfile: same as Barley_HB90Sow1_3.paddock.outputfile
      manager
        rule Sow on a fixed date
          condition start_of_day:
            if (today = date('[date]') then
                          [crop] sow plants =[density], sowing_depth = [depth], cultivar = [cultivar], row_spacing = [row_spacing]
                     endif
          category Sowing criteria
            date = 15/7/1991  # Enter sowing date (d/m/yyyy)
          category Sowing parameters
            crop = barley  # Enter name of crop to sow
            density = 100  # Enter sowing density (plants/m2)
            depth = 50  # Enter sowing depth (mm)
            cultivar = Grimmett  # Enter cultivar
            row_spacing = 250  # Enter row spacing (mm)
        rule Harvesting rule: same as Barley_HB90Sow1_3.paddock.Manager.Harvesting rule
        rule Fertilise at sowing: same as Barley_HRS87-2MP_1.paddock.Manager.Fertilise at sowing
      soil M Block92: Site=HRS; Region=Warwick; LocalName=HRS; SoilType=HMM92; NearestTown=Unknown; NaturalVegetation=Unknown; Cona=6.5; DiffusConst=88; DiffusSlope=35; U=2; Salb=0.2; Cn2Bare=85; CnRed=20; CnCov=0.8; CnCanopyFact=0.8; RootCn=50; RootWt=1000; SoilCn=12.5; EnrACoeff=7.4; EnrBCoeff=0.2
        InitWater
          profile
            layer:
              sw     thickness
              0.320  100
              0.405  100
              0.470  200
              0.450  200
              0.400  200
              0.370  200
              0.339  200
              0.310  200
              0.291  200
              0.321  200
        InitNitrogen
          profile
            layer:
              no3    nh4    thickness
              1.717  0.745  100
              1.717  0.124  100
              0.687  0.124  200
              0.343  0.124  200
              0.343  0.124  200
              0.343  0.124  200
              0.343  0.124  200
              0.343  0.124  200
              0.343  0.124  200
              0.343  0.124  200
        profile
          layer:
            thickness  bd     ll15   airdry  dul    sat    sw     swcon  oc     ph     fbiom  finert  no3    nh4    ll Barley  kl Barley  xf Barley
            100        0.930  0.200  0.080   0.420  0.450  0.240  0.300  1.190  6.300  0.050  0.450   0.050  0.600  0.200      0.090      1
            100        0.970  0.250  0.190   0.420  0.450  0.358  0.300  0.590  6.400  0.020  0.600   0.050  0.100  0.250      0.090      1
            200        1      0.250  0.230   0.460  0.480  0.351  0.300  0.450  6.500  0.010  0.750   0.020  0.100  0.250      0.090      1
            200        1.010  0.300  0.300   0.460  0.480  0.368  0.300  0.300  6.600  0.010  0.900   0.010  0.100  0.300      0.090      1
            200        1.030  0.320  0.320   0.430  0.450  0.366  0.300  0.200  6.600  0.010  0.900   0.010  0.100  0.320      0.080      1
            200        1.060  0.330  0.330   0.400  0.410  0.355  0.300  0.160  6.500  0.010  0.900   0.010  0.100  0.330      0.070      1
            200        1.110  0.280  0.280   0.370  0.380  0.320  0.300  0.170  6.500  0.010  0.900   0.010  0.100  0.280      0.060      1
            200        1.150  0.290  0.290   0.330  0.370  0.308  0.300  0.170  6.500  0.050  0.900   0.010  0.100  0.290      0.050      1
            200        1.200  0.290  0.290   0.320  0.370  0.280  0.300  0.170  6.500  0.020  0.900   0.010  0.100  0.290      0.050      1
            200        1.250  0.320  0.320   0.330  0.370  0.222  0.300  0.170  6.500  0.010  0.900   0.010  0.100  0.320      0.040      1
      barley
      logic Calculator
        on init:
```
sd = 0
```
        on end_of_day:
        script: same as in Barley_HB90Sow1_3.paddock.Calculator
      irrigation
        automatic_irrigation = off  # switch
        asw_depth = 600.0  # Depth to which ASW is calculated. (mm)
        crit_fr_asw = 0.9  # Fraction of ASW below which irrigation is applied (0-1.0)
        irrigation_efficiency = 1.0  # Efficiency of the irrigation. (0-1.0)
      logic Irrigator
        on start_of_day:
```
           
           if (day = 188) then 
               irrigation apply amount = 22 
           endif
           

           
           if (day = 191) then 
               irrigation apply amount = 10 
           endif
```
      fertiliser
      logic Fertilizer
  simulation Barley_HRSRO-DI_1
    clock
      start_date = 24/06/1991  # Select the start date of the simulation
      end_date = 20/11/1991  # Select the end date of the simulation
    summaryfile: filename=Barley_HRSRO-DI_1.sum
    metfile met: filename=HRSRO - DI.met
    area paddock
      registrations global
      outputfile: same as Barley_HB90Sow1_3.paddock.outputfile
      manager
        rule Sow on a fixed date
          condition start_of_day:
            if (today = date('[date]') then
                          [crop] sow plants =[density], sowing_depth = [depth], cultivar = [cultivar], row_spacing = [row_spacing]
                     endif
          category Sowing criteria
            date = 30/6/1991  # Enter sowing date (d/m/yyyy)
          category Sowing parameters
            crop = barley  # Enter name of crop to sow
            density = 100  # Enter sowing density (plants/m2)
            depth = 50  # Enter sowing depth (mm)
            cultivar = Grimmett  # Enter cultivar
            row_spacing = 250  # Enter row spacing (mm)
        rule Harvesting rule: same as Barley_HB90Sow1_3.paddock.Manager.Harvesting rule
        rule Fertilise at sowing: same as Barley_HRS87-2MP_1.paddock.Manager.Fertilise at sowing
      barley
      logic Calculator
        on init:
```
sd = 0
```
        on end_of_day:
        script: same as in Barley_HB90Sow1_3.paddock.Calculator
      irrigation
        automatic_irrigation = off  # switch
        asw_depth = 600.0  # Depth to which ASW is calculated. (mm)
        crit_fr_asw = 0.9  # Fraction of ASW below which irrigation is applied (0-1.0)
        irrigation_efficiency = 1.0  # Efficiency of the irrigation. (0-1.0)
      logic Irrigator
        on start_of_day:
```
           
           if (day = 188) then 
               irrigation apply amount = 22 
           endif
           

           
           if (day = 191) then 
               irrigation apply amount = 10 
           endif
           

           
           if (day = 262) then 
               irrigation apply amount = 96 
           endif
           

           
           if (day = 274) then 
               irrigation apply amount = 62 
           endif
           

           
           if (day = 283) then 
               irrigation apply amount = 48 
           endif
           

           
           if (day = 292) then 
               irrigation apply amount = 63 
           endif
           

           
           if (day = 303) then 
               irrigation apply amount = 135 
           endif
           

           
           if (day = 312) then 
               irrigation apply amount = 40 
           endif
           

           
           if (day = 325) then 
               irrigation apply amount = 32 
           endif
```
      fertiliser
      logic Fertilizer
      soil M Block92: Site=HRS; Region=Warwick; LocalName=HRS; SoilType=HMM92; NearestTown=Unknown; NaturalVegetation=Unknown; Cona=6.5; DiffusConst=88; DiffusSlope=35; U=2; Salb=0.2; Cn2Bare=85; CnRed=20; CnCov=0.8; CnCanopyFact=0.8; RootCn=50; RootWt=1000; SoilCn=12.5; EnrACoeff=7.4; EnrBCoeff=0.2
        InitWater
          profile
            layer:
              sw     thickness
              0.330  100
              0.400  100
              0.420  200
              0.400  200
              0.350  200
              0.350  200
              0.343  200
              0.324  200
              0.310  200
              0.321  200
        InitNitrogen: same as Barley_HRSRO-DD_1.paddock.M Block92.InitNitrogen
        profile: same as Barley_HRSRO-DD_1.paddock.M Block92.profile
  simulation Barley_HRSRO-II_1
    clock
      start_date = 24/06/1991  # Select the start date of the simulation
      end_date = 20/11/1991  # Select the end date of the simulation
    summaryfile: filename=Barley_HRSRO-II_1.sum
    metfile met: filename=HRSRO - II.met
    area paddock
      registrations global
      outputfile: same as Barley_HB90Sow1_3.paddock.outputfile
      manager: same as Barley_HRSRO-DI_1.paddock.Manager
      barley
      logic Calculator
        on init:
```
sd = 0
```
        on end_of_day:
        script: same as in Barley_HB90Sow1_3.paddock.Calculator
      irrigation
        automatic_irrigation = off  # switch
        asw_depth = 600.0  # Depth to which ASW is calculated. (mm)
        crit_fr_asw = 0.9  # Fraction of ASW below which irrigation is applied (0-1.0)
        irrigation_efficiency = 1.0  # Efficiency of the irrigation. (0-1.0)
      logic Irrigator
        on start_of_day:
```
           
           if (day = 188) then 
               irrigation apply amount = 22 
           endif
           

           
           if (day = 191) then 
               irrigation apply amount = 10 
           endif
           

           
           if (day = 220) then 
               irrigation apply amount = 19 
           endif
           

           
           if (day = 224) then 
               irrigation apply amount = 56 
           endif
           

           
           if (day = 238) then 
               irrigation apply amount = 40
           endif
           

           
           if (day = 252) then 
               irrigation apply amount = 50 
           endif
           

           
           if (day = 262) then 
               irrigation apply amount = 50 
           endif
           

           
           if (day = 274) then 
               irrigation apply amount = 54 
           endif
           

           
           if (day = 283) then 
               irrigation apply amount = 35 
           endif
           

           
           if (day = 291) then 
               irrigation apply amount = 1 
           endif
           

           
           if (day = 292) then 
               irrigation apply amount = 60 
           endif
           

           
           if (day = 303) then 
               irrigation apply amount = 60 
           endif
           

           
           if (day = 312) then 
               irrigation apply amount = 37 
           endif
```
      fertiliser
      logic Fertilizer
      soil M Block92: Site=HRS; Region=Warwick; LocalName=HRS; SoilType=HMM92; NearestTown=Unknown; NaturalVegetation=Unknown; Cona=6.5; DiffusConst=88; DiffusSlope=35; U=2; Salb=0.2; Cn2Bare=85; CnRed=20; CnCov=0.8; CnCanopyFact=0.8; RootCn=50; RootWt=1000; SoilCn=12.5; EnrACoeff=7.4; EnrBCoeff=0.2
        InitWater
          profile
            layer:
              sw     thickness
              0.300  100
              0.370  100
              0.440  200
              0.450  200
              0.320  200
              0.330  200
              0.310  200
              0.324  200
              0.310  200
              0.321  200
        InitNitrogen: same as Barley_HRSRO-DD_1.paddock.M Block92.InitNitrogen
        profile: same as Barley_HRSRO-DD_1.paddock.M Block92.profile
  simulation Barley_KthpeRain05_5
    clock
      start_date = 11/07/2005  # Select the start date of the simulation
      end_date = 29/11/2005  # Select the end date of the simulation
    summaryfile: filename=Barley_KthpeRain05_5.sum
    metfile met: filename=KthpeRain05.met
    area paddock
      registrations global
      outputfile: same as Barley_HB90Sow1_3.paddock.outputfile
      manager
        rule Sow on a fixed date
          condition start_of_day:
            if (today = date('[date]') then
                          [crop] sow plants =[density], sowing_depth = [depth], cultivar = [cultivar], row_spacing = [row_spacing]
                     endif
          category Sowing criteria
            date = 11/07/2005  # Enter sowing date (d/m/yyyy)
          category Sowing parameters
            crop = barley  # Enter name of crop to sow
            density = 100  # Enter sowing density (plants/m2)
            depth = 50  # Enter sowing depth (mm)
            cultivar = Mackay  # Enter cultivar
            row_spacing = 250  # Enter row spacing (mm)
        rule Harvesting rule: same as Barley_HB90Sow1_3.paddock.Manager.Harvesting rule
        rule Fertilise at sowing
          condition [modulename].[eventname]=[fertmodule] apply amount = [fert_amount_sow] (kg/ha), depth = 50 (mm), type = [fert_type_sow]
          category When should fertiliser be applied
            modulename = barley  # On which module should the event come from
            eventname = sowing  # On which event should fertiliser be applied
          category Fertiliser application details
            fertmodule = fertiliser  # Module used to apply the fertiliser
            fert_amount_sow = 20  # Amount of starter fertiliser at sowing (kg/ha)
            fert_type_sow = urea_N  # Sowing fertiliser type
      soil Bay 0: Site=Kingsthorpe; Region=Jondaryan; LocalName=Kingsthorpe; SoilType=Waco-R; NearestTown=Unknown; NaturalVegetation=Unknown; Cona=3.5; DiffusConst=40; DiffusSlope=16; U=6; Salb=0.13; Cn2Bare=73; CnRed=20; CnCov=0.8; CnCanopyFact=0.8; RootCn=40; RootWt=200; SoilCn=12.5; EnrACoeff=7.4; EnrBCoeff=0.2
        InitWater
          profile
            layer:
              sw     thickness
              0.380  100
              0.500  200
              0.530  200
              0.520  200
              0.500  200
              0.490  200
              0.510  200
              0.500  200
              0.460  200
              0.460  200
        InitNitrogen
          profile
            layer:
              no3     nh4    thickness
              37.100  0.278  100
              37.100  0.139  200
              19.700  0.142  200
              19.700  0.142  200
              16.800  0.138  200
              16.800  0.138  200
              15.900  0.138  200
              15.900  0.138  200
              17.100  0.133  200
              17.100  0.133  200
        profile
          layer:
            thickness  bd     ll15   airdry  dul    sat    sw     swcon  oc     ph     fbiom  finert  no3     nh4  ll Barley  kl Barley  xf Barley
            100        1.080  0.340  0.220   0.520  0.570  0.340  0.300  1      7      0.030  0.400   37.100  0    0.340      0.090      1
            200        1.080  0.350  0.340   0.530  0.580  0.500  0.300  0.900  7      0.030  0.400   37.100  0    0.350      0.090      1
            200        1.060  0.360  0.360   0.530  0.570  0.510  0.300  0.900  8.500  0.020  0.600   19.700  0    0.360      0.090      1
            200        1.060  0.340  0.340   0.530  0.580  0.520  0.300  0.900  8.500  0.020  0.600   19.700  0    0.340      0.080      1
            200        1.090  0.340  0.340   0.540  0.540  0.500  0.300  0.900  8.500  0.010  0.800   16.800  0    0.340      0.080      1
            200        1.090  0.350  0.350   0.520  0.540  0.520  0.300  0.800  8.500  0.010  0.900   16.800  0    0.350      0.070      1
            200        1.090  0.360  0.360   0.510  0.550  0.510  0.300  0.800  8.500  0.010  0.950   15.900  0    0.360      0.060      1
            200        1.090  0.350  0.350   0.510  0.530  0.500  0.300  0.400  8.500  0.010  0.950   15.900  0    0.350      0.050      1
            200        1.130  0.370  0.370   0.460  0.530  0.460  0.300  0.300  8.500  0.010  0.950   17.100  0    0.370      0.040      1
            200        1.130  0.370  0.370   0.460  0.530  0.460  0.300  0.300  8.500  0.010  0.950   17.100  0    0.370      0.030      1
      barley
      logic Calculator
        on init:
```
sd = 0
```
        on end_of_day:
        script: same as in Barley_HB90Sow1_3.paddock.Calculator
      irrigation
        automatic_irrigation = off  # switch
        asw_depth = 1800  # Depth to which ASW is calculated. (mm)
        crit_fr_asw = 0.8  # Fraction of ASW below which irrigation is applied (0-1.0)
        irrigation_efficiency = 1.0  # Efficiency of the irrigation. (0-1.0)
      logic Irrigator
      fertiliser
      logic Fertilizer
  simulation Barley_Well360_1
    clock
      start_date = 29/06/1993  # Select the start date of the simulation
      end_date = 21/12/1993  # Select the end date of the simulation
    summaryfile: filename=Barley_Well360_1.sum
    metfile met: filename=Well360.met
    area paddock
      registrations global
      outputfile: same as Barley_HB90Sow1_3.paddock.outputfile
      manager
        rule Sow on a fixed date
          condition start_of_day:
            if (today = date('[date]') then
                          [crop] sow plants =[density], sowing_depth = [depth], cultivar = [cultivar], row_spacing = [row_spacing]
                     endif
          category Sowing criteria
            date = 29/06/1993  # Enter sowing date (d/m/yyyy)
          category Sowing parameters
            crop = barley  # Enter name of crop to sow
            density = 100  # Enter sowing density (plants/m2)
            depth = 50  # Enter sowing depth (mm)
            cultivar = Grimmett  # Enter cultivar
            row_spacing = 250  # Enter row spacing (mm)
        rule Harvesting rule: same as Barley_HB90Sow1_3.paddock.Manager.Harvesting rule
        rule Fertilise at sowing
          condition [modulename].[eventname]=[fertmodule] apply amount = [fert_amount_sow] (kg/ha), depth = 50 (mm), type = [fert_type_sow]
          category When should fertiliser be applied
            modulename = barley  # On which module should the event come from
            eventname = sowing  # On which event should fertiliser be applied
          category Fertiliser application details
            fertmodule = fertiliser  # Module used to apply the fertiliser
            fert_amount_sow = 130  # Amount of starter fertiliser at sowing (kg/ha)
            fert_type_sow = urea_N  # Sowing fertiliser type
      soil Bay 4: Site=Wellcamp; Region=Jondaryan; LocalName=Wellcamp; SoilType=Wellcamp93; NearestTown=Unknown; NaturalVegetation=Unknown; Cona=3.5; DiffusConst=88; DiffusSlope=35.4; U=6; Salb=0.13; Cn2Bare=60; CnRed=20; CnCov=0.8; CnCanopyFact=0.8; RootCn=40; RootWt=200; SoilCn=12.5; EnrACoeff=7.4; EnrBCoeff=0.2
        InitWater
          profile
            layer:
              sw     thickness
              0.520  150
              0.530  150
              0.530  300
              0.480  300
              0.480  300
              0.480  300
              0.480  300
        InitNitrogen
          profile
            layer:
              no3     nh4    thickness
              10.582  0.317  150
              9.430   0.283  150
              4.669   0.140  300
              4.450   0.134  300
              4.141   0.124  300
              3.580   0.107  300
              3.527   0.106  300
        profile
          layer:
            thickness  bd     ll15   airdry  dul    sat    sw     swcon  oc     ph     fbiom  finert  no3  nh4  ll Barley  kl Barley  xf Barley
            150        0.900  0.220  0.110   0.520  0.590  0.566  0.400  1      7      0.030  0.400   0    0    0.220      0.900      1
            150        1.010  0.340  0.306   0.530  0.590  0.600  0.400  0.900  7      0.030  0.400   0    0    0.340      0.900      1
            300        1.020  0.380  0.380   0.540  0.590  0.600  0.400  0.800  8.500  0.020  0.600   0    0    0.380      0.900      1
            300        1      0.360  0.360   0.540  0.590  0.280  0.400  0.800  8.500  0.020  0.600   0    0    0.360      0.800      1
            300        1.060  0.400  0.400   0.520  0.570  0.280  0.400  0.400  8.500  0.010  0.800   0    0    0.400      0.700      1
            300        1.140  0.360  0.360   0.490  0.540  0.280  0.400  0.300  8.500  0.010  0.900   0    0    0.360      0.600      1
            300        1.230  0.380  0.380   0.460  0.510  0.280  0.400  0.300  8.500  0.010  0.950   0    0    0.380      0.500      1
      barley
      logic Calculator
        on init:
```
sd = 0
```
        on end_of_day:
        script: same as in Barley_HB90Sow1_3.paddock.Calculator
      logic Irrigator
      fertiliser
      logic Fertilizer
      irrigation
        automatic_irrigation = on  # switch
        asw_depth = 1800  # Depth to which ASW is calculated. (mm)
        crit_fr_asw = 0.8  # Fraction of ASW below which irrigation is applied (0-1.0)
        irrigation_efficiency = 1.0  # Efficiency of the irrigation. (0-1.0)
  simulation Barley_R88-1HP_1
    clock
      start_date = 12/03/1988  # Select the start date of the simulation
      end_date = 1/09/1988  # Select the end date of the simulation
    summaryfile: filename=Barley_R88-1HP_1.sum
    metfile met: filename=R88-1HP.met
    area paddock
      registrations global
      outputfile: same as Barley_HB90Sow1_3.paddock.outputfile
      manager
        rule Sow on a fixed date
          condition start_of_day:
            if (today = date('[date]') then
                          [crop] sow plants =[density], sowing_depth = [depth], cultivar = [cultivar], row_spacing = [row_spacing]
                     endif
          category Sowing criteria
            date = 12/03/1988  # Enter sowing date (d/m/yyyy)
          category Sowing parameters
            crop = barley  # Enter name of crop to sow
            density = 120.9  # Enter sowing density (plants/m2)
            depth = 50  # Enter sowing depth (mm)
            cultivar = Grimmett  # Enter cultivar
            row_spacing = 250  # Enter row spacing (mm)
        rule Harvesting rule: same as Barley_HB90Sow1_3.paddock.Manager.Harvesting rule
        rule Fertilise at sowing: same as Barley_HRS87-2MP_1.paddock.Manager.Fertilise at sowing
      soil Bay 0: Site=Roma; Region=Roma; LocalName=Roma; SoilType=R88; NearestTown=Unknown; NaturalVegetation=Unknown; Cona=3.5; DiffusConst=88; DiffusSlope=35.4; U=6; Salb=0.13; Cn2Bare=73; CnRed=20; CnCov=0.8; CnCanopyFact=0.8; RootCn=40; RootWt=6; SoilCn=14.5; EnrACoeff=7.4; EnrBCoeff=0.2
        InitWater
          profile
            layer:
              sw     thickness
              0.376  100
              0.431  100
              0.407  100
              0.444  100
              0.403  100
              0.402  100
              0.341  200
              0.325  200
              0.295  400
              0.260  200
        InitNitrogen
          profile
            layer:
              no3    nh4    thickness
              7.803  1.300  100
              1.133  1      100
              1.133  1      100
              0.818  0.800  100
              0.692  0.800  100
              1.007  0.500  100
              0.629  0.500  200
              0.629  0.500  200
              0.629  0.500  400
              0.629  0.500  200
        profile
          layer:
            thickness  bd     ll15   airdry  dul    sat    sw     swcon  oc     ph     fbiom  finert  no3    nh4    ll Barley  kl Barley  xf Barley
            100        1.300  0.130  0.100   0.380  0.410  0.376  0.100  1.030  8.200  0.050  0.390   1.240  1.300  0.130      0.090      1
            100        1.300  0.190  0.150   0.410  0.460  0.431  0.100  0.860  8.500  0.020  0.470   0.180  1      0.190      0.090      1
            100        1.290  0.190  0.190   0.410  0.460  0.407  0.100  0.770  8.600  0.010  0.520   0.180  1      0.190      0.090      1
            100        1.310  0.220  0.220   0.430  0.480  0.444  0.100  0.650  8.600  0.010  0.620   0.130  0.800  0.220      0.090      1
            100        1.350  0.250  0.250   0.420  0.470  0.403  0.100  0.540  7.400  0.010  0.740   0.110  0.800  0.250      0.080      1
            100        1.360  0.250  0.250   0.420  0.470  0.402  0.100  0.480  5.300  0.010  0.830   0.160  0.500  0.250      0.080      1
            200        1.360  0.280  0.280   0.410  0.460  0.341  0.100  0.430  5      0.010  0.930   0.100  0.500  0.280      0.070      1
            200        1.350  0.280  0.280   0.400  0.450  0.325  0.100  0.540  7.400  0.010  0.930   0.100  0.500  0.280      0.060      1
            400        1.360  0.260  0.260   0.360  0.410  0.295  0.100  0.480  5.300  0.010  0.930   0.100  0.500  0.260      0.030      1
            200        1.360  0.250  0.250   0.340  0.390  0.358  0.100  0.430  5      0.010  0.930   0.100  0.500  0.250      0.010      1
      barley
      logic Calculator
        on init:
```
sd = 0
```
        on end_of_day:
        script: same as in Barley_HB90Sow1_3.paddock.Calculator
      irrigation
        automatic_irrigation = off  # switch
        asw_depth = 600.0  # Depth to which ASW is calculated. (mm)
        crit_fr_asw = 0.9  # Fraction of ASW below which irrigation is applied (0-1.0)
        irrigation_efficiency = 1.0  # Efficiency of the irrigation. (0-1.0)
      logic Irrigator
      fertiliser
      logic Fertilizer
  simulation Barley_R88-1MP_1
    clock
      start_date = 12/03/1988  # Select the start date of the simulation
      end_date = 1/09/1988  # Select the end date of the simulation
    summaryfile: filename=Barley_R88-1MP_1.sum
    metfile met: filename=R88-1MP.met
    area paddock
      registrations global
      outputfile: same as Barley_HB90Sow1_3.paddock.outputfile
      manager
        rule Sow on a fixed date
          condition start_of_day:
            if (today = date('[date]') then
                          [crop] sow plants =[density], sowing_depth = [depth], cultivar = [cultivar], row_spacing = [row_spacing]
                     endif
          category Sowing criteria
            date = 12/03/1988  # Enter sowing date (d/m/yyyy)
          category Sowing parameters
            crop = barley  # Enter name of crop to sow
            density = 46.4  # Enter sowing density (plants/m2)
            depth = 50  # Enter sowing depth (mm)
            cultivar = Grimmett  # Enter cultivar
            row_spacing = 250  # Enter row spacing (mm)
        rule Harvesting rule: same as Barley_HB90Sow1_3.paddock.Manager.Harvesting rule
        rule Fertilise at sowing: same as Barley_HRS87-2MP_1.paddock.Manager.Fertilise at sowing
      barley
      logic Calculator
        on init:
```
sd = 0
```
        on end_of_day:
        script: same as in Barley_HB90Sow1_3.paddock.Calculator
      irrigation
        automatic_irrigation = off  # switch
        asw_depth = 600.0  # Depth to which ASW is calculated. (mm)
        crit_fr_asw = 0.9  # Fraction of ASW below which irrigation is applied (0-1.0)
        irrigation_efficiency = 1.0  # Efficiency of the irrigation. (0-1.0)
      logic Irrigator
      fertiliser
      logic Fertilizer
      soil Bay 0: same as Barley_R88-1HP_1.paddock.Bay 0
  simulation Barley_R88-2HP_1
    clock
      start_date = 21/04/1988  # Select the start date of the simulation
      end_date = 20/09/1988  # Select the end date of the simulation
    summaryfile: filename=Barley_R88-2HP_1.sum
    metfile met: filename=R88-2HP.met
    area paddock
      registrations global
      outputfile: same as Barley_HB90Sow1_3.paddock.outputfile
      manager
        rule Sow on a fixed date
          condition start_of_day:
            if (today = date('[date]') then
                          [crop] sow plants =[density], sowing_depth = [depth], cultivar = [cultivar], row_spacing = [row_spacing]
                     endif
          category Sowing criteria
            date = 21/04/1988  # Enter sowing date (d/m/yyyy)
          category Sowing parameters
            crop = barley  # Enter name of crop to sow
            density = 179.51  # Enter sowing density (plants/m2)
            depth = 50  # Enter sowing depth (mm)
            cultivar = Grimmett  # Enter cultivar
            row_spacing = 250  # Enter row spacing (mm)
        rule Harvesting rule: same as Barley_HB90Sow1_3.paddock.Manager.Harvesting rule
        rule Fertilise at sowing: same as Barley_HRS87-2MP_1.paddock.Manager.Fertilise at sowing
      barley
      logic Calculator
        on init:
```
sd = 0
```
        on end_of_day:
        script: same as in Barley_HB90Sow1_3.paddock.Calculator
      irrigation
        automatic_irrigation = off  # switch
        asw_depth = 600.0  # Depth to which ASW is calculated. (mm)
        crit_fr_asw = 0.9  # Fraction of ASW below which irrigation is applied (0-1.0)
        irrigation_efficiency = 1.0  # Efficiency of the irrigation. (0-1.0)
      logic Irrigator
      fertiliser
      logic Fertilizer
      soil Bay 0: Site=Roma; Region=Roma; LocalName=Roma; SoilType=R88; NearestTown=Unknown; NaturalVegetation=Unknown; Cona=3.5; DiffusConst=88; DiffusSlope=35.4; U=6; Salb=0.13; Cn2Bare=73; CnRed=20; CnCov=0.8; CnCanopyFact=0.8; RootCn=40; RootWt=6; SoilCn=14.5; EnrACoeff=7.4; EnrBCoeff=0.2
        InitWater
          profile
            layer:
              sw     thickness
              0.395  100
              0.450  100
              0.414  100
              0.451  100
              0.406  100
              0.405  100
              0.322  200
              0.305  200
              0.295  400
              0.258  200
        InitNitrogen: same as Barley_R88-1HP_1.paddock.Bay 0.InitNitrogen
        profile: same as Barley_R88-1HP_1.paddock.Bay 0.profile
  simulation Barley_R88-2MP_1
    clock
      start_date = 21/04/1988  # Select the start date of the simulation
      end_date = 20/09/1988  # Select the end date of the simulation
    summaryfile: filename=Barley_R88-2MP_1.sum
    metfile met: filename=R88-2MP.met
    area paddock
      registrations global
      outputfile: same as Barley_HB90Sow1_3.paddock.outputfile
      manager
        rule Sow on a fixed date
          condition start_of_day:
            if (today = date('[date]') then
                          [crop] sow plants =[density], sowing_depth = [depth], cultivar = [cultivar], row_spacing = [row_spacing]
                     endif
          category Sowing criteria
            date = 21/04/1988  # Enter sowing date (d/m/yyyy)
          category Sowing parameters
            crop = barley  # Enter name of crop to sow
            density = 63.3  # Enter sowing density (plants/m2)
            depth = 50  # Enter sowing depth (mm)
            cultivar = Grimmett  # Enter cultivar
            row_spacing = 250  # Enter row spacing (mm)
        rule Harvesting rule: same as Barley_HB90Sow1_3.paddock.Manager.Harvesting rule
        rule Fertilise at sowing: same as Barley_HRS87-2MP_1.paddock.Manager.Fertilise at sowing
      barley
      logic Calculator
        on init:
```
sd = 0
```
        on end_of_day:
        script: same as in Barley_HB90Sow1_3.paddock.Calculator
      irrigation
        automatic_irrigation = off  # switch
        asw_depth = 600.0  # Depth to which ASW is calculated. (mm)
        crit_fr_asw = 0.9  # Fraction of ASW below which irrigation is applied (0-1.0)
        irrigation_efficiency = 1.0  # Efficiency of the irrigation. (0-1.0)
      logic Irrigator
      fertiliser
      logic Fertilizer
      soil Bay 0: same as Barley_R88-2HP_1.paddock.Bay 0
  simulation Barley_R88-3HP_1
    clock
      start_date = 11/05/1988  # Select the start date of the simulation
      end_date = 4/10/1988  # Select the end date of the simulation
    summaryfile: filename=Barley_R88-3HP_1.sum
    metfile met: filename=R88-3HP.met
    area paddock
      registrations global
      outputfile: same as Barley_HB90Sow1_3.paddock.outputfile
      manager
        rule Sow on a fixed date
          condition start_of_day:
            if (today = date('[date]') then
                          [crop] sow plants =[density], sowing_depth = [depth], cultivar = [cultivar], row_spacing = [row_spacing]
                     endif
          category Sowing criteria
            date = 11/05/1988  # Enter sowing date (d/m/yyyy)
          category Sowing parameters
            crop = barley  # Enter name of crop to sow
            density = 175.3  # Enter sowing density (plants/m2)
            depth = 50  # Enter sowing depth (mm)
            cultivar = Grimmett  # Enter cultivar
            row_spacing = 250  # Enter row spacing (mm)
        rule Harvesting rule: same as Barley_HB90Sow1_3.paddock.Manager.Harvesting rule
        rule Fertilise at sowing: same as Barley_HRS87-2MP_1.paddock.Manager.Fertilise at sowing
      barley
      logic Calculator
        on init:
```
sd = 0
```
        on end_of_day:
        script: same as in Barley_HB90Sow1_3.paddock.Calculator
      irrigation
        automatic_irrigation = off  # switch
        asw_depth = 600.0  # Depth to which ASW is calculated. (mm)
        crit_fr_asw = 0.9  # Fraction of ASW below which irrigation is applied (0-1.0)
        irrigation_efficiency = 1.0  # Efficiency of the irrigation. (0-1.0)
      logic Irrigator
      fertiliser
      logic Fertilizer
      soil Bay 0: Site=Roma; Region=Roma; LocalName=Roma; SoilType=R88; NearestTown=Unknown; NaturalVegetation=Unknown; Cona=3.5; DiffusConst=88; DiffusSlope=35.4; U=6; Salb=0.13; Cn2Bare=73; CnRed=20; CnCov=0.8; CnCanopyFact=0.8; RootCn=40; RootWt=6; SoilCn=14.5; EnrACoeff=7.4; EnrBCoeff=0.2
        InitWater
          profile
            layer:
              sw     thickness
              0.377  100
              0.432  100
              0.411  100
              0.448  100
              0.408  100
              0.407  100
              0.362  200
              0.354  200
              0.295  400
              0.258  200
        InitNitrogen: same as Barley_R88-1HP_1.paddock.Bay 0.InitNitrogen
        profile: same as Barley_R88-1HP_1.paddock.Bay 0.profile
  simulation Barley_R88-3MP_1
    clock
      start_date = 11/05/1988  # Select the start date of the simulation
      end_date = 4/10/1988  # Select the end date of the simulation
    summaryfile: filename=Barley_R88-3MP_1.sum
    metfile met: filename=R88-3MP.met
    area paddock
      registrations global
      outputfile: same as Barley_HB90Sow1_3.paddock.outputfile
      manager
        rule Sow on a fixed date
          condition start_of_day:
            if (today = date('[date]') then
                          [crop] sow plants =[density], sowing_depth = [depth], cultivar = [cultivar], row_spacing = [row_spacing]
                     endif
          category Sowing criteria
            date = 11/05/1988  # Enter sowing date (d/m/yyyy)
          category Sowing parameters
            crop = barley  # Enter name of crop to sow
            density = 66.6  # Enter sowing density (plants/m2)
            depth = 50  # Enter sowing depth (mm)
            cultivar = Grimmett  # Enter cultivar
            row_spacing = 250  # Enter row spacing (mm)
        rule Harvesting rule: same as Barley_HB90Sow1_3.paddock.Manager.Harvesting rule
        rule Fertilise at sowing: same as Barley_HRS87-2MP_1.paddock.Manager.Fertilise at sowing
      barley
      logic Calculator
        on init:
```
sd = 0
```
        on end_of_day:
        script: same as in Barley_HB90Sow1_3.paddock.Calculator
      irrigation
        automatic_irrigation = off  # switch
        asw_depth = 600.0  # Depth to which ASW is calculated. (mm)
        crit_fr_asw = 0.9  # Fraction of ASW below which irrigation is applied (0-1.0)
        irrigation_efficiency = 1.0  # Efficiency of the irrigation. (0-1.0)
      logic Irrigator
      fertiliser
      logic Fertilizer
      soil Bay 0: same as Barley_R88-3HP_1.paddock.Bay 0
  simulation Barley_R88-4HP_1
    clock
      start_date = 8/06/1988  # Select the start date of the simulation
      end_date = 19/10/1988  # Select the end date of the simulation
    summaryfile: filename=Barley_R88-4HP_1.sum
    metfile met: filename=R88-4HP.met
    area paddock
      registrations global
      outputfile: same as Barley_HB90Sow1_3.paddock.outputfile
      manager
        rule Sow on a fixed date
          condition start_of_day:
            if (today = date('[date]') then
                          [crop] sow plants =[density], sowing_depth = [depth], cultivar = [cultivar], row_spacing = [row_spacing]
                     endif
          category Sowing criteria
            date = 8/06/1988  # Enter sowing date (d/m/yyyy)
          category Sowing parameters
            crop = barley  # Enter name of crop to sow
            density = 169.98  # Enter sowing density (plants/m2)
            depth = 50  # Enter sowing depth (mm)
            cultivar = Grimmett  # Enter cultivar
            row_spacing = 250  # Enter row spacing (mm)
        rule Harvesting rule: same as Barley_HB90Sow1_3.paddock.Manager.Harvesting rule
        rule Fertilise at sowing: same as Barley_HRS87-2MP_1.paddock.Manager.Fertilise at sowing
      barley
      logic Calculator
        on init:
```
sd = 0
```
        on end_of_day:
        script: same as in Barley_HB90Sow1_3.paddock.Calculator
      irrigation
        automatic_irrigation = off  # switch
        asw_depth = 600.0  # Depth to which ASW is calculated. (mm)
        crit_fr_asw = 0.9  # Fraction of ASW below which irrigation is applied (0-1.0)
        irrigation_efficiency = 1.0  # Efficiency of the irrigation. (0-1.0)
      logic Irrigator
      fertiliser
      logic Fertilizer
      soil Bay 0: Site=Roma; Region=Roma; LocalName=Roma; SoilType=R88; NearestTown=Unknown; NaturalVegetation=Unknown; Cona=3.5; DiffusConst=88; DiffusSlope=35.4; U=6; Salb=0.13; Cn2Bare=73; CnRed=20; CnCov=0.8; CnCanopyFact=0.8; RootCn=40; RootWt=6; SoilCn=14.5; EnrACoeff=7.4; EnrBCoeff=0.2
        InitWater
          profile
            layer:
              sw     thickness
              0.355  100
              0.410  100
              0.397  100
              0.434  100
              0.396  100
              0.395  100
              0.329  200
              0.317  200
              0.295  400
              0.258  200
        InitNitrogen: same as Barley_R88-1HP_1.paddock.Bay 0.InitNitrogen
        profile: same as Barley_R88-1HP_1.paddock.Bay 0.profile
  simulation Barley_R88-4MP_1
    clock
      start_date = 8/06/1988  # Select the start date of the simulation
      end_date = 19/10/1988  # Select the end date of the simulation
    summaryfile: filename=Barley_R88-4MP_1.sum
    metfile met: filename=R88-4MP.met
    area paddock
      registrations global
      outputfile: same as Barley_HB90Sow1_3.paddock.outputfile
      manager
        rule Sow on a fixed date
          condition start_of_day:
            if (today = date('[date]') then
                          [crop] sow plants =[density], sowing_depth = [depth], cultivar = [cultivar], row_spacing = [row_spacing]
                     endif
          category Sowing criteria
            date = 8/06/1988  # Enter sowing date (d/m/yyyy)
          category Sowing parameters
            crop = barley  # Enter name of crop to sow
            density = 76.4  # Enter sowing density (plants/m2)
            depth = 50  # Enter sowing depth (mm)
            cultivar = Grimmett  # Enter cultivar
            row_spacing = 250  # Enter row spacing (mm)
        rule Harvesting rule: same as Barley_HB90Sow1_3.paddock.Manager.Harvesting rule
        rule Fertilise at sowing: same as Barley_HRS87-2MP_1.paddock.Manager.Fertilise at sowing
      barley
      logic Calculator
        on init:
```
sd = 0
```
        on end_of_day:
        script: same as in Barley_HB90Sow1_3.paddock.Calculator
      irrigation
        automatic_irrigation = off  # switch
        asw_depth = 600.0  # Depth to which ASW is calculated. (mm)
        crit_fr_asw = 0.9  # Fraction of ASW below which irrigation is applied (0-1.0)
        irrigation_efficiency = 1.0  # Efficiency of the irrigation. (0-1.0)
      logic Irrigator
      fertiliser
      logic Fertilizer
      soil Bay 0: same as Barley_R88-4HP_1.paddock.Bay 0
