folder Simulations: version=14
  simulation Canopy Sample Simulation
    metfile met: filename=C:\development\apsim\met\sample\dalby.met
    clock
      start_date = 1/01/1988  # Select the start date of the simulation
      end_date = 31/12/1988  # Select the end date of the simulation
    summaryfile: filename=Blank Simulation.sum
    area paddock
      registrations global
      outputfile: filename=sample.out
        variables
          variables: dd/mm/yyyy as Date, sw_dep(), cowpea.lai as lai_cowpea, maize.lai as lai_maize, canopy.cover_tot_sum, cowpea.biomass as biom_cowpea, maize.biomass as biom_maize
        events Reporting Frequency: event=Daily
      manager Logic
        on start_of_day:
```
 ! MAIZE SOWING AND HARVEST ************
if day = 10 and year = 1988 then
      maize sow cultivar = dekalb_xl82, plants = 10, sowing_depth = 30 (mm)
endif

if (maize.stage = 11) then
      maize harvest
      maize end_crop
endif

! COWPEA SOWING AND HARVEST**********
if day = 10 and year  = 1988 then
   cowpea sow cultivar = banjo, plants = 25 (/m2), sowing_depth = 40 (mm)
endif

if cowpea.StageName = 'harvest_ripe' or cowpea.plant_status = 'dead' then
   cowpea harvest
   cowpea end_crop   
endif
```
      canopy
        intercrop = maize cowpea  # Enter crop names to intercrop
      cowpea
      maize
      soil No000 SampleBlackVertosol (No000): state=Queensland; region=South East Queensland; nearesttown=Generic; site=Generic; SoilType=Black Vertosol; comment=estimated cotton LL; Cona=3.5; U=6; Salb=0.12; DiffusConst=40; DiffusSlope=16; CN2Bare=73; CNRed=20; CNCov=0.8; RootCN=40; RootWT=1000; SoilCN=12; EnrACoeff=7.4; EnrBCoeff=0.2
        InitWater
          profile
            layer:
              sw     thickness
              0.290  150
              0.290  150
              0.350  300
              0.360  300
              0.380  300
              0.390  300
              0.390  300
              0.480  300
              0.470  300
              0.460  300
              0.440  300
        InitNitrogen
          profile
            layer:
              no3  nh4    thickness
              6    1      150
              5    1      150
              3    0.900  300
              2    0.700  300
              1    0.200  300
              1    0.100  300
              1    0.010  300
              1    0.010  300
              1    0.010  300
              1    0.010  300
              1    0.010  300
        profile
          layer:
            thickness  bd     ll15   airdry  dul    sat    swcon  fbiom  finert  oc     ph     ec     ll wheat  kl wheat  xf wheat  ll canola  kl canola  xf canola  ll barley  kl barley  xf barley  ll chickpea  kl chickpea  xf chickpea  ll fababean  kl fababean  xf fababean  ll Cotton  kl Cotton  xf Cotton  ll Sorghum  kl Sorghum  xf Sorghum  ll Mungbean  kl Mungbean  xf Mungbean  ll sunflowr  kl sunflowr  xf sunflowr  ll Lucerne  kl Lucerne  xf Lucerne  ll Maize  kl Maize  xf Maize  ll Perennial Grass  kl Perennial Grass  xf Perennial Grass  ll Cowpea  kl Cowpea  xf Cowpea  ll Navybean  kl Navybean  xf Navybean  ll Peanut  kl Peanut  xf Peanut  ll Pigeonpea  kl Pigeonpea  xf Pigeonpea  ll Soybean  kl Soybean  xf Soybean  ll Stylo  kl Stylo  xf Stylo  ll Sugar  kl Sugar  xf Sugar  ll Lablab  kl Lablab  xf Lablab
            150        1.020  0.290  0.150   0.540  0.590  0.300  0.040  0.400   1.040  8.400  0.200  0.290     0.060     1         0.290      0.060      1          0.290      0.070      1          0.290        0.060        1            0.290        0.080        1            0.290      0.100      1          0.290       0.070       1           0.290        0.060        1            0.290        0.100        1            0.290       0.100       1           0.290     0.060     1         0.290               0.100               1                   0.290      0.060      1          0.290        0.060        1            0.290      0.060      1          0.290         0.060         1             0.290       0.060       1           0.290     0.100     1         0.290     0.100     1         0.290      0.100      1
            150        1.030  0.290  0.230   0.530  0.580  0.300  0.020  0.600   0.890  8.800  0.300  0.290     0.060     1         0.290      0.060      1          0.290      0.070      1          0.290        0.060        1            0.290        0.080        1            0.290      0.100      1          0.290       0.070       1           0.290        0.060        1            0.290        0.100        1            0.290       0.100       1           0.290     0.060     1         0.290               0.100               1                   0.290      0.060      1          0.290        0.060        1            0.290      0.060      1          0.290         0.060         1             0.290       0.060       1           0.290     0.100     1         0.290     0.100     1         0.290      0.100      1
            300        1.020  0.290  0.290   0.540  0.590  0.300  0.020  0.800   0.890  9      0.300  0.320     0.060     1         0.320      0.060      1          0.320      0.070      1          0.360        0.060        1            0.320        0.080        1            0.350      0.100      1          0.350       0.070       1           0.320        0.060        1            0.320        0.080        1            0.290       0.100       1           0.340     0.060     1         0.390               0.100               1                   0.320      0.060      1          0.320        0.060        1            0.320      0.060      1          0.320         0.060         1             0.320       0.060       1           0.320     0.080     1         0.320     0.080     1         0.320      0.080      1
            300        1.020  0.290  0.290   0.540  0.580  0.300  0.020  1       0.890  9.200  0.400  0.320     0.040     1         0.320      0.040      1          0.380      0.050      1          0.430        0.060        1            0.320        0.080        1            0.360      0.100      1          0.380       0.050       1           0.320        0.040        1            0.320        0.060        1            0.290       0.100       1           0.340     0.040     1         0.410               0.100               1                   0.320      0.040      1          0.320        0.040        1            0.320      0.040      1          0.320         0.050         1             0.320       0.040       1           0.320     0.060     1         0.320     0.060     1         0.320      0.060      1
            300        1.060  0.290  0.290   0.520  0.570  0.300  0.010  1       0.770  9.200  0.600  0.350     0.040     1         0.350      0.040      1          0.390      0.050      1          0.510        0.060        1            0.350        0.060        1            0.380      0.090      1          0.400       0.050       1           0.350        0.040        1            0.350        0.040        1            0.300       0.090       1           0.370     0.040     1         0.400               0.090               1                   0.350      0.040      1          0.350        0.040        1            0.350      0.040      1          0.350         0.040         1             0.350       0.040       1           0.350     0.040     1         0.350     0.040     1         0.350      0.040      1
            300        1.110  0.290  0.290   0.500  0.550  0.300  0.010  1       0.450  9.100  0.800  0.380     0.020     0.420     0.380      0.020      0.420      0.390      0.030      0.420      0.500        0.060        0.420        0.380        0.040        0.420        0.390      0.070      0.420      0.400       0.040       0.420       0.380        0.010        0.420        0.380        0.020        0.420        0.310       0.090       0.420       0.400     0.020     0.420     0.400               0.070               0.420               0.380      0.020      0.420      0.380        0.010        0.420        0.380      0.010      0.420      0.380         0.020         0.420         0.380       0.020       0.420       0.380     0.020     0.420     0.380     0.020     0.420     0.380      0.020      0.420
            300        1.120  0.290  0.290   0.500  0.550  0.300  0.010  1       0.270  9      0.900  0.410     0.020     0.370     0.410      0.010      0.370      0.410      0.020      0.370      0.500        0.060        0.370        0.410        0.030        0.370        0.390      0.050      0.370      0.400       0.030       0.370       0.410        0.010        0.370        0.410        0.010        0.370        0.320       0.090       0.370       0.420     0.010     0.370     0.410               0.050               0.370               0.410      0.010      0.370      0.410        0.010        0.370        0.410      0.010      0.370      0.410         0.010         0.370         0.410       0.010       0.370       0.410     0.010     0.370     0.410     0.010     0.370     0.410      0.010      0.370
            300        1.150  0.290  0.290   0.480  0.530  0.300  0.010  1       0.220  9      1      0.480     0         0         0.480      0          0          0.480      0          0          0.480        0            0            0.480        0            0            0.480      0          0          0.480       0           0           0.480        0            0            0.480        0            0            0.330       0.090       0.330       0.480     0         0         0.410               0                   0                   0.480      0          0          0.480        0            0            0.480      0          0          0.480         0             0             0.480       0           0           0.480     0         0         0.480     0         0         0.480      0          0
            300        1.180  0.290  0.290   0.470  0.520  0.300  0.010  1       0.160  8.900  1.100  0.470     0         0         0.470      0          0          0.470      0          0          0.470        0            0            0.470        0            0            0.470      0          0          0.470       0           0           0.470        0            0            0.470        0            0            0.340       0.090       0.310       0.470     0         0         0.400               0                   0                   0.470      0          0          0.470        0            0            0.470      0          0          0.470         0             0             0.470       0           0           0.470     0         0         0.470     0         0         0.470      0          0
            300        1.200  0.290  0.290   0.460  0.510  0.300  0.010  1       0.130  8.900  1.100  0.460     0         0         0.460      0          0          0.460      0          0          0.460        0            0            0.460        0            0            0.460      0          0          0.460       0           0           0.460        0            0            0.460        0            0            0.350       0.090       0.310       0.460     0         0         0.400               0                   0                   0.460      0          0          0.460        0            0            0.460      0          0          0.460         0             0             0.460       0           0           0.460     0         0         0.460     0         0         0.460      0          0
            300        1.250  0.290  0.290   0.440  0.490  0.300  0.010  1       0.120  8.900  1      0.440     0         0         0.440      0          0          0.440      0          0          0.440        0            0            0.440        0            0            0.440      0          0          0.440       0           0           0.440        0            0            0.440        0            0            0.360       0.090       0.330       0.440     0         0         0.420               0                   0                   0.440      0          0          0.440        0            0            0.440      0          0          0.440         0             0             0.440       0           0           0.440     0         0         0.440     0         0         0.440      0          0
