simulations untitled: version=9
  simulation Sample Economics Simulation
    clock
      start_date = 31/12/1940  # Select the start date of the simulation
      end_date = 31/12/1942  # Select the end date of the simulation
    summaryfile: filename=Sample Economics Simulation.sum
    metfile met: filename=%apsuite\apsim\met\sample\goond.met
    area paddock
      registrations global
      manager
        rule pre sow Tillage
          condition start_of_day:
            if (today = date('[tillage_date]') then
                        if ('[tillage_type]' = 'user_defined') then
                            '[surfaceommodule]' tillage type = [tillage_type], f_incorp = [tillage_f_incorp] (), tillage_depth = [tillage_depth]
                        else
                            '[surfaceommodule]' tillage type = [tillage_type]
                        endif

                          ! When machinery 'operates', it stops them being 'available', and incurs operating costs.
                           economics operate tractor=t1, implement = p2, area = 200, costtype = fallow_cost

                     endif
          category When should tillage be done
            tillage_date = 1-may  # Enter tillage date (dd-mmm)
          category Tillage application details
            surfaceommodule = surface organic matter  # Module used to apply the tillage
            tillage_type = disc
            tillage_depth = 150  # User_defined depth of seedbed preparation (mm)
            tillage_f_incorp = 80  # User_defined fraction of surface residues to incorporate (0-1)
        rule Sowing rule
          condition start_of_day:
            ! Ask the system (economics/machinery module) whether the tractor/implement combination is available:
            if (available('tractor=t1,implement=p1')) THEN

                  if (paddock_is_fallow() = 1 and FallowIn <> 'yes' and (NextCrop = 0 or NextCrop = '[crop]')) then
                     if (date_within('[date1], [date2]') = 1) then
                        if (rain[[rainnumdays]] >= [raincrit] AND
                            esw >= [esw_amount] ) <> 0) OR
                            ('[must_sow]' = 'yes' AND today = date('[date2]'))) THEN
                           ChooseNextCrop = 'yes'   ! for rotations

                           ! When machinery 'operates', it stops them being 'available', and incurs operating costs.
                           economics operate tractor=t1, implement = p1, area = 200, costtype = incrop_cost

                           ! incur seed costs (should be others too, eg fungicide etc)
                           economics expenditure category = seedcost, name = [crop], rate = 120 (kg/ha), area = 200 (ha),  incrop_cost = ?

                           [crop] sow plants =[density], sowing_depth = [depth], cultivar = [cultivar], row_spacing = [row_spacing], crop_class = [class]

                        endif
                        if today = date('[date2]') then
                           ChooseNextCrop = 'yes'
                        endif
                     endif
                  endif

            ENDIF
          category Sowing criteria
            date1 = 15-may  # Enter sowing window START date (dd-mmm)
            date2 = 10-jul  # Enter sowing window END date (dd-mmm)
            must_sow = no  # Must sow?
            raincrit = 30  # Amount of rainfall
            rainnumdays = 3  # Number of days of rainfall
            esw_amount = 200  # Enter minimum allowable available soil water (mm)
          category Sowing parameters
            crop = wheat  # Enter name of crop to sow
            density = 100  # Enter sowing density (plants/m2)
            depth = 30  # Enter sowing depth (mm)
            cultivar = hartog  # Enter cultivar
            class = plant  # Enter crop growth class
            row_spacing = 250  # Enter row spacing (mm)
        rule Harvesting rule
          condition end_of_day:
            if [crop].stage_name = 'harvest_ripe' or [crop].plant_status = 'dead' then

                          ! harvesting costs
                          economics expenditure category = contract, name = broadacre_harvesting, rate = 1, area = 200 (ha),  incrop_cost = ?

                          ! income
                          cropyieldTONNES = [crop].yield / 1000.0
                          if ('[crop]' = 'wheat') THEN
                              protein = [crop].grain_protein           !?may need adjustment?
                              economics income category= cropprice, name = [crop], yield = cropyieldTONNES, protein = protein, area = 200 (ha)
                          else
                              economics income category= cropprice, name = [crop], yield = cropyieldTONNES, area = 200 (ha)
                          endif

                          [crop]  harvest
                          [crop]  end_crop
            endif
          category Harvesting criteria
            crop = wheat  # Enter name of crop to harvest when ripe
        rule Sowing fertiliser
          condition [modulename].[eventname]:
            ! Fertiliser costs
                    economics expenditure category = fertilisercost, name = [fert_type_sow], rate = [fert_amount_sow], area = 200 (ha), incrop_cost = ?

                    [fertmodule] apply amount = [fert_amount_sow] (kg/ha), depth = 50 (mm), type = [fert_type_sow]
          category When should fertiliser be applied
            modulename = wheat  # On which module should the event come from
            eventname = sowing  # On which event should fertiliser be applied
          category Fertiliser application details
            fertmodule = fertiliser  # Module used to apply the fertiliser
            fert_amount_sow = 150  # Amount of starter fertiliser at sowing (kg/ha)
            fert_type_sow = urea  # Sowing fertiliser type
      fertiliser
      surfaceom surface organic matter
        PoolName = wheat  # Organic Matter pool name
        type = wheat  # Organic Matter type
        mass = 1000.  # Initial surface residue (kg/ha)
        cnr = 80.0  # C:N ratio of initial residue
        standing_fraction = 0.0  # Fraction of residue standing
      wheat
      outputfile: filename=Sample Economics Simulation.out
        variables My Variables
          variables: dd/mm/yyyy as Date, wheat.biomass, wheat.yield, wheat.grain_protein, wheat.grain_size, esw, balance
        events My Variables Events: event=wheat.harvesting
      soil Jimbour,Waco (#016): Site=Jimbour; Region=South East Queensland; LocalName=Waco; SoilType=Black Vertosol; NearestTown=Jimbour, Q 4352; NaturalVegetation=Grassland, mainly Qld bluegrass; Cona=3.5; DiffusConst=40; DiffusSlope=16; U=6; Salb=0.13; Cn2Bare=73; CnRed=20; CnCov=0.8; CnCanopyFact=1; RootCn=40; RootWt=200; SoilCn=12.5; EnrACoeff=7.4; EnrBCoeff=0.2
        InitWater
          percentmethod: percent=1; distributed=filled from top
        InitNitrogen
          profile
            layer:
              no3    nh4    thickness
              6.503  0.599  150
              2.101  0.100  150
              2.101  0.100  300
              1.701  0.100  300
              1.701  0.100  300
              1.701  0.100  300
              1.701  0.100  300
              1.701  0.100  300
              1.701  0.100  300
              1.701  0.100  300
              1.701  0.100  300
        profile
          layer:
            thickness  bd     ll15   airdry  dul    sat    sw        swcon  oc     ph     fbiom  finert  no3    nh4    ec     ll Barley  kl Barley  xf Barley  ll Chickpea  kl Chickpea  xf Chickpea  ll Lucerne  kl Lucerne  xf Lucerne  ll Maize  kl Maize  xf Maize  ll Perennial Grass  kl Perennial Grass  xf Perennial Grass  ll Sorghum  kl Sorghum  xf Sorghum  ll Wheat  kl Wheat  xf Wheat
            150        1.020  0.290  0.150   0.540  0.590  9999.990  0.300  1.040  8.400  0.025  0.400   6.500  0.600  0.200  0.290      0.100      1          0.290        0.100        1            0.290       0.100       1           0.290     0.100     1         0.290               0.100               1                   0.290       0.100       1           0.290     0.100     1
            150        1.030  0.290  0.260   0.530  0.580  9999.990  0.300  0.890  8.800  0.020  0.600   2.100  0.100  0.250  0.290      0.100      1          0.290        0.100        1            0.290       0.100       1           0.290     0.100     1         0.290               0.100               1                   0.290       0.100       1           0.290     0.100     1
            300        1.020  0.290  0.290   0.540  0.590  9999.990  0.300  0.890  9      0.015  0.800   2.100  0.100  0.310  0.320      0.080      1          0.360        0.080        1            0.290       0.100       1           0.340     0.100     1         0.390               0.100               1                   0.350       0.100       1           0.320     0.080     1
            300        1.020  0.290  0.290   0.540  0.580  9999.990  0.300  0.890  9.200  0.010  0.900   1.700  0.100  0.400  0.380      0.060      1          0.430        0.060        1            0.290       0.100       1           0.340     0.080     1         0.410               0.100               1                   0.380       0.080       1           0.320     0.060     1
            300        1.060  0.300  0.300   0.520  0.570  9999.990  0.300  0.770  9.200  0.010  0.950   1.700  0.100  0.590  0.390      0.040      1          0.510        0.040        1            0.300       0.090       1           0.370     0.060     1         0.400               0.090               1                   0.400       0.060       1           0.350     0.040     1
            300        1.110  0.310  0.310   0.500  0.550  9999.990  0.300  0.450  9.100  0.010  0.950   1.700  0.100  0.840  0.390      0.020      1          0.500        0.020        1            0.310       0.090       1           0.400     0.040     1         0.400               0.070               1                   0.400       0.040       1           0.380     0.020     1
            300        1.120  0.320  0.320   0.500  0.550  9999.990  0.300  0.270  9      0.010  0.950   1.700  0.100  0.930  0.410      0.010      1          0.500        0.010        1            0.320       0.090       1           0.420     0.020     1         0.410               0.050               1                   0.400       0.020       1           0.410     0.010     1
            300        1.150  0.330  0.330   0.480  0.530  9999.990  0.300  0.220  9      0.010  0.950   1.700  0.100  1.010  0.480      0          0          0.480        0            0            0.330       0.090       1           0.480     0         0         0.410               0                   0                   0.480       0           0           0.480     0         0
            300        1.180  0.340  0.340   0.470  0.520  9999.990  0.300  0.160  8.900  0.010  0.950   1.700  0.100  1.060  0.470      0          0          0.470        0            0            0.340       0.090       1           0.470     0         0         0.400               0                   0                   0.470       0           0           0.470     0         0
            300        1.200  0.350  0.350   0.460  0.510  9999.990  0.300  0.130  8.900  0.010  0.950   1.700  0.100  1.050  0.460      0          0          0.460        0            0            0.350       0.090       1           0.460     0         0         0.400               0                   0                   0.460       0           0           0.460     0         0
            300        1.250  0.360  0.360   0.440  0.490  9999.990  0.300  0.120  8.900  0.010  0.950   1.700  0.100  1.010  0.440      0          0          0.440        0            0            0.360       0.090       1           0.440     0         0         0.420               0                   0                   0.440       0           0           0.440     0         0
      tclgroup Economics
        initscript:
          source $apsuite/apsim/Economics/lib/Cashbook.tcl
          source $apsuite/apsim/Economics/lib/Machinery.tcl
        tclui Initial Capital Assets: uiscript=source $apsuite/apsim/Economics/lib/CapitalUI.tcl; category=icapital
          icapital: ivalue=400000.0; loanRate=6.0; loanDuration=5
        tclui Cash Journal: uiscript=source $apsuite/apsim/Economics/lib/CashbookUI.tcl; balance=42000; outputfilename=Sample.Cashbook.csv; summaryfilename=Sample.Detailed.Cashflow.csv
        tclui Machinery - 200kwFWA: uiscript=source $apsuite/apsim/Economics/lib/MachineryUI.tcl; category=tractor
          tractor t1: fuelrate (lts/hour)=[25.0, 60.0]; workrate (ha/hour)=[100.0, 500.0]; workrate=[100.0, 20, 10.0, 20.0]; fuelrate=[40.0, 15, 10.0, 5.0]; hoursperday=[8, 8.0, 8.0]; image=%apsuite/apsim/Economics/lib/choofer.gif; newPrice=100000; tradeInValue=10; lifeOfEquipment=3000; insuranceRate=6.2; repairs=30; oil=10; loanInterestRate=4.5; loanDuration=5; age=2
        tclui Machinery - Precision Planter: uiscript=source $apsuite/apsim/Economics/lib/MachineryUI.tcl; category=implement
          implement p1: image=%apsuite/apsim/Economics/lib/precisionPlanter.gif; newPrice=20000; tradeInValue=20; lifeOfEquipment=1500; insuranceRate=2.3; repairs=30; oil=0; loanInterestRate=4.5; loanDuration=4; age=200
        tclui Machinery - Spray Rig: uiscript=source $apsuite/apsim/Economics/lib/MachineryUI.tcl; category=implement
          implement p2: newPrice=20000; tradeInValue=20; lifeOfEquipment=1500; insuranceRate=2.3; repairs=30; oil=0; loanInterestRate=4.5; loanDuration=4; age=200
        tclui Prices: uiscript=source $apsuite/apsim/Economics/lib/PricesUI.tcl; category=cropprice
          cropprice wheat: desc=Wheat; price=145.0 160.0 170.0 180.0 185.0; protein=9.5 10.0 12.0 13.0 14.0; units=$/tonne; updated=27/10/2006; grain_moisture=14.0
          cropprice sorghum: desc=Sorghum; price=120.0; units=$/tonne; updated=27/10/2006; grain_moisture=14.0
        tclui Costs - Farm Overheads: uiscript=source $apsuite/apsim/Economics/lib/OverheadsUI.tcl; category Overhead Expenses=overhead
          overhead accountancy: description=Accountant/Consultancy fees; value=5000
          overhead administration: description=Administration; value=500
          overhead bankcharges: description=Bank Charges other than interest; value=500
          overhead electricity: description=Electricity - Farm; value=2000
          overhead freight: description=Freight & Cartage (sundry); value=0
          overhead fuels: description=Fuel & Oil (other than farming); value=10000
          overhead insurance: description=Insurance - Farm; value=6000
          overhead vehicleexpenses: description=Motor Vehicle Expenses - Farm; value=5000
          overhead rates: description=Rates and Rents - Farm; value=3500
          overhead repairs: description=Repairs & Maintenance (extra); value=20000
          overhead subs: description=Subscriptions; value=1000
          overhead telephone: description=Telephone - Farm; value=2500
          overhead wages: description=Wages (other than casual included in activity budgets); value=30000
          overhead other: description=Other Overhead Expenses; value=0
          overhead operator: description=Operators labour and management; value=50000
        tclui Costs - Fuel: uiscript=source $apsuite/apsim/Economics/lib/TreatmentsUI.tcl; category=fuelcosts
          fuelcosts: desc=Cost of fuel (net); price=1.205; units=$/litre; updated=20/12/2005
        tclui Costs - Fertilisers: uiscript=source $apsuite/apsim/Economics/lib/TreatmentsUI.tcl; category=fertilisercost
          fertilisercost big_n: desc=Big n (82n); price=0.61; units=$/kg
          fertilisercost ck700: desc=CK700 (32.3n;5.1p;18.9s); price=0.52; units=$/kg; updated=30/03/2004
          fertilisercost ck1: desc=CK1 (14.6p;14.5k;1s;10.6ca); price=0.52; units=$/kg; updated=30/03/2004
          fertilisercost ck600s: desc=CK600s (17.9n;5.1p;18.9s); price=0.52; units=$/kg; updated=30/03/2004
          fertilisercost dap: desc=DAP (18n;20p); price=0.48; units=$/kg; updated=30/03/2004
          fertilisercost granam: desc=granam (20.2n;24s); price=0.48; units=$/kg; updated=30/03/2004
          fertilisercost granulock: desc=granulock (starter z - 10.5n;19.5p;2.2s); price=0.62; units=$/kg; updated=30/03/2004
          fertilisercost gypsum: desc=Gypsum (14.5s;18.5ca); price=0.07; units=$/kg; updated=30/03/2004
          fertilisercost lime: desc=Lime (Ca); price=0.05; units=$/kg; updated=30/03/2004
          fertilisercost map: desc=MAP (starterphos - 10n;21.9p;1.5s); price=0.52; units=$/kg; updated=30/03/2004
          fertilisercost mop: desc=Muriate of Potash (mop - 50k); price=0.51; units=$/kg; updated=30/03/2004
          fertilisercost nitram: desc=nitram (34N); price=0.71; units=$/kg; updated=30/03/2004
          fertilisercost nitram_and_sulphur: desc=Nitram and Sulphur; price=0.13; units=$/kg
          fertilisercost phosul: desc=Phosul; price=0.57; units=$/kg
          fertilisercost potassium_nitrate: desc=potassium nitrate (13n;38.3k); price=0.95; units=$/kg; updated=30/03/2004
          fertilisercost solubor: desc=solubor (20.5b); price=3.83; units=$/kg; updated=30/03/2004
          fertilisercost starter_z: desc=starter z; price=0.62; units=$/kg; updated=30/03/2004
          fertilisercost starterphos: desc=starterphos (10n;21.9p;1.5s); price=0.48; units=$/kg; updated=30/03/2004
          fertilisercost sulphate_of_potash: desc=sulphate of potash (41K;18S); price=0.69; updated=30/03/2004
          fertilisercost supazinc: desc=Supazinc (7.5Zn); price=4.82; updated=30/03/2004
          fertilisercost superphosphate: desc=Superphosphate (8.8P;11S;20Ca); price=0.34; updated=30/03/2004
          fertilisercost tech_feed: desc=tech feed; price=0.58; updated=needs to be specific
          fertilisercost urea: desc=Urea (46N); price=0.5; updated=30/03/2004
          fertilisercost zinc_sulphate_heptahydrate: desc=zinc sulphate heptahydrate; price=0.72; updated=30/03/2004
          fertilisercost zinc sulphate monohydrate: desc=zinc sulphate monohydrate (35Zn;17.2S); price=1.12; updated=30/03/2004
          fertilisercost ammonium_sulphate: desc=Ammonium Sulphate; price=0.5
        tclui Costs - Herbicides: uiscript=source $apsuite/apsim/Economics/lib/TreatmentsUI.tcl; category=herbicide
          herbicide achieve: desc=Achieve; price=87.82; updated=29/03/2004
          herbicide ally: desc=Ally (metsulfuron); price=0.2; updated=30/03/2004
          herbicide amicide625: desc=Amicide 625; price=500
          herbicide avadex_xtra: desc=Avadex Xtra (tri-allate); price=14.29
          herbicide basagran: desc=Basagran (bentazone); price=34.27; updated=30/03/2004
          herbicide blazer_2l: desc=Blazer 2L (acifluorfen); price=43.45; updated=30/03/2004
          herbicide broadstrike: desc=Broadstrike (flumetsulam); price=0.65; updated=30/03/2004
          herbicide bromicide_ma: desc=Bromicide MA (bromicide + MCPA); price=13.95
          herbicide buticide: desc=Buticide; price=500
          herbicide cotogard: desc=Cotogard (flurometuron + prometryn); price=12.32; updated=30/03/2004
          herbicide cotoran: desc=Cotoran (flurometuron); price=12.3
          herbicide diuron: desc=Diuron; price=8.5
          herbicide dual_gold: desc=Dual Gold (metolachlor); price=32.23; updated=30/03/2004
          herbicide eclipse: desc=Eclipse (metosulam); price=1.19
          herbicide fusilade: desc=Fusilade (fluazifop-p); price=69.27; updated=30/03/2004
          herbicide garlon_600: desc=Garlon 600 (triclopyr); price=50.91; updated=30/03/2004
          herbicide gesaprim: desc=Gesaprim (atrazine); price=6.23; updated=30/03/2004
          herbicide glean: desc=Glean (chlorsulfuron); price=0.18
          herbicide glyphosate450: desc=Glyphosate 450 CT (glyphosate IPA salt); price=4.64; updated=30/03/2004
          herbicide gramoxone_250: desc=Gramoxone 250 (paraquat); price=9.68; updated=30/03/2004
          herbicide kamba_500: desc=Kamba 500 (Dicamba); price=39; updated=3/06/2004
          herbicide MCPA_LVE: desc=MCPA LVE (MCPA ester); price=10.4; updated=30/03/2004
          herbicide primextra_gold: desc=Primextra Gold (metolachlor + atrazine); price=14.64; updated=30/03/2004
          herbicide reglone: desc=Reglone (diquat); price=18.72; updated=30/03/2004
          herbicide roundup: desc=Roundup POWERMAX (glyphosate MEA salt); price=7.64; updated=30/03/2004
          herbicide tordon: desc=Tordon 75D; price=300
          herbicide trifluralin: desc=Trifluralin 480 (trifluralin); price=7.82; updated=30/03/2004
        tclui Costs - Fungicides: uiscript=source $apsuite/apsim/Economics/lib/TreatmentsUI.tcl; category=fungicide
          fungicide Alto 100SL: desc=Alto 100SL (cyproconazole); price=116.9; updated=30/03/2004
          fungicide Dithane: desc=Dithane (mancozeb); price=7.25; updated=30/03/2004
          fungicide Elect 720: desc=Elect 720 (chlorothalonil); price=18.83; updated=30/03/2004
          fungicide Folicur 430 SC: desc=Folicur 430 SC; price=94; updated=30/03/2004
          fungicide Fortress 500: desc=Fortress 500 (procymidone); price=67; updated=20/12/2002
          fungicide Rover: desc=Rover; price=14.75; updated=20/12/2002
          fungicide Rovral Aquaflo: desc=Rovral Aquaflo (iprodione); price=55.82; updated=20/12/2002
          fungicide Wettable Sulphur: desc=Wettable Sulphur; price=2.16; updated=30/03/2004
        tclui Costs - Insecticides: uiscript=source $apsuite/apsim/Economics/lib/TreatmentsUI.tcl; category=insecticide
          insecticide Amino-feed: desc=Amino-feed; price=3.91; updated=30/03/2004
          insecticide Amitraz EC: desc=Amitraz EC (amitraz); price=14.27; updated=20/12/2002
          insecticide Cosmos: desc=Cosmos (fipronil); price=687.27; updated=30/03/2004
          insecticide Curacron Pro: desc=Curacron Pro (profenofos); price=27; updated=20/12/2002
          insecticide Dimethoate: desc=Dimethoate; price=7.36; updated=30/03/2004
          insecticide Dipel: desc=Dipel (Strain HD-1); price=66; updated=20/12/2002
          insecticide Dipel: desc=Dipel (Strain HD-1); price=66; updated=20/12/2002
          insecticide Dominex 100 EC: desc=Dominex 100 EC (alpha cypermethrin); price=19.5; updated=20/12/2002
          insecticide Dominex Duo: desc=Dominex Duo (alpha cypermethrin); price=22; updated=20/12/2002
          insecticide Elect 760: desc=Elect 760; price=24; updated=20/12/2002
          insecticide Emamectin: desc=Emamectin; price=102.92; updated=20/12/2002
          insecticide Endosulfan EC: desc=Endosulfan EC; price=10.23; updated=30/03/2004
          insecticide Ethion + Zeta-cypermethrin: desc=Ethion + Zeta-cypermethrin; price=18.41; updated=20/12/2002
          insecticide Fastac Duo: desc=Fastac Duo (alpha cypermethrin); price=6; updated=20/12/2002
          insecticide Fenitrothion: desc=Fenitrothion 1000; price=30; updated=30/03/2004
          insecticide L Marlin: desc=L Marlin (methomyl); price=10.95; updated=30/03/2004
          insecticide Larvin 375: desc=Larvin 375 (thiodicarb); price=25.68; updated=30/03/2004
          insecticide Larvin LV: desc=Larvin LV; price=17.97
          insecticide Lorsban 500 EC: desc=Lorsban 500 EC (chlorpyrifos); price=9.77; updated=30/03/2004
          insecticide NPV Gemstar/Vivus: desc=NPV Gemstar/Vivus; price=66.9
          insecticide PBO: desc=PBO (piperonyl butoxide); price=30; updated=30/03/2004
          insecticide Phostoxin tablets: desc=Phostoxin tablets (aluminium phosphide); price=0.15; updated=30/03/2004
          insecticide Predator 300: desc=Predator 300 (chlorpyrifos); price=11; updated=30/03/2004
          insecticide Regent: desc=Regent (fipronil); price=360; updated=30/03/2004
          insecticide Thidiazuron: desc=Thidiazuron
          insecticide Tracer: desc=Tracer (spinosad); price=91.75
        tclui Costs - Seed: uiscript=source $apsuite/apsim/Economics/lib/TreatmentsUI.tcl; category=seedcost
          seedcost Barley: desc=Barley (Tallon); price=0.78; updated=30/03/2004
          seedcost Chickpea: desc=Chickpea (Jimbour); price=1.51; updated=30/03/2004
          seedcost Cotton: desc=Cotton; price=5.6; updated=30/03/2004
          seedcost Forage Sorghum: desc=Forage Sorghum (Jumbo); price=3.96; updated=30/03/2004
          seedcost Lucerne: desc=Lucerne (sequel); price=5.45; updated=30/03/2004
          seedcost Maize: desc=Maize P3237; price=6.51; updated=30/03/2004
          seedcost Millet: desc=Millet (White frend); price=1; updated=30/03/2004
          seedcost Mungbean: desc=Mungbean (Emerald); price=1.45; updated=30/03/2004
          seedcost NavyBean: desc=Navy Bean (Spearfeld); price=1.49; updated=30/03/2004
          seedcost PeanutC: desc=Peanut Streeton (20-23 weeks); price=2.91; updated=30/03/2004
          seedcost PeanutS: desc=Peanut Conder (17-19 weeks); price=2.7; updated=30/03/2004
          seedcost PeanutVB: desc=Peanut VB97 (20-23 weeks); price=2.7; updated=30/03/2004
          seedcost PeanutNC7: desc=Peanut NC7 (20-23 weeks); price=2.7; updated=30/03/2004
          seedcost Sorghum: desc=Sorghum (Buster); price=5.82; updated=30/03/2004
          seedcost Soybean: desc=Soybean (Soya791); price=1.31; updated=30/03/2004
          seedcost Sunflower: desc=Sunflower (Sunolei 04); price=11.82; updated=30/03/2004
          seedcost Wheat: desc=Wheat (Kennedy); price=0.73; updated=30/03/2004
        tclui Costs - Defoliants: uiscript=source $apsuite/apsim/Economics/lib/TreatmentsUI.tcl; category=defoliant
          defoliant dropp: desc=dropp (thidiazuron + diuron); price=147; units=kg
          defoliant salt defoliant: desc=Salt Defoliant; price=1.55; units=kg
        tclui Costs - Contractors: uiscript=source $apsuite/apsim/Economics/lib/TreatmentsUI.tcl; category=contract
          contract aerial_spraying: desc=aerial spraying - broadacre; price=12.5; units=$/ha; updated=20/12/2002
          contract aerial_spraying_cotton_ec: desc=aerial spraying-cotton ec; price=12.5; units=$/ha; updated=20/12/2002
          contract aerial spraying-cotton ulv: desc=aerial_spraying_cotton_ulv; price=9.5; units=$/ha
          contract broadacre_harvesting: desc=Broadacre Harvesting; price=250; units=$/ha
          contract chickpea_scouting: desc=chickpea scouting; price=10; units=$/ha; updated=20/12/2002
          contract cotton_casual_labour: desc=Cotton casual labour; price=80; units=$/ha
          contract peanut_chipping: desc=peanut chipping; price=40; units=$/ha; updated=30/05/2004
          contract cotton_consultant: desc=cotton consultant; price=35; units=$/ha
          contract cotton_crop_insurance: desc=cotton crop insurance; price=30; units=$/ha
          contract cotton_harvesting_double_skip: desc=Cotton harvesting double skip; price=41.67; units=$170 / hr at 1.36 ha / hour @ 3 bales/ha
          contract heavy_offsets: desc=heavy offsets - contract; price=0; units=$/ha
          contract light_chisel_plough: desc=light chisel plough - contract; price=0; units=$/ha
          contract light_offsets: desc=light offsets - contract; price=0; units=$/ha
          contract peanut_scouting: desc=peanut scouting; price=45; units=$/ha
          contract Cotton eliminator: desc=cotton_eliminator; price=22; units=$/bale
          contract cotton_harvest_solid_nsw: desc=Cotton harvest solid nsw; price=280; units=$/ha
          contract gypsum_spread: desc=gypsum spread on farm; price=72.72; units=$/ha; updated=30/05/2004
          contract lime_spread: desc=lime spread on farm; price=50; units=$/ha; updated=30/05/2004
          contract high clearance spray rig: desc=high clearance spray rig; price=10; units=$/ha
