folder Simulations: version=13
  simulation Wheat Grazing Simulation
    metfile met: filename=C:\Program Files\Apsim6\apsim\met\sample\dalby.met
    clock
      start_date = 14/06/1988  # Select the start date of the simulation
      end_date = 17/11/1988  # Select the end date of the simulation
    summaryfile: filename=Blank Simulation.sum
    area paddock
      registrations global
      folder Manager folder
        manager Wheat Managment
          on init:
```
ready_to_graze = 0
```
          on start_of_day:
```
! This is accumulated within graz
growth = wheat.dlt_dm

! Graze paddock when wheat is ready
if (wheat.stage > 5) then
   ready_to_graze = 1
endif


if day = 169 and year = 1988 then
   wheat sow cultivar = hartog, plants = 120, sowing_depth = 30 (mm)
endif

if wheat.stage_name = 'harvest_ripe' or wheat.plant_status = 'dead' then
   wheat harvest
   wheat end_crop
endif
```
        manager Grazing management
          on init:
```
annual_lwg = 0.0
paddockState = 'empty'
```
          on start_of_day:
```
if (ready_to_graze = 1 AND paddockState = 'empty') then
   graz set stocking_rate = 0.8
   graz set alw =  400.0                 ! p084
   annual_lwg = 0.0
   paddockState = 'stocked'
endif

! 'GRAZEON' stocking rate resets (%Use of TSDM for next year)
if (graz.stocking_rate > 0.0 AND today = date('1-jun') then                ! p081
   graz set alw = 400.0
   avgDailyIntake = (annual_lwg/365.25 + 1.058) / 0.304
   targetUtil = 30.0 / 100.0
   annualIntake = avgDailyIntake * 365.5
   stock_equiv_ratio = targetUtil * grasp.tsdm / annualIntake

   weight_ratio = graz.alw / 200
   factor = weight_ratio ** 0.75
   beasts_ha = stock_equiv_ratio / factor
   graz set stocking_rate = beasts_ha

   annual_lwg = 0.0
endif
```
          on end_of_day:
```
annual_lwg = annual_lwg + graz.lwg
```
      wheat
      soil: state=Queensland; region=South East Queensland; nearesttown=Generic; site=Generic; SoilType=Black Vertosol; Latitude=999999; Longitude=999999; LocationAccuracy=Regional Soil Type; comment=estimated cotton LL; SummerCona=3.5; WinterCona=2.5; SummerU=6; WinterU=4; SummerDate=1-Nov; WinterDate=1-apr; Salb=0.12; DiffusConst=40; DiffusSlope=16; CN2Bare=73; CNRed=20; CNCov=0.8; RootCN=40; RootWT=1000; SoilCN=12; EnrACoeff=7.4; EnrBCoeff=0.2
        profile
          layer:
            thickness  bd    ll15  airdry  dul   sat   swcon  fbiom  finert  oc    ec   ph   ll wheat  kl wheat  xf wheat  ll barley  kl barley  xf barley  ll canola  kl canola  xf canola  ll chickpea  kl chickpea  xf chickpea  ll cotton  kl cotton  xf cotton  ll sorghum  kl sorghum  xf sorghum  ll mungbean  kl mungbean  xf mungbean  ll sunflower  kl sunflower  xf sunflower  ll fababean  kl fababean  xf fababean  ll lucerne  kl lucerne  xf lucerne  ll maize  kl maize  xf maize  ll perennial grass  kl perennial grass  xf perennial grass  ll cowpea  kl cowpea  xf cowpea  ll navybean  kl navybean  xf navybean  ll peanut  kl peanut  xf peanut  ll pigeonpea  kl pigeonpea  xf pigeonpea  ll soybean  kl soybean  xf soybean  ll stylo  kl stylo  xf stylo  ll sugar  kl sugar  xf sugar  ll lablab  kl lablab  xf lablab
            150        1.02  0.29  0.145   0.54  0.59  0.3    0.04   0.4     1.04  0.2  8.4  0.29      0.06      1         0.29       0.07       1          0.29       0.06       1          0.29         0.06         1            0.29       0.1        1          0.29        0.07        1           0.29         0.06         1            0.29          0.1           1             0.29         0.08         1            0.29        0.1         1           0.29      0.06      1         0.29                0.1                 1                   0.29       0.06       1          0.29         0.06         1            0.29       0.06       1          0.29          0.06          1             0.29        0.06        1           0.29      0.1       1         0.29      0.1       1         0.29       0.1        1
            150        1.03  0.29  0.232   0.53  0.58  0.3    0.02   0.6     0.89  0.3  8.8  0.29      0.06      1         0.29       0.07       1          0.29       0.06       1          0.29         0.06         1            0.29       0.1        1          0.29        0.07        1           0.29         0.06         1            0.29          0.1           1             0.29         0.08         1            0.29        0.1         1           0.29      0.06      1         0.29                0.1                 1                   0.29       0.06       1          0.29         0.06         1            0.29       0.06       1          0.29          0.06          1             0.29        0.06        1           0.29      0.1       1         0.29      0.1       1         0.29       0.1        1
            300        1.02  0.29  0.29    0.54  0.59  0.3    0.02   0.8     0.89  0.3  9    0.32      0.06      1         0.32       0.07       1          0.32       0.06       1          0.36         0.06         1            0.35       0.1        1          0.35        0.07        1           0.32         0.06         1            0.32          0.08          1             0.32         0.08         1            0.29        0.1         1           0.34      0.06      1         0.39                0.1                 1                   0.32       0.06       1          0.32         0.06         1            0.32       0.06       1          0.32          0.06          1             0.32        0.06        1           0.32      0.08      1         0.32      0.08      1         0.32       0.08       1
            300        1.02  0.29  0.29    0.54  0.58  0.3    0.02   1       0.89  0.4  9.2  0.32      0.04      1         0.38       0.05       1          0.32       0.04       1          0.43         0.06         1            0.36       0.1        1          0.38        0.05        1           0.32         0.04         1            0.32          0.06          1             0.32         0.08         1            0.29        0.1         1           0.34      0.04      1         0.41                0.1                 1                   0.32       0.04       1          0.32         0.04         1            0.32       0.04       1          0.32          0.05          1             0.32        0.04        1           0.32      0.06      1         0.32      0.06      1         0.32       0.06       1
            300        1.06  0.29  0.29    0.52  0.57  0.3    0.01   1       0.77  0.6  9.2  0.35      0.04      1         0.39       0.05       1          0.35       0.04       1          0.51         0.06         1            0.38       0.09       1          0.4         0.05        1           0.35         0.04         1            0.35          0.04          1             0.35         0.06         1            0.3         0.09        1           0.37      0.04      1         0.4                 0.09                1                   0.35       0.04       1          0.35         0.04         1            0.35       0.04       1          0.35          0.04          1             0.35        0.04        1           0.35      0.04      1         0.35      0.04      1         0.35       0.04       1
            300        1.11  0.29  0.29    0.5   0.55  0.3    0.01   1       0.45  0.8  9.1  0.38      0.02      0.42      0.39       0.03       0.42       0.38       0.02       0.42       0.5          0.06         0.42         0.39       0.07       0.42       0.4         0.04        0.42        0.38         0.01         0.42         0.38          0.02          0.42          0.38         0.04         0.42         0.31        0.09        0.42        0.4       0.02      0.42      0.4                 0.07                0.42                0.38       0.02       0.42       0.38         0.01         0.42         0.38       0.01       0.42       0.38          0.02          0.42          0.38        0.02        0.42        0.38      0.02      0.42      0.38      0.02      0.42      0.38       0.02       0.42
            300        1.12  0.29  0.29    0.5   0.55  0.3    0.01   1       0.27  0.9  9    0.41      0.02      0.37      0.41       0.02       0.37       0.41       0.01       0.37       0.5          0.06         0.37         0.39       0.05       0.37       0.4         0.03        0.37        0.41         0.01         0.37         0.41          0.01          0.37          0.41         0.03         0.37         0.32        0.09        0.37        0.42      0.01      0.37      0.41                0.05                0.37                0.41       0.01       0.37       0.41         0.01         0.37         0.41       0.01       0.37       0.41          0.01          0.37          0.41        0.01        0.37        0.41      0.01      0.37      0.41      0.01      0.37      0.41       0.01       0.37
            300        1.15  0.29  0.29    0.48  0.53  0.3    0.01   1       0.22  1    9    0.48      0         0         0.48       0          0          0.48       0          0          0.48         0            0            0.48       0          0          0.48        0           0           0.48         0            0            0.48          0             0             0.48         0            0            0.33        0.09        0.33        0.48      0         0         0.41                0                   0                   0.48       0          0          0.48         0            0            0.48       0          0          0.48          0             0             0.48        0           0           0.48      0         0         0.48      0         0         0.48       0          0
            300        1.18  0.29  0.29    0.47  0.52  0.3    0.01   1       0.16  1.1  8.9  0.47      0         0         0.47       0          0          0.47       0          0          0.47         0            0            0.47       0          0          0.47        0           0           0.47         0            0            0.47          0             0             0.47         0            0            0.34        0.09        0.31        0.47      0         0         0.4                 0                   0                   0.47       0          0          0.47         0            0            0.47       0          0          0.47          0             0             0.47        0           0           0.47      0         0         0.47      0         0         0.47       0          0
            300        1.2   0.29  0.29    0.46  0.51  0.3    0.01   1       0.13  1.1  8.9  0.46      0         0         0.46       0          0          0.46       0          0          0.46         0            0            0.46       0          0          0.46        0           0           0.46         0            0            0.46          0             0             0.46         0            0            0.35        0.09        0.31        0.46      0         0         0.4                 0                   0                   0.46       0          0          0.46         0            0            0.46       0          0          0.46          0             0             0.46        0           0           0.46      0         0         0.46      0         0         0.46       0          0
            300        1.25  0.29  0.29    0.44  0.49  0.3    0.01   1       0.12  1    8.9  0.44      0         0         0.44       0          0          0.44       0          0          0.44         0            0            0.44       0          0          0.44        0           0           0.44         0            0            0.44          0             0             0.44         0            0            0.36        0.09        0.33        0.44      0         0         0.42                0                   0                   0.44       0          0          0.44         0            0            0.44       0          0          0.44          0             0             0.44        0           0           0.44      0         0         0.44      0         0         0.44       0          0
        InitWater
          percentmethod: percent=1; distributed=filled from top
        InitNitrogen
          profile
            layer:
              no3    nh4       thickness
              6.503  0.599004  150
              2.101  0.100001  150
              2.101  0.100001  300
              1.701  0.100001  300
              1.701  0.100001  300
              1.701  0.100001  300
              1.701  0.100001  300
              1.701  0.100001  300
              1.701  0.100001  300
              1.701  0.100001  300
              1.701  0.100001  300
      outputfile
        variables
          variables: dd/mm/yyyy as Date, LeafGreenWt, StemGreenWt, paddockState, alw, stocking_rate, acc_eaten
        events Reporting Frequency: event=Daily
      graz
        intake_util_intercept = 1  # Intercept in eqn reln between intake and utilization
        intake_util_slope = -0.3  # Slope in eqn reln between intake and utilization
        yld_eat_restr = 300  # Yield at which intake restriction no longer applies
        summer_lwg = 70  # Expected lwg @ low SR
        autumn_lwg = 35  # Expected lwg @ low SR
        winter_lwg = 10  # Expected lwg @ low SR
        spring_lwg = 35  # Expected lwg @ low SR
        leaf_diet = 0.85  # Proportion of leaf in diet
        std_alw = 200
        metabol_expon = 0.75
        acc_eaten_reset = 335  # Day to reset eaten accumulator
        prop_can_eat = 1
        allow_supplements = 1
  simulation Grass Grazing Simulation
    metfile met: filename=C:\Program Files\Apsim6\apsim\met\sample\dalby.met
    clock
      start_date = 14/06/1988  # Select the start date of the simulation
      end_date = 17/11/1988  # Select the end date of the simulation
    summaryfile: filename=Blank Simulation.sum
    area paddock
      registrations global
      folder Manager folder
        manager Grasp Managment
          on init:
```
pasture_in = 0
ready_to_graze = 0
```
          on start_of_day:
```
if pasture_in = 0 then
   grasp establish init_section = establishment 
   pasture_in = 1
endif

if (day = 222) then
   ready_to_graze = 1
endif
```
        manager Grazing management: same as Wheat Grazing Simulation.paddock.Manager folder.Grazing management
      soil: same as Wheat Grazing Simulation.paddock.Soil
      outputfile
        variables
          variables: dd/mm/yyyy as Date, green_pool, dead_pool, paddockState, alw, stocking_rate, acc_eaten
        events Reporting Frequency: event=Daily
      graz: same as Wheat Grazing Simulation.paddock.graz
      grasp
        root_depth_init = 750  # Initial depth of roots (mm)
        dm_dead_leaf_init = 0  # Initial Dead Leaf weight (kg/ha)
        dm_dead_stem_init = 0  # Initial Dead Stem weight (kg/ha)
        dm_dead_root_init = 0  # Initial Dead Root weight (kg/ha)
        dm_green_leaf_init = 0  # Initial Green Leaf weight (kg/ha)
        dm_green_stem_init = 0  # Initial Green Stem weight (kg/ha)
        dm_green_root_init = 0  # Initial Green Root weight (kg/ha)
        basal_area_init = 0.5  # Initial Basal area of tussocks (%)
        acc_trans_for_n_init = 0  # Initial accumulated transpiration, used for N uptake (mm)
        acc_growth_for_n_init = 0  # Initial accumulated growth, used for N uptake (kg/ha)
        max_n_avail = 15  # Limit to total N (kg/year)
        max_n_avail_dist = 0.8 0.1 0.05  0.05  0.0 0.0  0.0  # Distribution of N in profile
        ll = 0.290  0.290  0.290  0.290  0.290  0.290  0.290  0.290  0.290  0.290  0.290  # Lower limit (ll) of water extraction (mm/mm)
        kl = 0.5      0.5      0.5    0.5  0.0  0.0  0.0  # Rate of water extraction (kl)
        kl2rlv = 1
        crop_type = grass
        uptake_source = calc
        height_max = 1200  # Maximum canopy height (mm)
        hgt_vpd_screen = 200  # Height at which surface effects on vpd are 0 (mm)
        height_1000kg = 100  # Sward Height per tonne (p096*10, mm)
        et_use_efficiency = 0  # Evapotranspiration use efficiency used in BA calc (kg/ha/mm) (p288)
        frac_leaf2total = 0.5  # Fraction of total dm produced that goes into leaf pool (0-1) (p123)
        yld_cover_slope = 0.693147  # Shape of exponential curve relating yield and cover
        yld_fpc50 = 1000  # yld_fpc50 (p046)
        yld_cov50 = 1000  # Yield transpiring at 50% of pan evap (p045)
        yld_tcov50 = 1000  # Tsdm yield at which cover for runoff is 50% (p271)
        swi_fullgreen = 0.1  # Min soil water for 100% green (p009)
        swi_nogrow = 0.4  # SWI when growth stops
        pot_regrow = 3  # Max rate regrowth from tussocks (kg/ha/unit grass ba) (p006)
        te_std = 10  # Transpiration efficiency at vpd=20mb (p007)
        rad_factor = 8.97
        residual_plant_N = 5  # Always this much n in plant (p097, kg/ha)
        litter_n = 0.3  # N conc of detached stems and roots ((p110-p111)/2)
        n_uptk_per100 = 5  # Nitrogen uptake per 100mm water (p098, kg/ha)
        frost_start = 2  # Minimum screen temp at which green cover=100% (oC,p125)
        frost_kill = 0  # Minimum screen temp at which frost kills all green (oC,p011)
        death_slope = 0.013  # Rate of green death per soil water(p051)
        death_intercept = 0.002  # Background death rate (p010)
        leaf_death_ratio = 1  # Proportion of leaf death to total death (p133)
        stem_death_ratio = 1  # Proportion of stem death to total death (p134)
        n_conc_dm_crit = 2.5  # Level of plant N at which no N stress occurs (p102)
        n_conc_dm_min = 0.4  # Level of soil N at which no N stress occurs (p101)
        n_conc_dm_max = 0.5  # Level of soil N at which soil N to high for growth (p100)
        stem_thresh = 0  # stem_thresh (p124)
        detach_dryseason = 0.0   0.002     0.002  # detach_dryseason: root, leaf, stem
        detach_wetseason = 0.0   0.002     0.002  # detach_wetseason: root, leaf, stem
        day_start_summer = 335
        day_end_summer = 59
        acc_et_reset = 273
        acc_growth_reset = 273
        trans_for_n_reset = 273
        growth_for_n_reset = 273
        day_start_wet = 274
        day_start_dry = 91
        enr_a_coeff = 7.4
        enr_b_coeff = 0.2
      tclmanager TCL Manager (standalone)
        rule Debugger
          on init:
```
package require Tk
wm withdraw .

package require tkcon
tkcon show
tkcon title "Apsim Debugging Console"
puts "Commands:"
puts " 'c'       - Continue"
puts " 's <n>'   - Step n days (default 1)"
puts " 'p <what>'- Print apsim variable"
puts " 'b <cond>'- Set break condition"
set steps 1
update

# A 4 command debugger:
proc c {}      {uplevel #0 set steps -1}  ;# Continue
proc s {{n 1}} {uplevel #0 set steps $n}  ;# Step n days
proc p {var}   {apsimGet $var}            ;# print apsim variable
proc b {cond}  {global Conds; lappend Conds $cond} ;# set break condition
set Conds {}

# Link an apsim variable
proc link {apsimName tclName} {
   global $tclName; set $tclName {}
   trace variable $tclName r "getLinked $apsimName"
   trace variable $tclName w "setLinked $apsimName"
}
proc getLinked {a n1 n2 op} {uplevel #0 set $n1 [apsimGet $a]}
proc setLinked {a n1 n2 op} {apsimSet $a $n1}
```
          on process:
```
update
foreach cond $Conds {
  if {[expr $cond]} {
    set steps 1
  }
}

incr steps -1
if {$steps == 0} {tkwait variable steps}
```
  simulation Wheat Lucerne Rotation
    clock
      start_date = 1/01/1940  # Select the start date of the simulation
      end_date = 1/01/2005  # Select the end date of the simulation
    summaryfile: filename=Moonggoo.sum
    metfile met
      filename=C:\Documents and Settings\devoilp\My Documents\Projects\ApsFarm\Workshop Files\Generic Runs\oakey.met
    area Paddock
      registrations global
      wheat
      lucerne
      graz
        intake_util_intercept = 1  # Intercept in eqn reln between intake and utilization
        intake_util_slope = -0.3  # Slope in eqn reln between intake and utilization
        yld_eat_restr = 300  # Yield at which intake restriction no longer applies
        summer_lwg = 70  # Expected summer lwg @ low SR
        autumn_lwg = 35  # Expected autumn lwg @ low SR
        winter_lwg = 10  # Expected winter lwg @ low SR
        spring_lwg = 35  # Expected spring lwg @ low SR
        leaf_diet = 0.85  # Proportion of leaf in diet
        std_alw = 200
        metabol_expon = 0.75
        acc_eaten_reset = 335  # Day to reset eaten accumulator
        prop_can_eat = 1
        allow_supplements = 1
      surfaceom surface organic matter
        PoolName = wheat_stubble  # Organic Matter pool name
        type = wheat  # Organic Matter type
        mass = 1000.  # Initial surface residue (kg/ha)
        cnr = 80.0  # C:N ration of initial residue
        standing_fraction = 0.0  # Fraction of residue standing
      fertiliser
      paddockmanager Manager
        tclui Rotation Initialisation: initialState=lucernePrepn; simpleLogging=0
          uiscript=source $apsuite/apsim/tcllink/lib/RotationInitialisationUI.tcl
          rule Wheat Lucerne Rotation Rotation Initialisation.out - Rotation Initialisation UI1
            on init:
```
source $apsuite/apsim/tcllink/lib/RotationInitialisation.tcl
set state "lucernePrepn"
```
          rule Wheat Lucerne Rotation Rotation Initialisation.out - Rotation Initialisation UI2
            on process:
```
checkSetup
doProcess
```
          rule Wheat Lucerne Rotation Rotation Initialisation.out - Rotation Initialisation UI3
            on exit:
```
exit
```
        tclui Wheat Lucerne Rotation: uiscript=source $apsuite/apsim/tcllink/lib/RotationsUI.tcl
          node Wheat: desc=A wheat crop
          node wheatPrepn: desc=wheat seedbed preparation
          node Lucerne: desc=A lucerne crop
          node Reestablish: desc=Lucerne has died - wait 5 days and re-plant
          node lucernePrepn: desc=Lucerne seedbed preparation
          arc arc11: source=wheatPrepn; target=Wheat; actions=sow_wheat; rules=[canPlant_wheat]
          arc arc2: source=Lucerne; target=Reestablish; actions=[apsimSendMessage lucerne end_crop, set waiting 0]; rules=[string match [apsimGet lucerne.plant_status]  dead]
          arc arc12: source=Lucerne; target=wheatPrepn; actions=[apsimSendMessage lucerne end_crop, set nLucerneDays 0]; rules=[incr nLucerneDays] > 700
          arc arc3: source=Reestablish; target=Lucerne; actions=sow_lucerne; rules=[incr waiting] == 2
          arc arc0: source=Wheat; target=lucernePrepn; rules=[canHarvest_wheat]
            actions=[apsimSendMessage wheat harvest, apsimSendMessage wheat end_crop]
          arc arc8: source=lucernePrepn; target=Lucerne; actions=[sow_lucerne, set nLucerneDays 0]; rules=[canPlant_lucerne]
          rule Init rule
            on init:
```
package require struct
::struct::graph stateGraph
stateGraph node insert "Wheat"
set colour(Wheat) "green"
stateGraph node insert "wheatPrepn"
set colour(wheatPrepn) "gray"
stateGraph node insert "Lucerne"
set colour(Lucerne) "white"
stateGraph node insert "Reestablish"
set colour(Reestablish) "purple"
stateGraph node insert "lucernePrepn"
set colour(lucernePrepn) "gray"
stateGraph arc insert "wheatPrepn" "Wheat" "arc11"
stateGraph arc lappend "arc11" actions {sow_wheat}
stateGraph arc lappend "arc11" rules {[canPlant_wheat]}
stateGraph arc lappend "arc11" actions {}
stateGraph arc insert "Lucerne" "Reestablish" "arc2"
stateGraph arc lappend "arc2" actions {apsimSendMessage lucerne end_crop}
stateGraph arc lappend "arc2" actions {set waiting 0}
stateGraph arc lappend "arc2" rules {[string match [apsimGet lucerne.plant_status]  dead] }
stateGraph arc lappend "arc2" actions {}
stateGraph arc insert "Lucerne" "wheatPrepn" "arc12"
stateGraph arc lappend "arc12" actions {apsimSendMessage lucerne end_crop}
stateGraph arc lappend "arc12" actions {set nLucerneDays 0}
stateGraph arc lappend "arc12" rules {[incr nLucerneDays] > 700}
stateGraph arc lappend "arc12" actions {}
stateGraph arc insert "Reestablish" "Lucerne" "arc3"
stateGraph arc lappend "arc3" actions {sow_lucerne}
stateGraph arc lappend "arc3" rules {[incr waiting] == 2}
stateGraph arc lappend "arc3" actions {}
stateGraph arc insert "Wheat" "lucernePrepn" "arc0"
stateGraph arc lappend "arc0" actions {apsimSendMessage wheat harvest}
stateGraph arc lappend "arc0" actions {apsimSendMessage wheat end_crop}
stateGraph arc lappend "arc0" rules {[canHarvest_wheat]}
stateGraph arc lappend "arc0" actions {}
stateGraph arc insert "lucernePrepn" "Lucerne" "arc8"
stateGraph arc lappend "arc8" actions {sow_lucerne}
stateGraph arc lappend "arc8" actions {set nLucerneDays 0}
stateGraph arc lappend "arc8" rules {[canPlant_lucerne]}
stateGraph arc lappend "arc8" actions {}
```
        tclui Wheat Sowing Rule: uiscript=source $apsuite/apsim/tcllink/lib/GenericSowingUI.tcl; crop=wheat; criteria=variable; date1=15-may; date2=10-jul; raincrit=25; rainnumdays=3; esw_amount=50; must_sow=yes; plants=100; sowing_depth=30; row_spacing=250; skipplant=0; skiprow=0; cultivar=hartog; class=plant; module=plant
          ruletemplate Sowing rule - initialisation:
            # Support procedures
            # Can we plant a crop today?
            proc canPlant_[crop] {} {
              if {"[criteria]" == "variable"} {
                 set year [apsimGet year]; set day [apsimGet day]
                 set d1 [clock format [clock scan "[date1]-$year"] -format %j]
                 set d2 [clock format [clock scan "[date2]-$year"] -format %j]

                 if {"[must_sow]" == "yes" && $day == $d2} {return 1}

                 if {$d1 > $d2} {
                    set dateOK [expr $day >= $d1 || $day <= $d2]
                 } else {
                    set dateOK [expr $day >= $d1 && $day <= $d2]
                 }
                 set rainOK [expr [apsimGet rain\[[rainnumdays]\]] >= [raincrit]]
                 set eswOK [expr [apsimGet esw] >= [esw_amount]]
                 return [expr $dateOK && $rainOK && $eswOK]
              } elseif {"[criteria]" == "fixed"} {
                 set year [apsimGet year]; set day [apsimGet day]
                 set d1 [clock format [clock scan "[date1]-$year"] -format %j]
                 return [expr $day == $d1]
              } else {
                 error "Unknown sowing criteria \"[criteria]\"."
              }
              return "notreached"
            }

            # Plant a crop now
            proc sow_[crop] {} {
              if {"[module]" == "plant"} {
                 apsimSendMessage [crop] sow {plants [plants]} {sowing_depth [sowing_depth]} \
                         {cultivar [cultivar]} {row_spacing [row_spacing]} \
                         {skipplant [skipplant]} {skiprow [skiprow]} {crop_class [class]}
              } elseif {"[module]" == "cropmod"} {
                 apsimSendMessage [crop] sow {plants [density]} {sowing_depth [depth]} \
                         {cultivar [cultivar]} {row_spacing [row_spacing]} {skiprow [skiprow]}
              } elseif {"[module]" == "growth"} {
                 apsimSendMessage [crop] ???
              } elseif {"[module]" == "ozcot"} {
                 apsimSendMessage [crop] sow {plants_pm [plants_pm]} {sowing_depth [sowing_depth]} \
                         {row_spacing [row_spacing]} {skiprow [skiprow]} {cultivar [cultivar]}
              } elseif {"[module]" == "oryza"} {
                 apsimSendMessage [crop] sow {cultivar [cultivar]}
              } elseif {"[module]" == "sorghum"} {
                 apsimSendMessage [crop] sow {plants [plants]} {sowing_depth [sowing_depth]} \
                         {cultivar [cultivar]} {row_spacing [row_spacing]} {skiprow [skiprow]} \
                         {tiller_no_fertile [tiller_no_fertile]}
              } elseif {"[module]" == "sugar"} {
                 apsimSendMessage [crop] sow {plants [plants]} {cultivar [cultivar]} {sowing_depth [sowing_depth]}
              } else {
                error "Unknown crop module \"[module]\"."
              }
            }

            proc canHarvest_[crop] {} {
               return [expr [string match [apsimGet [crop].stage_name] "harvest_ripe"] &&\
                            [string match [apsimGet [crop].plant_status] "dead"]]
            }
          rule Wheat Lucerne Rotation Wheat Sowing Rule.out - Sowing rule - initialisation
            on init:
```
# Support procedures
# Can we plant a crop today?
proc canPlant_wheat {} {
  if {"variable" == "variable"} {
     set year [apsimGet year]; set day [apsimGet day]
     set d1 [clock format [clock scan "15-may-$year"] -format %j]
     set d2 [clock format [clock scan "10-jul-$year"] -format %j]

     if {"yes" == "yes" && $day == $d2} {return 1}

     if {$d1 > $d2} {
        set dateOK [expr $day >= $d1 || $day <= $d2]
     } else {   
        set dateOK [expr $day >= $d1 && $day <= $d2]
     }
     set rainOK [expr [apsimGet rain\[3\]] >= 25]
     set eswOK [expr [apsimGet esw] >= 50]
     return [expr $dateOK && $rainOK && $eswOK]
  } elseif {"variable" == "fixed"} {
     set year [apsimGet year]; set day [apsimGet day]
     set d1 [clock format [clock scan "15-may-$year"] -format %j]
     return [expr $day == $d1]
  } else {
     error "Unknown sowing criteria \"variable\"."
  }
  return "notreached"
}

# Plant a crop now
proc sow_wheat {} {
  if {"plant" == "plant"} {
     apsimSendMessage wheat sow {plants 100} {sowing_depth 30} \
             {cultivar hartog} {row_spacing 250} \
             {skipplant 0} {skiprow 0} {crop_class plant} 
  } elseif {"plant" == "cropmod"} {
     apsimSendMessage wheat sow {plants [density]} {sowing_depth [depth]} \
             {cultivar hartog} {row_spacing 250} {skiprow 0} 
  } elseif {"plant" == "growth"} {
     apsimSendMessage wheat ???
  } elseif {"plant" == "ozcot"} {
     apsimSendMessage wheat sow {plants_pm [plants_pm]} {sowing_depth 30} \
             {row_spacing 250} {skiprow 0} {cultivar hartog}
  } elseif {"plant" == "oryza"} {
     apsimSendMessage wheat sow {cultivar hartog} 
  } elseif {"plant" == "sorghum"} {
     apsimSendMessage wheat sow {plants 100} {sowing_depth 30} \
             {cultivar hartog} {row_spacing 250} {skiprow 0} \
             {tiller_no_fertile [tiller_no_fertile]}
  } elseif {"plant" == "sugar"} {
     apsimSendMessage wheat sow {plants 100} {cultivar hartog} {sowing_depth 30}
  } else {
    error "Unknown crop module \"plant\"."
  }
}


proc canHarvest_wheat {} {
   return [expr [string match [apsimGet wheat.stage_name] "harvest_ripe"] &&\
                [string match [apsimGet wheat.plant_status] "dead"]]
}
```
        tclui Lucerne Sowing Rule: uiscript=source $apsuite/apsim/tcllink/lib/GenericSowingUI.tcl; crop=lucerne; criteria=variable; date1=15-oct; date2=10-jul; raincrit=25; rainnumdays=3; esw_amount=50; must_sow=no; plants=200; sowing_depth=10; row_spacing=250; skipplant=0; skiprow=0; cultivar=hunter_river; class=plant; module=plant
          ruletemplate Sowing rule - initialisation:
            # Support procedures
            # Can we plant a crop today?
            proc canPlant_[crop] {} {
              if {"[criteria]" == "variable"} {
                 set year [apsimGet year]; set day [apsimGet day]
                 set d1 [clock format [clock scan "[date1]-$year"] -format %j]
                 set d2 [clock format [clock scan "[date2]-$year"] -format %j]

                 if {"[must_sow]" == "yes" && $day == $d2} {return 1}

                 if {$d1 > $d2} {
                    set dateOK [expr $day >= $d1 || $day <= $d2]
                 } else {
                    set dateOK [expr $day >= $d1 && $day <= $d2]
                 }
                 set rainOK [expr [apsimGet rain\[[rainnumdays]\]] >= [raincrit]]
                 set eswOK [expr [apsimGet esw] >= [esw_amount]]
                 return [expr $dateOK && $rainOK && $eswOK]
              } elseif {"[criteria]" == "fixed"} {
                 set year [apsimGet year]; set day [apsimGet day]
                 set d1 [clock format [clock scan "[date1]-$year"] -format %j]
                 return [expr $day == $d1]
              } else {
                 error "Unknown sowing criteria \"[criteria]\"."
              }
              return "notreached"
            }

            # Plant a crop now
            proc sow_[crop] {} {
              if {"[module]" == "plant"} {
                 apsimSendMessage [crop] sow {plants [plants]} {sowing_depth [sowing_depth]} \
                         {cultivar [cultivar]} {row_spacing [row_spacing]} \
                         {skipplant [skipplant]} {skiprow [skiprow]} {crop_class [class]}
              } elseif {"[module]" == "cropmod"} {
                 apsimSendMessage [crop] sow {plants [density]} {sowing_depth [depth]} \
                         {cultivar [cultivar]} {row_spacing [row_spacing]} {skiprow [skiprow]}
              } elseif {"[module]" == "growth"} {
                 apsimSendMessage [crop] ???
              } elseif {"[module]" == "ozcot"} {
                 apsimSendMessage [crop] sow {plants_pm [plants_pm]} {sowing_depth [sowing_depth]} \
                         {row_spacing [row_spacing]} {skiprow [skiprow]} {cultivar [cultivar]}
              } elseif {"[module]" == "oryza"} {
                 apsimSendMessage [crop] sow {cultivar [cultivar]}
              } elseif {"[module]" == "sorghum"} {
                 apsimSendMessage [crop] sow {plants [plants]} {sowing_depth [sowing_depth]} \
                         {cultivar [cultivar]} {row_spacing [row_spacing]} {skiprow [skiprow]} \
                         {tiller_no_fertile [tiller_no_fertile]}
              } elseif {"[module]" == "sugar"} {
                 apsimSendMessage [crop] sow {plants [plants]} {cultivar [cultivar]} {sowing_depth [sowing_depth]}
              } else {
                error "Unknown crop module \"[module]\"."
              }
            }
          rule Wheat Lucerne Rotation Lucerne Sowing Rule.out - Sowing rule - initialisation
            on init:
```
# Support procedures
# Can we plant a crop today?
proc canPlant_lucerne {} {
  if {"variable" == "variable"} {
     set year [apsimGet year]; set day [apsimGet day]
     set d1 [clock format [clock scan "15-oct-$year"] -format %j]
     set d2 [clock format [clock scan "10-jul-$year"] -format %j]

     if {"no" == "yes" && $day == $d2} {return 1}

     if {$d1 > $d2} {
        set dateOK [expr $day >= $d1 || $day <= $d2]
     } else {   
        set dateOK [expr $day >= $d1 && $day <= $d2]
     }
     set rainOK [expr [apsimGet rain\[3\]] >= 25]
     set eswOK [expr [apsimGet esw] >= 50]
     return [expr $dateOK && $rainOK && $eswOK]
  } elseif {"variable" == "fixed"} {
     set year [apsimGet year]; set day [apsimGet day]
     set d1 [clock format [clock scan "15-oct-$year"] -format %j]
     return [expr $day == $d1]
  } else {
     error "Unknown sowing criteria \"variable\"."
  }
  return "notreached"
}

# Plant a crop now
proc sow_lucerne {} {
  if {"plant" == "plant"} {
     apsimSendMessage lucerne sow {plants 200} {sowing_depth 10} \
             {cultivar hunter_river} {row_spacing 250} \
             {skipplant 0} {skiprow 0} {crop_class plant} 
  } elseif {"plant" == "cropmod"} {
     apsimSendMessage lucerne sow {plants [density]} {sowing_depth [depth]} \
             {cultivar hunter_river} {row_spacing 250} {skiprow 0} 
  } elseif {"plant" == "growth"} {
     apsimSendMessage lucerne ???
  } elseif {"plant" == "ozcot"} {
     apsimSendMessage lucerne sow {plants_pm [plants_pm]} {sowing_depth 10} \
             {row_spacing 250} {skiprow 0} {cultivar hunter_river}
  } elseif {"plant" == "oryza"} {
     apsimSendMessage lucerne sow {cultivar hunter_river} 
  } elseif {"plant" == "sorghum"} {
     apsimSendMessage lucerne sow {plants 200} {sowing_depth 10} \
             {cultivar hunter_river} {row_spacing 250} {skiprow 0} \
             {tiller_no_fertile [tiller_no_fertile]}
  } elseif {"plant" == "sugar"} {
     apsimSendMessage lucerne sow {plants 200} {cultivar hunter_river} {sowing_depth 10}
  } else {
    error "Unknown crop module \"plant\"."
  }
}
```
        rule Grazing management
          on init:
```
# Initialisation
set nLucerneDays 0
set annual_lwg  0.0
set paddockState "empty"
set ready_to_graze 0
set growth 0.0

# Tell the grazing module we only graze lucerne. This is needed when there is more than one crop
# in the paddock - even though only one may be "alive".
apsimSet graz.pasture_source "lucerne"
```
          on prepare:
```
# Start grazing 90 days after sowing
if {$paddockState == "empty"  && $nLucerneDays > 90} {
   apsimSet graz.stocking_rate 0.4
   apsimSet graz.alw  200.0
   set annual_lwg 0.0
   set paddockState stocked
}

# Stop grazing when the crop comes off
if { $paddockState != "empty"  && $nLucerneDays == 0} {
   apsimSet graz.stocking_rate 0.0
   apsimSet graz.alw  0.0
   set annual_lwg 0.0
   set paddockState empty
}

# This is needed by graz (for some obscure reason).
if { $paddockState != "empty" } {
  set growth [apsimGet lucerne.dlt_dm]
}

# 'GRAZEON' stocking rate resets (%Use of TSDM for next year)
if {$paddockState != "empty" && [apsimGet day] == 152} {
   apsimSet graz.alw 200.0

   set avgDailyIntake  [expr ($annual_lwg/365.25 + 1.058) / 0.304]
   set targetUtil  [expr 30.0 / 100.0]
   set annualIntake [expr $avgDailyIntake * 365.5]
   set stock_equiv_ratio [expr $targetUtil * [apsimGet lucerne.biomass_wt]*100 / $annualIntake]

   set weight_ratio [expr [apsimGet graz.alw]/ 200.0]
   set factor  [expr pow($weight_ratio, 0.75)]
   set beasts_ha [expr $stock_equiv_ratio / $factor]
   apsimSet graz.stocking_rate $beasts_ha

   set annual_lwg 0.0
}
```
          on post:
```
if  {[apsimGet day_of_month] == 1} {
  apsimSendMessage outputfile do_output
}
```
      outputfile: filename=sample.out
        variables
          variable:
            dd/mm/yyyy as Date
            wheat.yield as whtYield
            lucerne.biomass as lucerneBiomass
            alw
            stocking_rate
        events Reporting Frequency: event=harvesting
      soil Black Vertosol-Bongeen (Tipton No116): state=Queensland; region=Darling Downs; nearesttown=Pittsworth, Q 4356; site=Tipton; SoilType=Black Vertosol; DataSource=CSIRO Sustainable Ecosystems, Toowoomba; naturalvegetation=Qld Bluegrass; Cona=3.5; U=6; Salb=0.12; DiffusConst=40; DiffusSlope=16; CN2Bare=73; CNRed=20; CNCov=0.8; RootCN=40; RootWT=1000; SoilCN=12; EnrACoeff=7.4; EnrBCoeff=0.2
        comment=Soil naming structure: \State\Region\Classification-Local Name (Site/district and locator number)
        profile
          layer:
            thickness  bd     ll15   airdry  dul    sat    swcon  fbiom  finert  oc     ph     ll wheat  kl wheat  xf wheat  ll Cotton  kl Cotton  xf Cotton  ll Sorghum  kl Sorghum  xf Sorghum  ll lucerne  kl lucerne  xf lucerne
            150        0.970  0.270  0.140   0.550  0.600  0.300  0.040  0.400   1.900  8.400  0.270     0.060     1         0.270      0.100      1          0.270       0.070       1           0.270       0.070       1
            150        1      0.270  0.220   0.540  0.590  0.300  0.020  0.600   1.210  8.600  0.270     0.060     1         0.270      0.100      1          0.270       0.070       1           0.270       0.070       1
            300        1.020  0.270  0.270   0.540  0.590  0.300  0.020  0.800   0.450  8.900  0.350     0.060     1         0.290      0.100      1          0.350       0.070       1           0.290       0.070       1
            300        1.070  0.270  0.270   0.520  0.570  0.300  0.020  1       0.300  8.900  0.330     0.040     1         0.310      0.100      1          0.370       0.050       1           0.310       0.050       1
            300        1.110  0.270  0.270   0.500  0.550  0.300  0.010  1       0.200  8.800  0.360     0.040     1         0.340      0.090      1          0.380       0.050       1           0.340       0.050       1
            300        1.110  0.270  0.270   0.500  0.550  0.300  0.010  1       0.160  8.600  0.410     0.020     1         0.370      0.070      1          0.410       0.040       1           0.370       0.040       1
            300        1.110  0.270  0.270   0.500  0.550  0.300  0.010  1       0.170  8.800  0.490     0.020     1         0.420      0.050      1          0.420       0.030       1           0.420       0.030       1
        InitWater
          profile
            layer:
              sw     thickness
              0.270  150
              0.270  150
              0.290  300
              0.310  300
              0.340  300
              0.370  300
              0.420  300
        InitNitrogen
          profile
            layer:
              no3  nh4    thickness
              6    1      150
              5    1      150
              3    0.900  300
              2    0.700  300
              1    0.200  300
              1    0.100  300
              1    0.010  300
