simulations untitled
  simulation SpatialSimulation
    clock
      start_date = 1/01/1940  # Select the start date of the simulation
      end_date = 10/03/1940  # Select the end date of the simulation
    summaryfile: filename=D:\development\APSIMUI\ContinuousWheat.sum
    metfile met: filename=%apsuite\apsim\met\sample\goond.met
    log: debugoutput=on; filename=log.txt
    outputfile topoutput: filename=D:\development\APSIMUI\top.out
      outputfiledescription My Variables
        variables
          variables: day, date, evaporation, available_depth, overflow, seepage, available_water, streamflow
        events: event=post
    area paddock1
      registrations
      outputfile: filename=D:\development\APSIMUI\Paddock1.out
        outputfiledescription My Variables
          variables
            variables: day, Date, surfaceom_wt, surfaceom_cover, biomass, yield, esw, irrigation, streamflow, runoff
          events: event=post
          outputfiledescription My Variables
            variables
              variables: Date, surfaceom_wt, surfaceom_cover, biomass, yield, esw, irrigation
            events: event=post
      soil #016 - Jimbour,Waco: Site=Jimbour; Region=South East Queensland; LocalName=Waco; SoilType=Black Vertosol; NearestTown=Jimbour, Q 4352; NaturalVegetation=Grassland, mainly Qld bluegrass
        Water: Cona=3.5; DiffusConst=40; DiffusSlope=16; U=6; Salb=0.13; Cn2Bare=73; CnRed=20; CnCov=0.8
          layer:
            thickness  bd    ll15  airdry  dul   sat   sw       swcon
            150        1.02  0.29  0.145   0.54  0.59  9999.99  0.3
            150        1.03  0.29  0.26    0.53  0.58  9999.99  0.3
            300        1.02  0.29  0.29    0.54  0.59  9999.99  0.3
            300        1.02  0.29  0.29    0.54  0.58  9999.99  0.3
            300        1.06  0.3   0.3     0.52  0.57  9999.99  0.3
            300        1.11  0.31  0.31    0.5   0.55  9999.99  0.3
            300        1.12  0.32  0.32    0.5   0.55  9999.99  0.3
            300        1.15  0.33  0.33    0.48  0.53  9999.99  0.3
            300        1.18  0.34  0.34    0.47  0.52  9999.99  0.3
            300        1.2   0.35  0.35    0.46  0.51  9999.99  0.3
            300        1.25  0.36  0.36    0.44  0.49  9999.99  0.3
        Nitrogen: CnCanopyFact=1; RootCn=40; RootWt=200; SoilCn=12.5; EnrACoeff=7.4; EnrBCoeff=0.2
          layer:
            oc    ph   fbiom  finert  no3  nh4
            1.04  8.4  0.025  0.4     6.5  0.6
            0.89  8.8  0.02   0.6     2.1  0.1
            0.89  9    0.015  0.8     2.1  0.1
            0.89  9.2  0.01   0.9     1.7  0.1
            0.77  9.2  0.01   0.95    1.7  0.1
            0.45  9.1  0.01   0.95    1.7  0.1
            0.27  9    0.01   0.95    1.7  0.1
            0.22  9    0.01   0.95    1.7  0.1
            0.16  8.9  0.01   0.95    1.7  0.1
            0.13  8.9  0.01   0.95    1.7  0.1
            0.12  8.9  0.01   0.95    1.7  0.1
        other
          ec=[0.2, 0.25, 0.31, 0.4, 0.59, 0.84, 0.93, 1.01, 1.06, 1.05, 1.01]
        InitWater
          percentmethod: percent=1; distributed=filled from top
        SoilCrop Barley
          layer:
            ll    kl    xf
            0.29  0.1   1
            0.29  0.1   1
            0.32  0.08  1
            0.38  0.06  1
            0.39  0.04  1
            0.39  0.02  1
            0.41  0.01  1
            0.48  0     0
            0.47  0     0
            0.46  0     0
            0.44  0     0
        SoilCrop Chickpea
          layer:
            ll    kl    xf
            0.29  0.1   1
            0.29  0.1   1
            0.36  0.08  1
            0.43  0.06  1
            0.51  0.04  1
            0.5   0.02  1
            0.5   0.01  1
            0.48  0     0
            0.47  0     0
            0.46  0     0
            0.44  0     0
        SoilCrop Lucerne
          layer:
            ll    kl    xf
            0.29  0.1   1
            0.29  0.1   1
            0.29  0.1   1
            0.29  0.1   1
            0.3   0.09  1
            0.31  0.09  1
            0.32  0.09  1
            0.33  0.09  1
            0.34  0.09  1
            0.35  0.09  1
            0.36  0.09  1
        SoilCrop Maize
          layer:
            ll    kl    xf
            0.29  0.1   1
            0.29  0.1   1
            0.34  0.1   1
            0.34  0.08  1
            0.37  0.06  1
            0.4   0.04  1
            0.42  0.02  1
            0.48  0     0
            0.47  0     0
            0.46  0     0
            0.44  0     0
        SoilCrop Perennial Grass
          layer:
            ll    kl    xf
            0.29  0.1   1
            0.29  0.1   1
            0.39  0.1   1
            0.41  0.1   1
            0.4   0.09  1
            0.4   0.07  1
            0.41  0.05  1
            0.41  0     0
            0.4   0     0
            0.4   0     0
            0.42  0     0
        SoilCrop Sorghum
          layer:
            ll    kl    xf
            0.29  0.1   1
            0.29  0.1   1
            0.35  0.1   1
            0.38  0.08  1
            0.4   0.06  1
            0.4   0.04  1
            0.4   0.02  1
            0.48  0     0
            0.47  0     0
            0.46  0     0
            0.44  0     0
        SoilCrop Wheat
          layer:
            ll    kl    xf
            0.29  0.1   1
            0.29  0.1   1
            0.32  0.08  1
            0.32  0.06  1
            0.35  0.04  1
            0.38  0.02  1
            0.41  0.01  1
            0.48  0     0
            0.47  0     0
            0.46  0     0
            0.44  0     0
      surfaceom: PoolName=wheat_stubble; type=wheat; mass=1000.; cnr=80.0; standing_fraction=0.0
      manager
        rule Sowing rule
          condition start_of_day:
            if ([crop].plant_status = 'out') then
                     if (date_within('[date1], [date2]') = 1) then
                        surface_moist = (sw(1) - ll15(1)) / (dul(1)- ll15(1))
                        if ((esw >= [esw_amount] AND
                              (surface_moist <= [surface_up] and surface_moist >= [surface_low])) OR
                            ('[must_sow]' = 'yes' AND today = date('[date2]'))) THEN
                           [crop] sow plants =[density], sowing_depth = [depth], cultivar = [cultivar], row_spacing = [row_spacing]

                        endif
                     endif
                  endif
          category Sowing criteria
          category Sowing parameters
        rule Harvesting rule
          condition end_of_day:
            if [crop].stage_name = 'harvest_ripe' or [crop].plant_status = 'dead' then
                          [crop]  harvest
                          [crop]  end_crop
                       endif
          category Harvesting criteria
        rule Sowing fertiliser
          condition [modulename].[eventname]=[fertmodule] apply amount = [fert_amount_sow] (kg/ha), depth = 50 (mm), type = [fert_type_sow]
          category When should fertiliser be applied
          category Fertiliser application details
      wheat
      fertiliser
      logic
        on startofday:
```
crop_area = 100[cr]if day = 5 then[cr] irrigation apply amount = 100, source = dam[cr]endif
```
      irrigation
        automatic_irrigation = off  # switch
        asw_depth = 600.0  # Depth to which ASW is calculated. (mm)
        crit_fr_asw = 0.5  # Fraction of ASW below which irrigation is applied (0-1.0)
        irrigation_efficiency = 1.0  # Efficiency of the irrigation. (0-1.0)
      stream stream1
    area paddock2
      registrations
      outputfile: filename=D:\development\APSIMUI\Paddock2.out
        outputfiledescription My Variables
          variables
            variables: Date, surfaceom_wt, surfaceom_cover, biomass, streamflow, yield
          events: event=post
      soil #016 - Jimbour,Waco: same as SpatialSimulation.paddock1.#016 - Jimbour,Waco
      surfaceom: PoolName=wheat_stubble; type=wheat; mass=1000.; cnr=80.0; standing_fraction=0.0
      manager: same as SpatialSimulation.paddock1.Manager
      wheat
      fertiliser
      irrigation
        automatic_irrigation = off  # switch
        asw_depth = 600.0  # Depth to which ASW is calculated. (mm)
        crit_fr_asw = 0.5  # Fraction of ASW below which irrigation is applied (0-1.0)
        irrigation_efficiency = 1.0  # Efficiency of the irrigation. (0-1.0)
      logic
        on startofday:
```
crop_area = 100[cr]
```
      stream stream2
    area Forestry
      registrations
      outputfile: filename=D:\development\APSIMUI\Forestry.out
        outputfiledescription My Variables
          variables
            variables: date, lai, height, runoff, esw, ft, fw, fvpd, fn
          events: event=end_year
      manager
        rule Planting rule
          condition start_of_day:
            if (date('[date1]') = today) and [crop].plant_status = 'out' then
                           [crop]  establish plants =[density], init_section = seedling
                     endif
          category Sowing criteria
          category Sowing parameters
        rule Establishment fertiliser
          condition [modulename].[eventname]=[fertmodule] apply amount = [fert_amount_sow] (kg/ha), depth = 50 (mm), type = [fert_type_sow]
          category When should fertiliser be applied
          category Fertiliser application details
        rule Fertilise on a date
          condition start_of_day:
            if (date('[date1]') = today) then
                           [fertmodule] apply amount = [fert_amount_sow] (kg/ha), depth = 50 (mm), type = [fert_type_sow]
                        endif
          category When should fertiliser be applied
          category Fertiliser application details
      fertiliser
      surfaceom LitterLayer: PoolName=egrandis; type=grandis; mass=1000.; cnr=80.0; standing_fraction=0.0
      soil UniformSoil: Site=Jimbour; Region=South East Queensland; LocalName=Waco; SoilType=Black Vertosol; NearestTown=Jimbour, Q 4352; NaturalVegetation=Grassland, mainly Qld bluegrass
        Water: Cona=3.5; DiffusConst=88; DiffusSlope=35.4; U=4; Salb=0.13; Cn2Bare=65; CnRed=20; CnCov=0.8
          layer:
            thickness  bd   ll15  airdry  dul  sat  sw       swcon
            150        1.2  0.1   0.07    0.2  0.3  9999.99  0.3
            150        1.2  0.1   0.07    0.2  0.3  9999.99  0.3
            300        1.2  0.1   0.07    0.2  0.3  9999.99  0.3
            300        1.2  0.1   0.07    0.2  0.3  9999.99  0.3
            300        1.2  0.1   0.07    0.2  0.3  9999.99  0.3
            300        1.2  0.1   0.07    0.2  0.3  9999.99  0.3
            300        1.2  0.1   0.07    0.2  0.3  9999.99  0.3
            300        1.2  0.1   0.07    0.2  0.3  9999.99  0.3
            300        1.2  0.1   0.07    0.2  0.3  9999.99  0.3
            300        1.2  0.1   0.07    0.2  0.3  9999.99  0.3
            300        1.2  0.1   0.07    0.2  0.3  9999.99  0.3
        Nitrogen: CnCanopyFact=1; RootCn=60; RootWt=1000; SoilCn=20; EnrACoeff=7.4; EnrBCoeff=0.2
          layer:
            oc   ph  fbiom  finert  no3  nh4
            1    6   0.02   0.6     1    0.1
            0.9  6   0.02   0.6     1    0.1
            0.9  6   0.02   0.8     1    0.1
            0.9  6   0.01   0.9     1    0.1
            0.8  6   0.01   0.95    1    0.1
            0.4  6   0.01   0.95    1    0.1
            0.3  6   0.01   0.95    1    0.1
            0.2  6   0.01   0.95    1    0.1
            0.2  6   0.01   0.95    1    0.1
            0.1  6   0.01   0.95    1    0.1
            0.1  6   0.01   0.95    1    0.1
        other
          ec=[0.2, 0.2, 0.3, 0.4, 0.6, 0.8, 0.9, 1, 1.1, 1, 1]
        InitWater
          percentmethod: percent=0.5; distributed=filled from top
        SoilCrop egrandis
          layer:
            ll   kl    xf
            0.1  0.07  1
            0.1  0.07  1
            0.1  0.07  1
            0.1  0.06  1
            0.1  0.04  1
            0.1  0.03  1
            0.1  0.03  1
            0.1  0.03  1
            0.1  0.02  1
            0.1  0.02  1
            0.1  0.02  1
      egrandis
      micromet: soilalbedo=0.23; a_interception=0.0; b_interception=0.0; c_interception=0.1; d_interception=0.0
    WaterSupply dam: source_type=dam_ring; max_available_water=150.0; max_area=20; init_available_water=144.0; max_pump=100; min_volume=5.0; permeability=0.00007; seal_thickness=0.5; receive_catchment_runoff=no; receive_crop_runoff=no
    logic
      on init:
```
runoff = 0[cr]crop_area = 100
```
    stream
  folder shared
