folder Simulations: version=15
  simulation Rice Simulation
    metfile met: filename=%apsuite\apsim\oryza\sample\DarlingtonPoint.met
    clock
      start_date = 1/10/1990  # Select the start date of the simulation
      end_date = 28/03/1991  # Select the end date of the simulation
    summaryfile: filename=Blank Simulation.sum
    area paddock
      registrations global
      folder Manager folder
        manager Rice sowing rule
          on start_of_day:
```
if (day = 288) then
  rice sow cultivar = experimental, establishment = direct-seed, nplds = 180 (p/m2)
endif
```
          on end_of_day:
```
if (rice.plant_status = 'dead') then
  rice end_crop
endif
```
      micromet
        soilalbedo = 0.23
        a_interception = 0
        b_interception = 0
        c_interception = 0
        d_interception = 0
      irrigation
        automatic_irrigation = on
        asw_depth = 600  # Depth to which ASW is calculated. (mm)
        crit_fr_asw = 0.5  # Fraction of ASW below which irrigation is applied (0-1.0)
        irrigation_efficiency = 1  # Efficiency of the irrigation. (0-1.0)
        default_no3_conc = 0.0  # Nitrate concentration (ppm N)
        default_nh4_conc = 0.0  # Ammonium concentration (ppm N)
        default_cl_conc = 0.0  # Chloride concentration (ppm Cl)
      soil: state=Queensland; region=South East Queensland; nearesttown=Generic; site=Generic; SoilType=Black Vertosol; Latitude=999999; Longitude=999999; LocationAccuracy=Regional Soil Type; comment=estimated cotton LL; SummerCona=3.5; WinterCona=2.5; SummerU=6; WinterU=4; SummerDate=1-Nov; WinterDate=1-apr; Salb=0.12; DiffusConst=40; DiffusSlope=16; CN2Bare=73; CNRed=20; CNCov=0.8; RootCN=40; RootWT=1000; SoilCN=12; EnrACoeff=7.4; EnrBCoeff=0.2
        profile
          layer:
            thickness  bd    ll15  airdry  dul   sat   swcon  fbiom  finert  oc    ec   ph   ll wheat  kl wheat  xf wheat  ll barley  kl barley  xf barley  ll canola  kl canola  xf canola  ll chickpea  kl chickpea  xf chickpea  ll cotton  kl cotton  xf cotton  ll sorghum  kl sorghum  xf sorghum  ll mungbean  kl mungbean  xf mungbean  ll sunflower  kl sunflower  xf sunflower  ll fababean  kl fababean  xf fababean  ll lucerne  kl lucerne  xf lucerne  ll maize  kl maize  xf maize  ll perennial grass  kl perennial grass  xf perennial grass  ll cowpea  kl cowpea  xf cowpea  ll navybean  kl navybean  xf navybean  ll peanut  kl peanut  xf peanut  ll pigeonpea  kl pigeonpea  xf pigeonpea  ll soybean  kl soybean  xf soybean  ll stylo  kl stylo  xf stylo  ll sugar  kl sugar  xf sugar  ll lablab  kl lablab  xf lablab
            150        1.02  0.29  0.145   0.54  0.59  0.3    0.04   0.4     1.04  0.2  8.4  0.29      0.06      1         0.29       0.07       1          0.29       0.06       1          0.29         0.06         1            0.29       0.1        1          0.29        0.07        1           0.29         0.06         1            0.29          0.1           1             0.29         0.08         1            0.29        0.1         1           0.29      0.06      1         0.29                0.1                 1                   0.29       0.06       1          0.29         0.06         1            0.29       0.06       1          0.29          0.06          1             0.29        0.06        1           0.29      0.1       1         0.29      0.1       1         0.29       0.1        1
            150        1.03  0.29  0.232   0.53  0.58  0.3    0.02   0.6     0.89  0.3  8.8  0.29      0.06      1         0.29       0.07       1          0.29       0.06       1          0.29         0.06         1            0.29       0.1        1          0.29        0.07        1           0.29         0.06         1            0.29          0.1           1             0.29         0.08         1            0.29        0.1         1           0.29      0.06      1         0.29                0.1                 1                   0.29       0.06       1          0.29         0.06         1            0.29       0.06       1          0.29          0.06          1             0.29        0.06        1           0.29      0.1       1         0.29      0.1       1         0.29       0.1        1
            300        1.02  0.29  0.29    0.54  0.59  0.3    0.02   0.8     0.89  0.3  9    0.32      0.06      1         0.32       0.07       1          0.32       0.06       1          0.36         0.06         1            0.35       0.1        1          0.35        0.07        1           0.32         0.06         1            0.32          0.08          1             0.32         0.08         1            0.29        0.1         1           0.34      0.06      1         0.39                0.1                 1                   0.32       0.06       1          0.32         0.06         1            0.32       0.06       1          0.32          0.06          1             0.32        0.06        1           0.32      0.08      1         0.32      0.08      1         0.32       0.08       1
            300        1.02  0.29  0.29    0.54  0.58  0.3    0.02   1       0.89  0.4  9.2  0.32      0.04      1         0.38       0.05       1          0.32       0.04       1          0.43         0.06         1            0.36       0.1        1          0.38        0.05        1           0.32         0.04         1            0.32          0.06          1             0.32         0.08         1            0.29        0.1         1           0.34      0.04      1         0.41                0.1                 1                   0.32       0.04       1          0.32         0.04         1            0.32       0.04       1          0.32          0.05          1             0.32        0.04        1           0.32      0.06      1         0.32      0.06      1         0.32       0.06       1
            300        1.06  0.29  0.29    0.52  0.57  0.3    0.01   1       0.77  0.6  9.2  0.35      0.04      1         0.39       0.05       1          0.35       0.04       1          0.51         0.06         1            0.38       0.09       1          0.4         0.05        1           0.35         0.04         1            0.35          0.04          1             0.35         0.06         1            0.3         0.09        1           0.37      0.04      1         0.4                 0.09                1                   0.35       0.04       1          0.35         0.04         1            0.35       0.04       1          0.35          0.04          1             0.35        0.04        1           0.35      0.04      1         0.35      0.04      1         0.35       0.04       1
            300        1.11  0.29  0.29    0.5   0.55  0.3    0.01   1       0.45  0.8  9.1  0.38      0.02      0.42      0.39       0.03       0.42       0.38       0.02       0.42       0.5          0.06         0.42         0.39       0.07       0.42       0.4         0.04        0.42        0.38         0.01         0.42         0.38          0.02          0.42          0.38         0.04         0.42         0.31        0.09        0.42        0.4       0.02      0.42      0.4                 0.07                0.42                0.38       0.02       0.42       0.38         0.01         0.42         0.38       0.01       0.42       0.38          0.02          0.42          0.38        0.02        0.42        0.38      0.02      0.42      0.38      0.02      0.42      0.38       0.02       0.42
            300        1.12  0.29  0.29    0.5   0.55  0.3    0.01   1       0.27  0.9  9    0.41      0.02      0.37      0.41       0.02       0.37       0.41       0.01       0.37       0.5          0.06         0.37         0.39       0.05       0.37       0.4         0.03        0.37        0.41         0.01         0.37         0.41          0.01          0.37          0.41         0.03         0.37         0.32        0.09        0.37        0.42      0.01      0.37      0.41                0.05                0.37                0.41       0.01       0.37       0.41         0.01         0.37         0.41       0.01       0.37       0.41          0.01          0.37          0.41        0.01        0.37        0.41      0.01      0.37      0.41      0.01      0.37      0.41       0.01       0.37
            300        1.15  0.29  0.29    0.48  0.53  0.3    0.01   1       0.22  1    9    0.48      0         0         0.48       0          0          0.48       0          0          0.48         0            0            0.48       0          0          0.48        0           0           0.48         0            0            0.48          0             0             0.48         0            0            0.33        0.09        0.33        0.48      0         0         0.41                0                   0                   0.48       0          0          0.48         0            0            0.48       0          0          0.48          0             0             0.48        0           0           0.48      0         0         0.48      0         0         0.48       0          0
            300        1.18  0.29  0.29    0.47  0.52  0.3    0.01   1       0.16  1.1  8.9  0.47      0         0         0.47       0          0          0.47       0          0          0.47         0            0            0.47       0          0          0.47        0           0           0.47         0            0            0.47          0             0             0.47         0            0            0.34        0.09        0.31        0.47      0         0         0.4                 0                   0                   0.47       0          0          0.47         0            0            0.47       0          0          0.47          0             0             0.47        0           0           0.47      0         0         0.47      0         0         0.47       0          0
            300        1.2   0.29  0.29    0.46  0.51  0.3    0.01   1       0.13  1.1  8.9  0.46      0         0         0.46       0          0          0.46       0          0          0.46         0            0            0.46       0          0          0.46        0           0           0.46         0            0            0.46          0             0             0.46         0            0            0.35        0.09        0.31        0.46      0         0         0.4                 0                   0                   0.46       0          0          0.46         0            0            0.46       0          0          0.46          0             0             0.46        0           0           0.46      0         0         0.46      0         0         0.46       0          0
            300        1.25  0.29  0.29    0.44  0.49  0.3    0.01   1       0.12  1    8.9  0.44      0         0         0.44       0          0          0.44       0          0          0.44         0            0            0.44       0          0          0.44        0           0           0.44         0            0            0.44          0             0             0.44         0            0            0.36        0.09        0.33        0.44      0         0         0.42                0                   0                   0.44       0          0          0.44         0            0            0.44       0          0          0.44          0             0             0.44        0           0           0.44      0         0         0.44      0         0         0.44       0          0
        InitWater
          percentmethod: percent=1; distributed=filled from top
        InitNitrogen
          profile
            layer:
              no3    nh4       thickness
              6.503  0.599004  150
              2.101  0.100001  150
              2.101  0.100001  300
              1.701  0.100001  300
              1.701  0.100001  300
              1.701  0.100001  300
              1.701  0.100001  300
              1.701  0.100001  300
              1.701  0.100001  300
              1.701  0.100001  300
              1.701  0.100001  300
      rice
      outputfile
        variables
          variables: dd/mm/yyyy as Date, ancr, anlv, anso, cover_green, cover_tot, crop_type, cropsta, dae, dtga, dvr, dvs, eff, etae, etd, etrd, fnlv, gcr, height, hu, ldstrs, lestrs, lrstrs, nacr, nflv, pcew, plant_status, rlai, rnstrs, ssga, tnsoil, trc, wagt, wlvd, wlvg, wso, wst, zrt
        events Reporting Frequency: event=Daily
        SplitReport XY Chart
  simulation Ponding Simulation
    metfile met: filename=%apsuite\apsim\oryza\sample\DarlingtonPoint.met
    clock
      start_date = 1/01/1990  # Select the start date of the simulation
      end_date = 30/06/1991  # Select the end date of the simulation
    summaryfile: filename=Blank Simulation.sum
    area paddock
      registrations global
      outputfile
        variables
          variables: dd/mmm/yyyy as Date, Watering.pond_depth, irrigation, wagt
        events Reporting Frequency: event=Daily
        SplitReport XY Chart
      soil: state=New South Wales; region=Riverina; nearesttown=Jerilderie; site=Jerilderie; SoilType=Wunnamurra Clay; Latitude=-35.35664; Longitude=145.72891; LocationAccuracy=Regional Soil Type; SummerCona=3.5; WinterCona=2; SummerU=6; WinterU=2; SummerDate=1-Nov; WinterDate=1-apr; Salb=0.13; DiffusConst=40; DiffusSlope=16; CN2Bare=73; CNRed=20; CNCov=0.8; RootCN=45; RootWT=1500; SoilCN=12.5; EnrACoeff=7.4; EnrBCoeff=0.2
        DataSource=From Maize Man with permission from Liz Humphries, CSIRO L&W using some grower data (2005)
        profile
          layer:
            thickness  bd   ll15  airdry  dul   sat   swcon  fbiom  finert  oc    ec   ph   cl   esp  ll wheat  kl wheat  xf wheat  mwcon
            150        1.3  0.19  0.095   0.41  0.49  0.3    0.02   0.4     1.75  0.1  7.2  0.1  1    0.19      0.06      1         1
            150        1.3  0.23  0.184   0.44  0.49  0.3    0.02   0.6     1.4   0.2  7.9  0.1  2    0.23      0.06      1         1
            300        1.4  0.27  0.27    0.44  0.45  0.2    0.01   0.8     0.6   0.3  8.8  0.1  4    0.27      0.04      1         1
            300        1.3  0.27  0.27    0.46  0.49  0.2    0.01   0.9     0.3   0.3  9    0.1  8    0.28      0.04      1         0
            300        1.3  0.27  0.27    0.46  0.49  0.2    0.01   1       0.1   0.4  8.9  0.1  16   0.3       0.03      1         1
            300        1.2  0.27  0.27    0.46  0.52  0.3    0.01   1       0.1   0.5  8.9  0.1  32   0.32      0.02      1         1
            300        1.2  0.27  0.27    0.46  0.52  0.3    0.01   1       0.1   0.6  8.9  0.1  32   0.35      0.02      1         1
      irrigation
        automatic_irrigation = off
        asw_depth = 600  # Depth to which ASW is calculated. (mm)
        crit_fr_asw = 0.5  # Fraction of ASW below which irrigation is applied (0-1.0)
        irrigation_efficiency = 1  # Efficiency of the irrigation. (0-1.0)
        default_no3_conc = 0.0  # Nitrate concentration (ppm N)
        default_nh4_conc = 0.0  # Ammonium concentration (ppm N)
        default_cl_conc = 0.0  # Chloride concentration (ppm Cl)
      manager Watering
        on init:
```
max_pond = 0.0
pond_depth = 0.0
top_dress = 0
```
        on start_of_day:
```
!

if day = 1 then 
'Soil Water' set max_pond = 50
endif


if rice.plant_status = 'alive' and pond_depth < 50 then
irrig_amount = 50-pond_depth
Irrigation apply amount = irrig_amount
tot_irrig = tot_irrig + irrig_amount
!fertiliser apply amount = 10, type=urea_n
endif

if (day = 288) then
  rice sow cultivar = riverina, establishment = direct-seed, nplds = 180 (p/m2)
fertiliser apply amount = 200, type=urea_n
endif

if rice.dvs >0.3 and top_dress = 0 then
  fertiliser apply amount = 800, type = no3_n
  top_dress = 1
endif

!if (day = 288) then
!  rice sow cultivar = riverina, establishment = transplant, sbdur = 50, nplh = 10 , nh = 2, nplsb = 100
!endif

if (rice.plant_status = 'dead') then
  rice end_crop
  tot_irrig = 0
  top_dress = 0
endif
```
        on end_of_day:
```
pond_depth = pond
```
      fertiliser
      rice
