folder Simulations: version=5
  simulation Centro
    metfile met: filename=C:\Program Files\Apsim52\apsim\met\sample\dalby.met
    clock
      start_date = 1/01/1988  # Select the start date of the simulation
      end_date = 30/04/1990  # Select the end date of the simulation
    summaryfile: filename=Continuous Wheat Simulation.sum
    area paddock
      registrations global
      manager
        rule Sowing rule
          condition start_of_day:
            if (paddock_is_fallow() = 1 and FallowIn <> 'yes' and (NextCrop = 0 or NextCrop = '[crop]')) then
                     if (date_within('[date1], [date2]') = 1) then
                        if (rain[[rainnumdays]] >= [raincrit] AND esw >= [esw_amount]) OR
                            ('[must_sow]' = 'yes' AND today = date('[date2]'))) THEN
                           ChooseNextCrop = 'yes'   ! for rotations
                           [crop] sow plants =[density], sowing_depth = [depth], cultivar = [cultivar], row_spacing = [row_spacing], crop_class = [class]
                        endif
                        if today = date('[date2]') then
                           ChooseNextCrop = 'yes'
                        endif
                     endif
                  endif
          category Sowing criteria
            date1 = 23-Sep  # Enter sowing window START date (dd-mmm)
            date2 = 23-Sep  # Enter sowing window END date (dd-mmm)
            must_sow = yes  # Must sow?
            raincrit = 30  # Amount of rainfall
            rainnumdays = 3  # Number of days of rainfall
            esw_amount = 200  # Enter minimum allowable available soil water (mm)
          category Sowing parameters
            crop = centro  # Enter name of crop to sow
            density = 20  # Enter sowing density (plants/m2)
            depth = 30  # Enter sowing depth (mm)
            cultivar = cavalcade  # Enter cultivar
            class = plant  # Enter crop growth class
            row_spacing = 250  # Enter row spacing (mm)
        rule Harvesting rule
          condition end_of_day:
            if [crop].stage_name = 'harvest_ripe' or [crop].plant_status = 'dead' then
                          [crop]  harvest
                          [crop]  end_crop
                       endif
          category Harvesting criteria
            crop = centro  # Enter name of crop to harvest when ripe
        rule Sowing fertiliser
          condition [modulename].[eventname]=[fertmodule] apply amount = [fert_amount_sow] (kg/ha), depth = 50 (mm), type = [fert_type_sow]
          category When should fertiliser be applied
            modulename = centro  # On which module should the event come from
            eventname = sowing  # On which event should fertiliser be applied
          category Fertiliser application details
            fertmodule = fertiliser  # Module used to apply the fertiliser
            fert_amount_sow = 0  # Amount of starter fertiliser at sowing (kg/ha)
            fert_type_sow = urea_N  # Sowing fertiliser type
      fertiliser
      surfaceom surface organic matter
        PoolName = wheat  # Organic Matter pool name
        type = wheat  # Organic Matter type
        mass = 1000.  # Initial surface residue (kg/ha)
        cnr = 80.0  # C:N ratio of initial residue
        standing_fraction = 0.0  # Fraction of residue standing
      centro
      outputfile
        variables
          variables: dd/mm/yyyy as Date, year, day, das, biomass, green_biomass, stover_wt, yield, lai, cep, esw_layr(), root_depth
        events Reporting Frequency: event=harvesting
      soil Grey Vertosol-Kupunn (Kupunn No009): state=Queensland; region=Darling Downs; nearesttown=Dalby, Q 4405; site=Kupunn; SoilType=Grey Vertosol; DataSource=CSIRO Sustainable Ecosystems, Toowoomba; naturalvegetation=Brigalow, belah, wilga
        comment=Soil naming structure: \State\Region\Classification-Local Name (Site/district and locator number); oc and ph estimated
        InitWater
          sw=[0.21, 0.21, 0.22, 0.25, 0.27, 0.31, 0.36]
        InitNitrogen
          layer:
            no3  nh4
            6    1
            5    1
            3    0.9
            2    0.7
            1    0.2
            1    0.1
            1    0.01
        Water: Cona=3.5; U=6; Salb=0.12; DiffusConst=40; DiffusSlope=16; CN2Bare=73; CNRed=20; CNCov=0.8
          layer:
            thickness  bd    ll15  airdry  dul   sat   swcon
            150        1.4   0.21  0.11    0.39  0.44  0.3
            150        1.39  0.21  0.17    0.39  0.44  0.3
            300        1.37  0.21  0.21    0.4   0.45  0.3
            300        1.36  0.21  0.21    0.41  0.46  0.3
            300        1.38  0.21  0.21    0.4   0.45  0.3
            300        1.39  0.21  0.21    0.39  0.44  0.3
            300        1.42  0.21  0.21    0.38  0.43  0.3
        Nitrogen: RootCN=40; RootWT=1000; SoilCN=12; EnrACoeff=7.4; EnrBCoeff=0.2
          layer:
            fbiom  finert  oc    ph
            0.04   0.4     1.24  7
            0.02   0.6     1.24  7
            0.02   0.8     1.25  7
            0.02   1       1.1   7
            0.01   1       0.71  7
            0.01   1       0.34  7
            0.01   1       0.26  7
        other
          texture=[999999, 999999, 999999, 999999, 999999, 999999, 999999]
        SoilCrop wheat
          layer:
            ll    kl    xf
            0.21  0.06  1
            0.21  0.06  1
            0.25  0.06  1
            0.28  0.04  1
            0.31  0.04  1
            0.37  0.02  1
            0.38  0.02  1
        SoilCrop chickpea
          layer:
            ll    kl    xf
            0.21  0.06  1
            0.21  0.06  1
            0.22  0.06  1
            0.27  0.06  1
            0.29  0.06  1
            0.34  0.06  1
            0.38  0.06  1
        SoilCrop Cotton
          layer:
            ll    kl    xf
            0.21  0.1   1
            0.21  0.1   1
            0.22  0.1   1
            0.25  0.1   1
            0.27  0.09  1
            0.31  0.07  1
            0.36  0.05  1
        SoilCrop Sorghum
          layer:
            ll    kl    xf
            0.21  0.07  1
            0.21  0.07  1
            0.26  0.07  1
            0.26  0.05  1
            0.28  0.05  1
            0.34  0.04  1
            0.36  0.03  1
        SoilCrop centro
          layer:
            ll    kl    xf
            0.19  0.06  1
            0.21  0.06  1
            0.25  0.06  1
            0.28  0.04  1
            0.31  0.04  1
            0.37  0.02  1
            0.38  0.02  1
