folder Simulations: version=14
  simulation Bare
    clock
      start_date = 21/02/2006  # Select the start date of the simulation
      end_date = 04/09/2006  # Select the end date of the simulation
    summaryfile: filename=Continuous Wheat Simulation.sum
    metfile met -> /Simulations/shared/met
    climatechange ShelterEffects
      maxtmodifier = 0.0  # Change in maximum temperature in degrees celsius
      mintmodifier = 0.0  # Change in minimum temperature in degrees celsius
      rainmodifier = 0  # Relative change in rainfall
      radiationmodifier = 0.66  # Relative change in radiation
      co2 = 350  # Atmospheric C02 concentration (ppm)
    area paddock
      registrations global
      operations
        21-feb  'WellCamp Water' set sw = 0.46 0.48 0.50 0.45 0.36 0.38 0.4 0.4 0.4 0.4 0.4 0.4
        21-feb  irrigation apply amount = 15
      outputfile -> /Simulations/shared/outputfile
      irrigation
        automatic_irrigation = off
        asw_depth = 600.0  # Depth to which ASW is calculated. (mm)
        crit_fr_asw = 0.5  # Fraction of ASW below which irrigation is applied (0-1.0)
        irrigation_efficiency = 1.0  # Efficiency of the irrigation. (0-1.0)
      surfaceom surface organic matter -> /Simulations/shared/surface organic matter
      Epopulnea -> /Simulations/shared/Epopulnea
      manager OutputCalculator -> /Simulations/shared/OutputCalculator
      micromet: soilalbedo=0.13; a_interception=0.0; b_interception=0.0; c_interception=0.0; d_interception=0.0
      soil WellCamp: Site=Jimbour; Region=South East Queensland; LocalName=Waco; SoilType=Black Vertosol; NearestTown=Jimbour, Q 4352; NaturalVegetation=Grassland, mainly Qld bluegrass; Cona=5; DiffusConst=20; DiffusSlope=8; U=5; Salb=0.09; Cn2Bare=85; CnRed=0; CnCov=0.8; CnCanopyFact=1; RootCn=40; RootWt=200; SoilCn=12.5; EnrACoeff=7.4; EnrBCoeff=0.2
        ec=[0.84, 0.84, 0.84, 0.84]
        profile
          layer:
            thickness  bd    ll15   airdry  dul   sat   sw       swcon  oc    ph   fbiom  finert  no3  nh4  ec    ll Epopulnea  xf Epopulnea  kl Epopulnea
            150        0.9   0.2    0.19    0.54  0.59  9999.99  0.3    1.04  8.4  0.025  0.4     6.5  0.6  0.2   0.2           0.21          0.02
            150        1.01  0.27   0.25    0.52  0.58  9999.99  0.3    0.89  8.8  0.02   0.6     2.1  0.1  0.25  0.27          0.15          0.02
            300        1.02  0.35   0.3     0.52  0.59  9999.99  0.3    0.89  9    0.015  0.8     2.1  0.1  0.31  0.35          1             0.025
            300        1     0.3    0.25    0.48  0.53  9999.99  0.3    0.89  9.2  0.01   0.9     1.7  0.1  0.4   0.3           1             0.02
            300        1.06  0.25   0.21    0.42  0.47  9999.99  0.3    0.77  9.2  0.01   0.95    1.7  0.1  0.59  0.25          1             0.02
            300        1.14  0.275  0.21    0.4   0.45  9999.99  0.3    0.45  9.1  0.01   0.95    1.7  0.1  0.84  0.275         1             0.02
            300        1.23  0.3    0.21    0.4   0.45  9999.99  0.3    0.45  9.1  0.01   0.95    1.7  0.1  0.84  0.3           1             0.02
            300        1.23  0.3    0.21    0.4   0.45  9999.99  0.3    0.45  9.1  0.01   0.95    1.7  0.1  0.84  0.3           1             0.02
            400        1.23  0.3    0.21    0.4   0.45  9999.99  0.3    0.45  9.1  0.01   0.95    1.7  0.1  -     0.3           1             0.02
            500        1.23  0.3    0.21    0.4   0.45  9999.99  0.3    0.45  9.1  0.01   0.95    1.7  0.1  -     0.3           1             0.02
            500        1.23  0.3    0.21    0.4   0.45  9999.99  0.3    0.45  9.1  0.01   0.95    1.7  0.1  -     0.3           0             0.02
            500        1.23  0.3    0.21    0.4   0.45  9999.99  0.3    0.45  9.1  0.01   0.95    1.7  0.1  -     0.3           0             0.02
        InitWater: RelativeTo=Epopulnea
          PercentMethod: Percent=0.00; Distributed=Filled from top
        InitNitrogen
          profile
            layer:
              no3    nh4    thickness
              6.503  0.599  150
              5      0.100  150
              5      0.100  300
              5      0.100  300
              5      0.100  300
              5      0.100  300
              5      0.100  300
              5      0.100  300
              5      0.100  400
              5      0.100  500
              5      0.100  500
              5      0.100  500
  simulation populneaOutside
    clock
      start_date = 21/02/2006  # Select the start date of the simulation
      end_date = 04/09/2006  # Select the end date of the simulation
    summaryfile: filename=Continuous Wheat Simulation.sum
    metfile met -> /Simulations/shared/met
    area paddock
      registrations global
      operations
        21-feb  Epopulnea establish plants = 62500, init_section = seedling
        21-feb  'WellCamp Water' set sw = 0.38 0.47 0.505 0.42 0.31 0.33 0.3 0.3 0.3 0.3 0.3 0.3
        21-feb  irrigation apply amount = 15
      outputfile -> /Simulations/shared/outputfile
      irrigation
        automatic_irrigation = off
        asw_depth = 600.0  # Depth to which ASW is calculated. (mm)
        crit_fr_asw = 0.5  # Fraction of ASW below which irrigation is applied (0-1.0)
        irrigation_efficiency = 1.0  # Efficiency of the irrigation. (0-1.0)
      surfaceom surface organic matter -> /Simulations/shared/surface organic matter
      Epopulnea -> /Simulations/shared/Epopulnea
      manager OutputCalculator -> /Simulations/shared/OutputCalculator
      micromet: soilalbedo=0.13; a_interception=0.0; b_interception=0.0; c_interception=0.0; d_interception=0.0
      soil WellCamp: Site=Jimbour; Region=South East Queensland; LocalName=Waco; SoilType=Black Vertosol; NearestTown=Jimbour, Q 4352; NaturalVegetation=Grassland, mainly Qld bluegrass; Cona=5; DiffusConst=20; DiffusSlope=8; U=5; Salb=0.09; Cn2Bare=85; CnRed=0; CnCov=0.8; CnCanopyFact=1; RootCn=40; RootWt=200; SoilCn=12.5; EnrACoeff=7.4; EnrBCoeff=0.2
        ec=[0.84, 0.84, 0.84, 0.84]
        profile
          layer:
            thickness  bd    ll15  airdry  dul   sat   sw       swcon  oc    ph   fbiom  finert  no3  nh4  ec    ll Epopulnea  xf Epopulnea  kl Epopulnea
            150        0.9   0.19  0.19    0.54  0.59  9999.99  0.3    1.04  8.4  0.025  0.4     6.5  0.6  0.2   0.19          0.21          0.01
            150        1.01  0.32  0.25    0.52  0.58  9999.99  0.3    0.89  8.8  0.02   0.6     2.1  0.1  0.25  0.32          0.2           0.02
            300        1.02  0.38  0.3     0.52  0.59  9999.99  0.3    0.89  9    0.015  0.8     2.1  0.1  0.31  0.38          1             0.04
            300        1     0.3   0.25    0.48  0.53  9999.99  0.3    0.89  9.2  0.01   0.9     1.7  0.1  0.4   0.3           1             0.03
            300        1.06  0.25  0.21    0.42  0.47  9999.99  0.3    0.77  9.2  0.01   0.95    1.7  0.1  0.59  0.25          1             0.03
            300        1.14  0.28  0.21    0.4   0.45  9999.99  0.3    0.45  9.1  0.01   0.95    1.7  0.1  0.84  0.28          1             0.03
            300        1.23  0.3   0.21    0.4   0.45  9999.99  0.3    0.45  9.1  0.01   0.95    1.7  0.1  0.84  0.3           1             0.03
            300        1.23  0.3   0.21    0.4   0.45  9999.99  0.3    0.45  9.1  0.01   0.95    1.7  0.1  0.84  0.3           1             0.03
            400        1.23  0.3   0.21    0.4   0.45  9999.99  0.3    0.45  9.1  0.01   0.95    1.7  0.1  -     0.3           1             0.03
            500        1.23  0.3   0.21    0.4   0.45  9999.99  0.3    0.45  9.1  0.01   0.95    1.7  0.1  -     0.3           1             0.03
            500        1.23  0.3   0.21    0.4   0.45  9999.99  0.3    0.45  9.1  0.01   0.95    1.7  0.1  -     0.3           0             0.03
            500        1.23  0.3   0.21    0.4   0.45  9999.99  0.3    0.45  9.1  0.01   0.95    1.7  0.1  -     0.3           0             0.03
        InitWater: RelativeTo=Epopulnea
          PercentMethod: Percent=0.00; Distributed=Filled from top
        InitNitrogen: same as Bare.paddock.WellCamp.InitNitrogen
  simulation populneaW1
    clock
      start_date = 21/02/2006  # Select the start date of the simulation
      end_date = 04/09/2006  # Select the end date of the simulation
    summaryfile: filename=Continuous Wheat Simulation.sum
    metfile met -> /Simulations/shared/met
    climatechange ShelterEffects -> /Simulations/shared/ShelterEffects
    area paddock
      registrations global
      operations
        21-feb  Epopulnea establish plants = 55000, init_section = seedling
        21-feb  'WellCamp Water' set sw = 0.27 0.353 0.390 0.30 0.25 0.28 0.3 0.3 0.3 0.3 0.3 0.3
        21-feb  'WellCamp Water' set cona = 1
        21-feb  'WellCamp Water' set u = 0
      outputfile -> /Simulations/shared/outputfile
      irrigation
        automatic_irrigation = off
        asw_depth = 600.0  # Depth to which ASW is calculated. (mm)
        crit_fr_asw = 0.5  # Fraction of ASW below which irrigation is applied (0-1.0)
        irrigation_efficiency = 1.0  # Efficiency of the irrigation. (0-1.0)
      surfaceom surface organic matter -> /Simulations/shared/surface organic matter
      Epopulnea -> /Simulations/shared/Epopulnea
      manager OutputCalculator -> /Simulations/shared/OutputCalculator
      micromet: soilalbedo=0.13; a_interception=0.0; b_interception=0.0; c_interception=0.0; d_interception=0.0
      soil WellCamp: Site=Jimbour; Region=South East Queensland; LocalName=Waco; SoilType=Black Vertosol; NearestTown=Jimbour, Q 4352; NaturalVegetation=Grassland, mainly Qld bluegrass; Cona=1; DiffusConst=20; DiffusSlope=8; U=0; Salb=0.09; Cn2Bare=85; CnRed=0; CnCov=0.8; CnCanopyFact=1; RootCn=40; RootWt=200; SoilCn=12.5; EnrACoeff=7.4; EnrBCoeff=0.2
        ec=[0.84, 0.84, 0.84, 0.84]
        profile: same as populneaOutside.paddock.WellCamp.profile
        InitWater: RelativeTo=Epopulnea
          PercentMethod: Percent=0.00; Distributed=Filled from top
        InitNitrogen: same as Bare.paddock.WellCamp.InitNitrogen
  simulation populneaW2
    clock
      start_date = 21/02/2006  # Select the start date of the simulation
      end_date = 04/09/2006  # Select the end date of the simulation
    summaryfile: filename=Continuous Wheat Simulation.sum
    metfile met -> /Simulations/shared/met
    climatechange ShelterEffects -> /Simulations/shared/ShelterEffects
    area paddock
      registrations global
      operations
        21-feb  Epopulnea establish plants = 62500, init_section = seedling
        21-feb  'WellCamp Water' set sw = 0.32 0.365 0.392 0.31 0.25 0.28 0.3 0.3 0.3 0.3 0.3 0.3
      outputfile -> /Simulations/shared/outputfile
      irrigation
        automatic_irrigation = off
        asw_depth = 600.0  # Depth to which ASW is calculated. (mm)
        crit_fr_asw = 0.5  # Fraction of ASW below which irrigation is applied (0-1.0)
        irrigation_efficiency = 1.0  # Efficiency of the irrigation. (0-1.0)
      surfaceom surface organic matter -> /Simulations/shared/surface organic matter
      Epopulnea -> /Simulations/shared/Epopulnea
      manager OutputCalculator -> /Simulations/shared/OutputCalculator
      micromet: soilalbedo=0.13; a_interception=0.0; b_interception=0.0; c_interception=0.0; d_interception=0.0
      soil WellCamp: same as populneaW1.paddock.WellCamp
  simulation populneaW3
    clock
      start_date = 21/02/2006  # Select the start date of the simulation
      end_date = 04/09/2006  # Select the end date of the simulation
    summaryfile: filename=Continuous Wheat Simulation.sum
    metfile met -> /Simulations/shared/met
    climatechange ShelterEffects -> /Simulations/shared/ShelterEffects
    area paddock
      registrations global
      operations
        21-feb  Epopulnea establish plants = 59400, init_section = seedling
        21-feb  'WellCamp Water' set sw = 0.32 0.37 0.40 0.33 0.29 0.30 0.3 0.3 0.3 0.3 0.3 0.3
      outputfile -> /Simulations/shared/outputfile
      irrigation
        automatic_irrigation = off
        asw_depth = 600.0  # Depth to which ASW is calculated. (mm)
        crit_fr_asw = 0.5  # Fraction of ASW below which irrigation is applied (0-1.0)
        irrigation_efficiency = 1.0  # Efficiency of the irrigation. (0-1.0)
      surfaceom surface organic matter -> /Simulations/shared/surface organic matter
      Epopulnea -> /Simulations/shared/Epopulnea
      manager OutputCalculator -> /Simulations/shared/OutputCalculator
      micromet: soilalbedo=0.13; a_interception=0.0; b_interception=0.0; c_interception=0.0; d_interception=0.0
      soil WellCamp: Site=Jimbour; Region=South East Queensland; LocalName=Waco; SoilType=Black Vertosol; NearestTown=Jimbour, Q 4352; NaturalVegetation=Grassland, mainly Qld bluegrass; Cona=5; DiffusConst=20; DiffusSlope=8; U=5; Salb=0.09; Cn2Bare=85; CnRed=0; CnCov=0.8; CnCanopyFact=1; RootCn=40; RootWt=200; SoilCn=12.5; EnrACoeff=7.4; EnrBCoeff=0.2
        ec=[0.84, 0.84, 0.84, 0.84]
        profile
          layer:
            thickness  bd    ll15  airdry  dul   sat   sw       swcon  oc    ph   fbiom  finert  no3  nh4  ec    ll Epopulnea  xf Epopulnea  kl Epopulnea
            150        0.9   0.19  0.19    0.54  0.59  9999.99  0.3    1.04  8.4  0.025  0.4     6.5  0.6  0.2   0.19          0.21          0.015
            150        1.01  0.32  0.25    0.52  0.58  9999.99  0.3    0.89  8.8  0.02   0.6     2.1  0.1  0.25  0.32          0.2           0.02
            300        1.02  0.38  0.3     0.52  0.59  9999.99  0.3    0.89  9    0.015  0.8     2.1  0.1  0.31  0.38          1             0.04
            300        1     0.3   0.25    0.48  0.53  9999.99  0.3    0.89  9.2  0.01   0.9     1.7  0.1  0.4   0.3           1             0.03
            300        1.06  0.25  0.21    0.42  0.47  9999.99  0.3    0.77  9.2  0.01   0.95    1.7  0.1  0.59  0.25          1             0.03
            300        1.14  0.28  0.21    0.4   0.45  9999.99  0.3    0.45  9.1  0.01   0.95    1.7  0.1  0.84  0.28          1             0.03
            300        1.23  0.3   0.21    0.4   0.45  9999.99  0.3    0.45  9.1  0.01   0.95    1.7  0.1  0.84  0.3           1             0.03
            300        1.23  0.3   0.21    0.4   0.45  9999.99  0.3    0.45  9.1  0.01   0.95    1.7  0.1  0.84  0.3           1             0.03
            400        1.23  0.3   0.21    0.4   0.45  9999.99  0.3    0.45  9.1  0.01   0.95    1.7  0.1  -     0.3           1             0.03
            500        1.23  0.3   0.21    0.4   0.45  9999.99  0.3    0.45  9.1  0.01   0.95    1.7  0.1  -     0.3           1             0.03
            500        1.23  0.3   0.21    0.4   0.45  9999.99  0.3    0.45  9.1  0.01   0.95    1.7  0.1  -     0.3           0             0.03
            500        1.23  0.3   0.21    0.4   0.45  9999.99  0.3    0.45  9.1  0.01   0.95    1.7  0.1  -     0.3           0             0.03
        InitWater: RelativeTo=Epopulnea
          PercentMethod: Percent=0.00; Distributed=Filled from top
        InitNitrogen: same as Bare.paddock.WellCamp.InitNitrogen
  simulation populneaW4
    clock
      start_date = 21/02/2006  # Select the start date of the simulation
      end_date = 04/09/2006  # Select the end date of the simulation
    summaryfile: filename=Continuous Wheat Simulation.sum
    metfile met -> /Simulations/shared/met
    climatechange ShelterEffects -> /Simulations/shared/ShelterEffects
    area paddock
      registrations global
      operations
        21-feb  Epopulnea establish plants = 62500, init_section = seedling
        21-feb  'WellCamp Water' set sw = 0.385 0.385 0.43 0.38 0.30 0.31 0.3 0.3 0.3 0.3 0.3 0.3
        21-feb  irrigation apply amount = 15
      outputfile -> /Simulations/shared/outputfile
      irrigation
        automatic_irrigation = off
        asw_depth = 600.0  # Depth to which ASW is calculated. (mm)
        crit_fr_asw = 0.5  # Fraction of ASW below which irrigation is applied (0-1.0)
        irrigation_efficiency = 1.0  # Efficiency of the irrigation. (0-1.0)
      surfaceom surface organic matter -> /Simulations/shared/surface organic matter
      Epopulnea -> /Simulations/shared/Epopulnea
      manager OutputCalculator -> /Simulations/shared/OutputCalculator
      micromet: soilalbedo=0.13; a_interception=0.0; b_interception=0.0; c_interception=0.0; d_interception=0.0
      soil WellCamp: same as populneaW3.paddock.WellCamp
  simulation populneaW5
    clock
      start_date = 21/02/2006  # Select the start date of the simulation
      end_date = 04/09/2006  # Select the end date of the simulation
    summaryfile: filename=Continuous Wheat Simulation.sum
    metfile met -> /Simulations/shared/met
    climatechange ShelterEffects -> /Simulations/shared/ShelterEffects
    area paddock
      registrations global
      operations
        21-feb  Epopulnea establish plants = 62500, init_section = seedling
        21-feb  'WellCamp Water' set sw = 0.41 0.45 0.48 0.42 0.30 0.32 0.3 0.3 0.3 0.3 0.3 0.3
        21-feb  irrigation apply amount = 15
      outputfile -> /Simulations/shared/outputfile
      irrigation
        automatic_irrigation = off
        asw_depth = 600.0  # Depth to which ASW is calculated. (mm)
        crit_fr_asw = 0.5  # Fraction of ASW below which irrigation is applied (0-1.0)
        irrigation_efficiency = 1.0  # Efficiency of the irrigation. (0-1.0)
      surfaceom surface organic matter -> /Simulations/shared/surface organic matter
      Epopulnea -> /Simulations/shared/Epopulnea
      manager OutputCalculator -> /Simulations/shared/OutputCalculator
      micromet: soilalbedo=0.13; a_interception=0.0; b_interception=0.0; c_interception=0.0; d_interception=0.0
      soil WellCamp: same as populneaW3.paddock.WellCamp
  simulation populneaWet
    clock
      start_date = 21/02/2006  # Select the start date of the simulation
      end_date = 04/09/2006  # Select the end date of the simulation
    summaryfile: filename=Continuous Wheat Simulation.sum
    metfile met -> /Simulations/shared/met
    climatechange ShelterEffects -> /Simulations/shared/ShelterEffects
    area paddock
      registrations global
      micromet: soilalbedo=0.13; a_interception=0.0; b_interception=0.0; c_interception=0.0; d_interception=0.0
      operations
        21-feb  Epopulnea establish plants = 62500, init_section = seedling
        21-feb  'WellCamp Water' set sw = 0.41 0.445 0.48 0.42 0.30 0.32 0.3 0.3 0.3 0.3 0.3 0.3
        21-Feb  irrigation apply amount = 15
        27-Feb  irrigation apply amount = 15
        7-Mar  irrigation apply amount = 15
        13-Mar  irrigation apply amount = 15
        20-Mar  irrigation apply amount = 15
        29-Mar  irrigation apply amount = 15
        3-Apr  irrigation apply amount = 15
        10-Apr  irrigation apply amount = 15
        17-Apr  irrigation apply amount = 15
        25-Apr  irrigation apply amount = 15
        2-May  irrigation apply amount = 15
        8-May  irrigation apply amount = 10
        15-May  irrigation apply amount = 10
        22-May  irrigation apply amount = 10
        30-May  irrigation apply amount = 10
        7-Jun  irrigation apply amount = 10
        13-Jun  irrigation apply amount = 10
        19-Jun  irrigation apply amount = 10
        27-Jun  irrigation apply amount = 10
        2-Jul  irrigation apply amount = 10
        11-Jul  irrigation apply amount = 10
        17-Jul  irrigation apply amount = 10
        24-Jul  irrigation apply amount = 10
        1-Aug  irrigation apply amount = 10
        9-Aug  irrigation apply amount = 10
        22-Aug  irrigation apply amount = 10
        29-Aug  irrigation apply amount = 10
      outputfile -> /Simulations/shared/outputfile
      irrigation
        automatic_irrigation = off
        asw_depth = 1000  # Depth to which ASW is calculated. (mm)
        crit_fr_asw = 1  # Fraction of ASW below which irrigation is applied (0-1.0)
        irrigation_efficiency = 1.0  # Efficiency of the irrigation. (0-1.0)
      surfaceom surface organic matter -> /Simulations/shared/surface organic matter
      Epopulnea -> /Simulations/shared/Epopulnea
      manager OutputCalculator -> /Simulations/shared/OutputCalculator
      soil WellCamp: same as populneaW3.paddock.WellCamp
  folder shared
    outputfile
      variables
        variables: dd/mm/yyyy as Date, day, lai, adm_green(1) as stem_wt, foliage_mass as leaf_wt, fw, fn, rain, irrigation, es, sw, sw_dep(), ft, plantleaf, plantstem, plantla, plantbiomass, swsi, plants, slai, no3(), nh4(), root_depth, rlv, ep, eo, rtr, sw150, petr, peta, ffasw, height, ftcanopy, sw_demand, sw_supply, runoff, cum_stress, esw, fwcanopy, ga, biomass, fvpd
      events Reporting Frequency: event=Daily
    Epopulnea
    surfaceom surface organic matter
      PoolName = wheat  # Organic Matter pool name
      type = wheat  # Organic Matter type
      mass = 0.1  # Initial surface residue (kg/ha)
      cnr = 80.0  # C:N ratio of initial residue
      standing_fraction = 0.0  # Fraction of residue standing
    metfile met: filename=c:\Development\apsim\Epopulnea\Validation\Toowoomba.met
    climatechange ShelterEffects
      maxtmodifier = 0  # Change in maximum temperature in degrees celsius
      mintmodifier = 0  # Change in minimum temperature in degrees celsius
      rainmodifier = 0  # Relative change in rainfall
      radiationmodifier = 0.9  # Relative change in radiation
      co2 = 350  # Atmospheric C02 concentration (ppm)
    manager OutputCalculator
      on init:
```
 
plantbiomass = 0 
plantleaf = 0
plantstem = 0
plantla = 0
SWSI = 0
nodes = 0
RTR = 0
sw150 = 0
windspeed = 5.55 ! (m/s) ! 20 km/h average at both 9am and 3pm
```
      on endofday:
```
if lai > 0 then
   plantbiomass = biomass/plants*1000
   plantleaf = foliage_mass/plants*1000
   plantstem = adm_green(1)/ plants*1000
   plantla = lai * 10000 / plants
   SWSI = SWSI + (1.0 - swdef_photo)
   RTR = ep / (eo * cover_green)
endif
  sw150 = sw_dep(1) + sw_dep(2) + sw_dep(3) + sw_dep(4) + sw_dep(5) + sw_dep(6)
  sw60 = sw_dep(1) + sw_dep(2) + sw_dep(3)
  ll60 = ll15_dep(1) + ll15_dep(2) + ll15_dep(3)
  dul60 = dul_dep(1) + dul_dep(2) + dul_dep(3)
```
    soil WellCamp: same as Bare.paddock.WellCamp
    soil Black Vertosol-Waco (Wellcamp No030): state=Queensland; region=Darling Downs; nearesttown=Toowoomba, Q 4350; site=Wellcamp; SoilType=Black Vertosol; DataSource=CSIRO Sustainable Ecosystems, Toowoomba; naturalvegetation=Grassland, mainly Qld Blue grass; Cona=3.5; U=6; Salb=0.12; DiffusConst=40; DiffusSlope=16; CN2Bare=73; CNRed=20; CNCov=0.8; RootCN=40; RootWT=1000; SoilCN=12; EnrACoeff=7.4; EnrBCoeff=0.2
      comment=Soil naming structure: \State\Region\Classification-Local Name (Site/district and locator number); oc and ph estimated
      InitWater
        profile
          layer:
            sw     thickness
            0.300  150
            0.340  150
            0.380  300
            0.360  300
            0.400  300
            0.360  300
            0.460  300
      InitNitrogen
        profile
          layer:
            no3  nh4    thickness
            6    1      150
            5    1      150
            3    0.900  300
            2    0.700  300
            1    0.200  300
            1    0.100  300
            1    0.010  300
      profile
        layer:
          thickness  bd    ll15  airdry  dul   sat   swcon  fbiom  finert  oc    ph  ll wheat  kl wheat  xf wheat
          150        0.9   0.3   0.15    0.52  0.59  0.3    0.04   0.4     1.24  7   0.3       0.06      1
          150        1.01  0.3   0.24    0.53  0.59  0.3    0.02   0.6     1.24  7   0.34      0.06      1
          300        1.02  0.3   0.3     0.54  0.59  0.3    0.02   0.8     1.25  7   0.38      0.06      1
          300        1     0.3   0.3     0.54  0.59  0.3    0.02   1       1.1   7   0.36      0.04      1
          300        1.06  0.3   0.3     0.52  0.57  0.3    0.01   1       0.71  7   0.4       0.04      1
          300        1.14  0.3   0.3     0.49  0.54  0.3    0.01   1       0.34  7   0.36      0.02      1
          300        1.23  0.3   0.3     0.46  0.51  0.3    0.01   1       0.26  7   0.46      0.02      1
