folder simulations: version=9
  simulation Patagonia1
    clock
      start_date = 2-May-2007  # Select the start date of the simulation
      end_date = 15/10/2007  # Select the end date of the simulation
    summaryfile: filename=GreenBelt1997.sum
    metfile met
      filename=C:\development\apsim\Lettuce\Validation\Phenology\Gatton.met
    area Paddock
      registrations global
      manager
        rule Sow on a fixed date
          condition start_of_day:
            if (today = date('[date]') then
                                [crop] sow plants =[density], sowing_depth = [depth], cultivar = [cultivar], row_spacing = [row_spacing]
                    endif
          category Sowing criteria
            date = 2-May-2007  # Enter sowing date (dd-mmm)
          category Sowing parameters
            crop = lettuce  # Enter name of crop to sow
            density = 6  # Enter sowing density (plants/m2)
            depth = 50  # Enter sowing depth (mm)
            cultivar = Patagonia  # Enter cultivar
            row_spacing = 600  # Enter row spacing (mm)
        rule Harvest on a Growth Stage
          condition start_of_day:
            if ([crop].stage_name = '[stage]') then
                                [crop] harvest
                                [crop] end_crop
                    endif
          category Harvesting criteria
            stage = maturity  # Enter stage name
          category Harvesting parameters
            crop = lettuce  # Enter name of crop to sow
      lettuce
      soil: state=Queensland; region=Darling Downs; nearesttown=Brookstead, Q 4352; site=Brookstead; DataSource=CSIRO Sustainable Ecosystems, Toowoomba; naturalvegetation=Queensland bluegrass; SummerCona=3.5; WinterCona=2.5; SummerU=6; WinterU=4; SummerDate=1-nov; WinterDate=1-apr; Salb=0.12; DiffusConst=40; DiffusSlope=16; CN2Bare=73; CNRed=20; CNCov=0.8; RootCN=40; RootWT=1000; SoilCN=12; EnrACoeff=7.4; EnrBCoeff=0.2
        comment=Soil naming structure: \State\Region\Classification-Local Name (Site/district and locator number)
        profile
          layer:
            thickness  bd    ll15  airdry  dul   sat   swcon  fbiom  finert  oc    ph   ll lettuce  kl lettuce  xf lettuce
            150        1.05  0.25  0.13    0.52  0.57  0.3    0.04   0.4     1.19  8.2  0.25        0.06        1
            150        1.16  0.25  0.2     0.48  0.53  0.3    0.02   0.6     1.01  8.5  0.25        0.06        1
            300        1.19  0.25  0.25    0.47  0.52  0.3    0.02   0.8     0.45  8.6  0.25        0.06        1
            300        1.18  0.25  0.25    0.47  0.52  0.3    0.02   1       0.3   8.6  0.25        0.06        1
            300        1.24  0.25  0.25    0.45  0.5   0.3    0.01   1       0.2   7.4  0.25        0.06        1
            300        1.31  0.25  0.25    0.42  0.47  0.3    0.01   1       0.16  5.3  0.25        0.06        1
            300        1.35  0.25  0.25    0.41  0.46  0.3    0.01   1       0.17  5.3  0.25        0.06        1
        InitWater
          percentmethod: percent=1; distributed=filled from top
      outputfile
        variables
          variables: day, sowing_date, sowing_das, maturity_das, maturity_date
        events Reporting Frequency: event=harvesting
  simulation Patagonia2
    clock
      start_date = 9-May-2007  # Select the start date of the simulation
      end_date = 15/10/2007  # Select the end date of the simulation
    summaryfile: filename=GreenBelt1997.sum
    metfile met
      filename=C:\development\apsim\Lettuce\Validation\Phenology\Gatton.met
    area Paddock
      registrations global
      manager
        rule Sow on a fixed date
          condition start_of_day:
            if (today = date('[date]') then
                                [crop] sow plants =[density], sowing_depth = [depth], cultivar = [cultivar], row_spacing = [row_spacing]
                    endif
          category Sowing criteria
            date = 9-May-2007  # Enter sowing date (dd-mmm)
          category Sowing parameters
            crop = lettuce  # Enter name of crop to sow
            density = 6  # Enter sowing density (plants/m2)
            depth = 50  # Enter sowing depth (mm)
            cultivar = Patagonia  # Enter cultivar
            row_spacing = 600  # Enter row spacing (mm)
        rule Harvest on a Growth Stage: same as Patagonia1.Paddock.Manager.Harvest on a Growth Stage
      lettuce
      soil: same as Patagonia1.Paddock.Soil
      outputfile
        variables
          variables: day, sowing_date, sowing_das, maturity_das, maturity_date
        events Reporting Frequency: event=harvesting
  simulation Patagonia3
    clock
      start_date = 15-May-2007  # Select the start date of the simulation
      end_date = 15/10/2007  # Select the end date of the simulation
    summaryfile: filename=GreenBelt1997.sum
    metfile met
      filename=C:\development\apsim\Lettuce\Validation\Phenology\Gatton.met
    area Paddock
      registrations global
      manager
        rule Sow on a fixed date
          condition start_of_day:
            if (today = date('[date]') then
                                [crop] sow plants =[density], sowing_depth = [depth], cultivar = [cultivar], row_spacing = [row_spacing]
                    endif
          category Sowing criteria
            date = 15-May-2007  # Enter sowing date (dd-mmm)
          category Sowing parameters
            crop = lettuce  # Enter name of crop to sow
            density = 6  # Enter sowing density (plants/m2)
            depth = 50  # Enter sowing depth (mm)
            cultivar = Patagonia  # Enter cultivar
            row_spacing = 600  # Enter row spacing (mm)
        rule Harvest on a Growth Stage: same as Patagonia1.Paddock.Manager.Harvest on a Growth Stage
      lettuce
      soil: same as Patagonia1.Paddock.Soil
      outputfile
        variables
          variables: day, sowing_date, sowing_das, maturity_das, maturity_date
        events Reporting Frequency: event=harvesting
  simulation Patagonia4
    clock
      start_date = 23-May-2007  # Select the start date of the simulation
      end_date = 15/10/2007  # Select the end date of the simulation
    summaryfile: filename=GreenBelt1997.sum
    metfile met
      filename=C:\development\apsim\Lettuce\Validation\Phenology\Gatton.met
    area Paddock
      registrations global
      manager
        rule Sow on a fixed date
          condition start_of_day:
            if (today = date('[date]') then
                                [crop] sow plants =[density], sowing_depth = [depth], cultivar = [cultivar], row_spacing = [row_spacing]
                    endif
          category Sowing criteria
            date = 23-May-2007  # Enter sowing date (dd-mmm)
          category Sowing parameters
            crop = lettuce  # Enter name of crop to sow
            density = 6  # Enter sowing density (plants/m2)
            depth = 50  # Enter sowing depth (mm)
            cultivar = Patagonia  # Enter cultivar
            row_spacing = 600  # Enter row spacing (mm)
        rule Harvest on a Growth Stage: same as Patagonia1.Paddock.Manager.Harvest on a Growth Stage
      lettuce
      soil: same as Patagonia1.Paddock.Soil
      outputfile
        variables
          variables: day, sowing_date, sowing_das, maturity_das, maturity_date
        events Reporting Frequency: event=harvesting
  simulation Patagonia5
    clock
      start_date = 30-May-2007  # Select the start date of the simulation
      end_date = 15/10/2007  # Select the end date of the simulation
    summaryfile: filename=GreenBelt1997.sum
    metfile met
      filename=C:\development\apsim\Lettuce\Validation\Phenology\Gatton.met
    area Paddock
      registrations global
      manager
        rule Sow on a fixed date
          condition start_of_day:
            if (today = date('[date]') then
                                [crop] sow plants =[density], sowing_depth = [depth], cultivar = [cultivar], row_spacing = [row_spacing]
                    endif
          category Sowing criteria
            date = 30-May-2007  # Enter sowing date (dd-mmm)
          category Sowing parameters
            crop = lettuce  # Enter name of crop to sow
            density = 6  # Enter sowing density (plants/m2)
            depth = 50  # Enter sowing depth (mm)
            cultivar = Patagonia  # Enter cultivar
            row_spacing = 600  # Enter row spacing (mm)
        rule Harvest on a Growth Stage: same as Patagonia1.Paddock.Manager.Harvest on a Growth Stage
      lettuce
      soil: same as Patagonia1.Paddock.Soil
      outputfile
        variables
          variables: day, sowing_date, sowing_das, maturity_das, maturity_date
        events Reporting Frequency: event=harvesting
  simulation Patagonia6
    clock
      start_date = 5-Jun-2007  # Select the start date of the simulation
      end_date = 15/10/2007  # Select the end date of the simulation
    summaryfile: filename=GreenBelt1997.sum
    metfile met
      filename=C:\development\apsim\Lettuce\Validation\Phenology\Gatton.met
    area Paddock
      registrations global
      manager
        rule Sow on a fixed date
          condition start_of_day:
            if (today = date('[date]') then
                                [crop] sow plants =[density], sowing_depth = [depth], cultivar = [cultivar], row_spacing = [row_spacing]
                    endif
          category Sowing criteria
            date = 5-Jun-2007  # Enter sowing date (dd-mmm)
          category Sowing parameters
            crop = lettuce  # Enter name of crop to sow
            density = 6  # Enter sowing density (plants/m2)
            depth = 50  # Enter sowing depth (mm)
            cultivar = Patagonia  # Enter cultivar
            row_spacing = 600  # Enter row spacing (mm)
        rule Harvest on a Growth Stage: same as Patagonia1.Paddock.Manager.Harvest on a Growth Stage
      lettuce
      soil: same as Patagonia1.Paddock.Soil
      outputfile
        variables
          variables: day, sowing_date, sowing_das, maturity_das, maturity_date
        events Reporting Frequency: event=harvesting
  simulation Patagonia7
    clock
      start_date = 12-Jun-2007  # Select the start date of the simulation
      end_date = 15/10/2007  # Select the end date of the simulation
    summaryfile: filename=GreenBelt1997.sum
    metfile met
      filename=C:\development\apsim\Lettuce\Validation\Phenology\Gatton.met
    area Paddock
      registrations global
      manager
        rule Sow on a fixed date
          condition start_of_day:
            if (today = date('[date]') then
                                [crop] sow plants =[density], sowing_depth = [depth], cultivar = [cultivar], row_spacing = [row_spacing]
                    endif
          category Sowing criteria
            date = 12-Jun-2007  # Enter sowing date (dd-mmm)
          category Sowing parameters
            crop = lettuce  # Enter name of crop to sow
            density = 6  # Enter sowing density (plants/m2)
            depth = 50  # Enter sowing depth (mm)
            cultivar = Patagonia  # Enter cultivar
            row_spacing = 600  # Enter row spacing (mm)
        rule Harvest on a Growth Stage: same as Patagonia1.Paddock.Manager.Harvest on a Growth Stage
      lettuce
      soil: same as Patagonia1.Paddock.Soil
      outputfile
        variables
          variables: day, sowing_date, sowing_das, maturity_das, maturity_date
        events Reporting Frequency: event=harvesting
  simulation Patagonia8
    clock
      start_date = 22-Jun-2007  # Select the start date of the simulation
      end_date = 15/10/2007  # Select the end date of the simulation
    summaryfile: filename=GreenBelt1997.sum
    metfile met
      filename=C:\development\apsim\Lettuce\Validation\Phenology\Gatton.met
    area Paddock
      registrations global
      manager
        rule Sow on a fixed date
          condition start_of_day:
            if (today = date('[date]') then
                                [crop] sow plants =[density], sowing_depth = [depth], cultivar = [cultivar], row_spacing = [row_spacing]
                    endif
          category Sowing criteria
            date = 22-Jun-2007  # Enter sowing date (dd-mmm)
          category Sowing parameters
            crop = lettuce  # Enter name of crop to sow
            density = 6  # Enter sowing density (plants/m2)
            depth = 50  # Enter sowing depth (mm)
            cultivar = Patagonia  # Enter cultivar
            row_spacing = 600  # Enter row spacing (mm)
        rule Harvest on a Growth Stage: same as Patagonia1.Paddock.Manager.Harvest on a Growth Stage
      lettuce
      soil: same as Patagonia1.Paddock.Soil
      outputfile
        variables
          variables: day, sowing_date, sowing_das, maturity_das, maturity_date
        events Reporting Frequency: event=harvesting
  simulation Patagonia9
    clock
      start_date = 25-Jun-2007  # Select the start date of the simulation
      end_date = 15/10/2007  # Select the end date of the simulation
    summaryfile: filename=GreenBelt1997.sum
    metfile met
      filename=C:\development\apsim\Lettuce\Validation\Phenology\Gatton.met
    area Paddock
      registrations global
      manager
        rule Sow on a fixed date
          condition start_of_day:
            if (today = date('[date]') then
                                [crop] sow plants =[density], sowing_depth = [depth], cultivar = [cultivar], row_spacing = [row_spacing]
                    endif
          category Sowing criteria
            date = 25-Jun-2007  # Enter sowing date (dd-mmm)
          category Sowing parameters
            crop = lettuce  # Enter name of crop to sow
            density = 6  # Enter sowing density (plants/m2)
            depth = 50  # Enter sowing depth (mm)
            cultivar = Patagonia  # Enter cultivar
            row_spacing = 600  # Enter row spacing (mm)
        rule Harvest on a Growth Stage: same as Patagonia1.Paddock.Manager.Harvest on a Growth Stage
      lettuce
      soil: same as Patagonia1.Paddock.Soil
      outputfile
        variables
          variables: day, sowing_date, sowing_das, maturity_das, maturity_date
        events Reporting Frequency: event=harvesting
  simulation Patagonia10
    clock
      start_date = 3-Jul-2007  # Select the start date of the simulation
      end_date = 15/10/2007  # Select the end date of the simulation
    summaryfile: filename=GreenBelt1997.sum
    metfile met
      filename=C:\development\apsim\Lettuce\Validation\Phenology\Gatton.met
    area Paddock
      registrations global
      manager
        rule Sow on a fixed date
          condition start_of_day:
            if (today = date('[date]') then
                                [crop] sow plants =[density], sowing_depth = [depth], cultivar = [cultivar], row_spacing = [row_spacing]
                    endif
          category Sowing criteria
            date = 3-Jul-2007  # Enter sowing date (dd-mmm)
          category Sowing parameters
            crop = lettuce  # Enter name of crop to sow
            density = 6  # Enter sowing density (plants/m2)
            depth = 50  # Enter sowing depth (mm)
            cultivar = Patagonia  # Enter cultivar
            row_spacing = 600  # Enter row spacing (mm)
        rule Harvest on a Growth Stage: same as Patagonia1.Paddock.Manager.Harvest on a Growth Stage
      lettuce
      soil: same as Patagonia1.Paddock.Soil
      outputfile
        variables
          variables: day, sowing_date, sowing_das, maturity_das, maturity_date
        events Reporting Frequency: event=harvesting
  simulation Annie1
    clock
      start_date = 3-Apr-2007  # Select the start date of the simulation
      end_date = 15/10/2007  # Select the end date of the simulation
    summaryfile: filename=GreenBelt1997.sum
    metfile met
      filename=C:\development\apsim\Lettuce\Validation\Phenology\Gatton.met
    area Paddock
      registrations global
      manager
        rule Sow on a fixed date
          condition start_of_day:
            if (today = date('[date]') then
                                [crop] sow plants =[density], sowing_depth = [depth], cultivar = [cultivar], row_spacing = [row_spacing]
                    endif
          category Sowing criteria
            date = 3-Apr-2007  # Enter sowing date (dd-mmm)
          category Sowing parameters
            crop = lettuce  # Enter name of crop to sow
            density = 6  # Enter sowing density (plants/m2)
            depth = 50  # Enter sowing depth (mm)
            cultivar = Annie  # Enter cultivar
            row_spacing = 600  # Enter row spacing (mm)
        rule Harvest on a Growth Stage: same as Patagonia1.Paddock.Manager.Harvest on a Growth Stage
      lettuce
      soil: same as Patagonia1.Paddock.Soil
      outputfile
        variables
          variables: day, sowing_date, sowing_das, maturity_das, maturity_date
        events Reporting Frequency: event=harvesting
  simulation Annie2
    clock
      start_date = 11-Apr-2007  # Select the start date of the simulation
      end_date = 15/10/2007  # Select the end date of the simulation
    summaryfile: filename=GreenBelt1997.sum
    metfile met
      filename=C:\development\apsim\Lettuce\Validation\Phenology\Gatton.met
    area Paddock
      registrations global
      manager
        rule Sow on a fixed date
          condition start_of_day:
            if (today = date('[date]') then
                                [crop] sow plants =[density], sowing_depth = [depth], cultivar = [cultivar], row_spacing = [row_spacing]
                    endif
          category Sowing criteria
            date = 11-Apr-2007  # Enter sowing date (dd-mmm)
          category Sowing parameters
            crop = lettuce  # Enter name of crop to sow
            density = 6  # Enter sowing density (plants/m2)
            depth = 50  # Enter sowing depth (mm)
            cultivar = Annie  # Enter cultivar
            row_spacing = 600  # Enter row spacing (mm)
        rule Harvest on a Growth Stage: same as Patagonia1.Paddock.Manager.Harvest on a Growth Stage
      lettuce
      soil: same as Patagonia1.Paddock.Soil
      outputfile
        variables
          variables: day, sowing_date, sowing_das, maturity_das, maturity_date
        events Reporting Frequency: event=harvesting
  simulation Annie3
    clock
      start_date = 17-Apr-2007  # Select the start date of the simulation
      end_date = 15/10/2007  # Select the end date of the simulation
    summaryfile: filename=GreenBelt1997.sum
    metfile met
      filename=C:\development\apsim\Lettuce\Validation\Phenology\Gatton.met
    area Paddock
      registrations global
      manager
        rule Sow on a fixed date
          condition start_of_day:
            if (today = date('[date]') then
                                [crop] sow plants =[density], sowing_depth = [depth], cultivar = [cultivar], row_spacing = [row_spacing]
                    endif
          category Sowing criteria
            date = 17-Apr-2007  # Enter sowing date (dd-mmm)
          category Sowing parameters
            crop = lettuce  # Enter name of crop to sow
            density = 6  # Enter sowing density (plants/m2)
            depth = 50  # Enter sowing depth (mm)
            cultivar = Annie  # Enter cultivar
            row_spacing = 600  # Enter row spacing (mm)
        rule Harvest on a Growth Stage: same as Patagonia1.Paddock.Manager.Harvest on a Growth Stage
      lettuce
      soil: same as Patagonia1.Paddock.Soil
      outputfile
        variables
          variables: day, sowing_date, sowing_das, maturity_das, maturity_date
        events Reporting Frequency: event=harvesting
  simulation Annie4
    clock
      start_date = 24-Apr-2007  # Select the start date of the simulation
      end_date = 15/10/2007  # Select the end date of the simulation
    summaryfile: filename=GreenBelt1997.sum
    metfile met
      filename=C:\development\apsim\Lettuce\Validation\Phenology\Gatton.met
    area Paddock
      registrations global
      manager
        rule Sow on a fixed date
          condition start_of_day:
            if (today = date('[date]') then
                                [crop] sow plants =[density], sowing_depth = [depth], cultivar = [cultivar], row_spacing = [row_spacing]
                    endif
          category Sowing criteria
            date = 24-Apr-2007  # Enter sowing date (dd-mmm)
          category Sowing parameters
            crop = lettuce  # Enter name of crop to sow
            density = 6  # Enter sowing density (plants/m2)
            depth = 50  # Enter sowing depth (mm)
            cultivar = Annie  # Enter cultivar
            row_spacing = 600  # Enter row spacing (mm)
        rule Harvest on a Growth Stage: same as Patagonia1.Paddock.Manager.Harvest on a Growth Stage
      lettuce
      soil: same as Patagonia1.Paddock.Soil
      outputfile
        variables
          variables: day, sowing_date, sowing_das, maturity_das, maturity_date
        events Reporting Frequency: event=harvesting
  simulation Annie5
    clock
      start_date = 17-Jul-2007  # Select the start date of the simulation
      end_date = 15/10/2007  # Select the end date of the simulation
    summaryfile: filename=GreenBelt1997.sum
    metfile met
      filename=C:\development\apsim\Lettuce\Validation\Phenology\Gatton.met
    area Paddock
      registrations global
      manager
        rule Sow on a fixed date
          condition start_of_day:
            if (today = date('[date]') then
                                [crop] sow plants =[density], sowing_depth = [depth], cultivar = [cultivar], row_spacing = [row_spacing]
                    endif
          category Sowing criteria
            date = 17-Jul-2007  # Enter sowing date (dd-mmm)
          category Sowing parameters
            crop = lettuce  # Enter name of crop to sow
            density = 6  # Enter sowing density (plants/m2)
            depth = 50  # Enter sowing depth (mm)
            cultivar = Annie  # Enter cultivar
            row_spacing = 600  # Enter row spacing (mm)
        rule Harvest on a Growth Stage: same as Patagonia1.Paddock.Manager.Harvest on a Growth Stage
      lettuce
      soil: same as Patagonia1.Paddock.Soil
      outputfile
        variables
          variables: day, sowing_date, sowing_das, maturity_das, maturity_date
        events Reporting Frequency: event=harvesting
  simulation Annie6
    clock
      start_date = 26-Jul-2007  # Select the start date of the simulation
      end_date = 15/10/2007  # Select the end date of the simulation
    summaryfile: filename=GreenBelt1997.sum
    metfile met
      filename=C:\development\apsim\Lettuce\Validation\Phenology\Gatton.met
    area Paddock
      registrations global
      manager
        rule Sow on a fixed date
          condition start_of_day:
            if (today = date('[date]') then
                                [crop] sow plants =[density], sowing_depth = [depth], cultivar = [cultivar], row_spacing = [row_spacing]
                    endif
          category Sowing criteria
            date = 26-Jul-2007  # Enter sowing date (dd-mmm)
          category Sowing parameters
            crop = lettuce  # Enter name of crop to sow
            density = 6  # Enter sowing density (plants/m2)
            depth = 50  # Enter sowing depth (mm)
            cultivar = Annie  # Enter cultivar
            row_spacing = 600  # Enter row spacing (mm)
        rule Harvest on a Growth Stage: same as Patagonia1.Paddock.Manager.Harvest on a Growth Stage
      lettuce
      soil: same as Patagonia1.Paddock.Soil
      outputfile
        variables
          variables: day, sowing_date, sowing_das, maturity_das, maturity_date
        events Reporting Frequency: event=harvesting
  simulation Annie7
    clock
      start_date = 1-Aug-2007  # Select the start date of the simulation
      end_date = 15/10/2007  # Select the end date of the simulation
    summaryfile: filename=GreenBelt1997.sum
    metfile met
      filename=C:\development\apsim\Lettuce\Validation\Phenology\Gatton.met
    area Paddock
      registrations global
      manager
        rule Sow on a fixed date
          condition start_of_day:
            if (today = date('[date]') then
                                [crop] sow plants =[density], sowing_depth = [depth], cultivar = [cultivar], row_spacing = [row_spacing]
                    endif
          category Sowing criteria
            date = 1-Aug-2007  # Enter sowing date (dd-mmm)
          category Sowing parameters
            crop = lettuce  # Enter name of crop to sow
            density = 6  # Enter sowing density (plants/m2)
            depth = 50  # Enter sowing depth (mm)
            cultivar = Annie  # Enter cultivar
            row_spacing = 600  # Enter row spacing (mm)
        rule Harvest on a Growth Stage: same as Patagonia1.Paddock.Manager.Harvest on a Growth Stage
      lettuce
      soil: same as Patagonia1.Paddock.Soil
      outputfile
        variables
          variables: day, sowing_date, sowing_das, maturity_das, maturity_date
        events Reporting Frequency: event=harvesting
  simulation Annie8
    clock
      start_date = 8-Aug-2007  # Select the start date of the simulation
      end_date = 15/10/2007  # Select the end date of the simulation
    summaryfile: filename=GreenBelt1997.sum
    metfile met
      filename=C:\development\apsim\Lettuce\Validation\Phenology\Gatton.met
    area Paddock
      registrations global
      manager
        rule Sow on a fixed date
          condition start_of_day:
            if (today = date('[date]') then
                                [crop] sow plants =[density], sowing_depth = [depth], cultivar = [cultivar], row_spacing = [row_spacing]
                    endif
          category Sowing criteria
            date = 8-Aug-2007  # Enter sowing date (dd-mmm)
          category Sowing parameters
            crop = lettuce  # Enter name of crop to sow
            density = 6  # Enter sowing density (plants/m2)
            depth = 50  # Enter sowing depth (mm)
            cultivar = Annie  # Enter cultivar
            row_spacing = 600  # Enter row spacing (mm)
        rule Harvest on a Growth Stage: same as Patagonia1.Paddock.Manager.Harvest on a Growth Stage
      lettuce
      soil: same as Patagonia1.Paddock.Soil
      outputfile
        variables
          variables: day, sowing_date, sowing_das, maturity_das, maturity_date
        events Reporting Frequency: event=harvesting
  simulation AztecSun1
    clock
      start_date = 3-Apr-2007  # Select the start date of the simulation
      end_date = 15/10/2007  # Select the end date of the simulation
    summaryfile: filename=GreenBelt1997.sum
    metfile met
      filename=C:\development\apsim\Lettuce\Validation\Phenology\Gatton.met
    area Paddock
      registrations global
      manager
        rule Sow on a fixed date
          condition start_of_day:
            if (today = date('[date]') then
                                [crop] sow plants =[density], sowing_depth = [depth], cultivar = [cultivar], row_spacing = [row_spacing]
                    endif
          category Sowing criteria
            date = 3-Apr-2007  # Enter sowing date (dd-mmm)
          category Sowing parameters
            crop = lettuce  # Enter name of crop to sow
            density = 6  # Enter sowing density (plants/m2)
            depth = 50  # Enter sowing depth (mm)
            cultivar = AztecSun  # Enter cultivar
            row_spacing = 600  # Enter row spacing (mm)
        rule Harvest on a Growth Stage: same as Patagonia1.Paddock.Manager.Harvest on a Growth Stage
      lettuce
      soil: same as Patagonia1.Paddock.Soil
      outputfile
        variables
          variables: day, sowing_date, sowing_das, maturity_das, maturity_date
        events Reporting Frequency: event=harvesting
  simulation AztecSun2
    clock
      start_date = 11-Apr-2007  # Select the start date of the simulation
      end_date = 15/10/2007  # Select the end date of the simulation
    summaryfile: filename=GreenBelt1997.sum
    metfile met
      filename=C:\development\apsim\Lettuce\Validation\Phenology\Gatton.met
    area Paddock
      registrations global
      manager
        rule Sow on a fixed date
          condition start_of_day:
            if (today = date('[date]') then
                                [crop] sow plants =[density], sowing_depth = [depth], cultivar = [cultivar], row_spacing = [row_spacing]
                    endif
          category Sowing criteria
            date = 11-Apr-2007  # Enter sowing date (dd-mmm)
          category Sowing parameters
            crop = lettuce  # Enter name of crop to sow
            density = 6  # Enter sowing density (plants/m2)
            depth = 50  # Enter sowing depth (mm)
            cultivar = AztecSun  # Enter cultivar
            row_spacing = 600  # Enter row spacing (mm)
        rule Harvest on a Growth Stage: same as Patagonia1.Paddock.Manager.Harvest on a Growth Stage
      lettuce
      soil: same as Patagonia1.Paddock.Soil
      outputfile
        variables
          variables: day, sowing_date, sowing_das, maturity_das, maturity_date
        events Reporting Frequency: event=harvesting
  simulation Raider1
    clock
      start_date = 29-mar-2004  # Select the start date of the simulation
      end_date = 15/10/2007  # Select the end date of the simulation
    summaryfile: filename=GreenBelt1997.sum
    metfile met
      filename=C:\development\apsim\Lettuce\Validation\Phenology\Gatton.met
    area Paddock
      registrations global
      manager
        rule Sow on a fixed date
          condition start_of_day:
            if (today = date('[date]') then
                                [crop] sow plants =[density], sowing_depth = [depth], cultivar = [cultivar], row_spacing = [row_spacing]
                    endif
          category Sowing criteria
            date = 29-mar-2004  # Enter sowing date (dd-mmm)
          category Sowing parameters
            crop = lettuce  # Enter name of crop to sow
            density = 6  # Enter sowing density (plants/m2)
            depth = 50  # Enter sowing depth (mm)
            cultivar = Raider  # Enter cultivar
            row_spacing = 600  # Enter row spacing (mm)
        rule Harvest on a Growth Stage: same as Patagonia1.Paddock.Manager.Harvest on a Growth Stage
      lettuce
      soil: same as Patagonia1.Paddock.Soil
      outputfile
        variables
          variables: day, sowing_date, sowing_das, maturity_das, maturity_date
        events Reporting Frequency: event=harvesting
  simulation Raider2
    clock
      start_date = 30-mar-2004  # Select the start date of the simulation
      end_date = 15/10/2007  # Select the end date of the simulation
    summaryfile: filename=GreenBelt1997.sum
    metfile met
      filename=C:\development\apsim\Lettuce\Validation\Phenology\Gatton.met
    area Paddock
      registrations global
      manager
        rule Sow on a fixed date
          condition start_of_day:
            if (today = date('[date]') then
                                [crop] sow plants =[density], sowing_depth = [depth], cultivar = [cultivar], row_spacing = [row_spacing]
                    endif
          category Sowing criteria
            date = 30-mar-2004  # Enter sowing date (dd-mmm)
          category Sowing parameters
            crop = lettuce  # Enter name of crop to sow
            density = 6  # Enter sowing density (plants/m2)
            depth = 50  # Enter sowing depth (mm)
            cultivar = Raider  # Enter cultivar
            row_spacing = 600  # Enter row spacing (mm)
        rule Harvest on a Growth Stage: same as Patagonia1.Paddock.Manager.Harvest on a Growth Stage
      lettuce
      soil: same as Patagonia1.Paddock.Soil
      outputfile
        variables
          variables: day, sowing_date, sowing_das, maturity_das, maturity_date
        events Reporting Frequency: event=harvesting
  simulation Raider3
    clock
      start_date = 15-jul-2004  # Select the start date of the simulation
      end_date = 15/10/2007  # Select the end date of the simulation
    summaryfile: filename=GreenBelt1997.sum
    metfile met
      filename=C:\development\apsim\Lettuce\Validation\Phenology\Gatton.met
    area Paddock
      registrations global
      manager
        rule Sow on a fixed date
          condition start_of_day:
            if (today = date('[date]') then
                                [crop] sow plants =[density], sowing_depth = [depth], cultivar = [cultivar], row_spacing = [row_spacing]
                    endif
          category Sowing criteria
            date = 15-jul-2004  # Enter sowing date (dd-mmm)
          category Sowing parameters
            crop = lettuce  # Enter name of crop to sow
            density = 6  # Enter sowing density (plants/m2)
            depth = 50  # Enter sowing depth (mm)
            cultivar = Raider  # Enter cultivar
            row_spacing = 600  # Enter row spacing (mm)
        rule Harvest on a Growth Stage: same as Patagonia1.Paddock.Manager.Harvest on a Growth Stage
      lettuce
      soil: same as Patagonia1.Paddock.Soil
      outputfile
        variables
          variables: day, sowing_date, sowing_das, maturity_das, maturity_date
        events Reporting Frequency: event=harvesting
  simulation Raider4
    clock
      start_date = 16-jul-2004  # Select the start date of the simulation
      end_date = 15/10/2007  # Select the end date of the simulation
    summaryfile: filename=GreenBelt1997.sum
    metfile met
      filename=C:\development\apsim\Lettuce\Validation\Phenology\Gatton.met
    area Paddock
      registrations global
      manager
        rule Sow on a fixed date
          condition start_of_day:
            if (today = date('[date]') then
                                [crop] sow plants =[density], sowing_depth = [depth], cultivar = [cultivar], row_spacing = [row_spacing]
                    endif
          category Sowing criteria
            date = 16-jul-2004  # Enter sowing date (dd-mmm)
          category Sowing parameters
            crop = lettuce  # Enter name of crop to sow
            density = 6  # Enter sowing density (plants/m2)
            depth = 50  # Enter sowing depth (mm)
            cultivar = Raider  # Enter cultivar
            row_spacing = 600  # Enter row spacing (mm)
        rule Harvest on a Growth Stage: same as Patagonia1.Paddock.Manager.Harvest on a Growth Stage
      lettuce
      soil: same as Patagonia1.Paddock.Soil
      outputfile
        variables
          variables: day, sowing_date, sowing_das, maturity_das, maturity_date
        events Reporting Frequency: event=harvesting
  simulation Raider5
    clock
      start_date = 27-jul-2004  # Select the start date of the simulation
      end_date = 15/10/2007  # Select the end date of the simulation
    summaryfile: filename=GreenBelt1997.sum
    metfile met
      filename=C:\development\apsim\Lettuce\Validation\Phenology\Gatton.met
    area Paddock
      registrations global
      manager
        rule Sow on a fixed date
          condition start_of_day:
            if (today = date('[date]') then
                                [crop] sow plants =[density], sowing_depth = [depth], cultivar = [cultivar], row_spacing = [row_spacing]
                    endif
          category Sowing criteria
            date = 27-jul-2004  # Enter sowing date (dd-mmm)
          category Sowing parameters
            crop = lettuce  # Enter name of crop to sow
            density = 6  # Enter sowing density (plants/m2)
            depth = 50  # Enter sowing depth (mm)
            cultivar = Raider  # Enter cultivar
            row_spacing = 600  # Enter row spacing (mm)
        rule Harvest on a Growth Stage: same as Patagonia1.Paddock.Manager.Harvest on a Growth Stage
      lettuce
      soil: same as Patagonia1.Paddock.Soil
      outputfile
        variables
          variables: day, sowing_date, sowing_das, maturity_das, maturity_date
        events Reporting Frequency: event=harvesting
  simulation Raider6
    clock
      start_date = 12-jul-2001  # Select the start date of the simulation
      end_date = 15/10/2007  # Select the end date of the simulation
    summaryfile: filename=GreenBelt1997.sum
    metfile met
      filename=C:\development\apsim\Lettuce\Validation\Phenology\Gatton.met
    area Paddock
      registrations global
      manager
        rule Sow on a fixed date
          condition start_of_day:
            if (today = date('[date]') then
                                [crop] sow plants =[density], sowing_depth = [depth], cultivar = [cultivar], row_spacing = [row_spacing]
                    endif
          category Sowing criteria
            date = 12-jul-2001  # Enter sowing date (dd-mmm)
          category Sowing parameters
            crop = lettuce  # Enter name of crop to sow
            density = 6  # Enter sowing density (plants/m2)
            depth = 50  # Enter sowing depth (mm)
            cultivar = Raider  # Enter cultivar
            row_spacing = 600  # Enter row spacing (mm)
        rule Harvest on a Growth Stage: same as Patagonia1.Paddock.Manager.Harvest on a Growth Stage
      lettuce
      soil: same as Patagonia1.Paddock.Soil
      outputfile
        variables
          variables: day, sowing_date, sowing_das, maturity_das, maturity_date
        events Reporting Frequency: event=harvesting
  simulation Oxford1
    clock
      start_date = 27-apr-2004  # Select the start date of the simulation
      end_date = 15/10/2007  # Select the end date of the simulation
    summaryfile: filename=GreenBelt1997.sum
    metfile met
      filename=C:\development\apsim\Lettuce\Validation\Phenology\Gatton.met
    area Paddock
      registrations global
      manager
        rule Sow on a fixed date
          condition start_of_day:
            if (today = date('[date]') then
                                [crop] sow plants =[density], sowing_depth = [depth], cultivar = [cultivar], row_spacing = [row_spacing]
                    endif
          category Sowing criteria
            date = 27-apr-2004  # Enter sowing date (dd-mmm)
          category Sowing parameters
            crop = lettuce  # Enter name of crop to sow
            density = 6  # Enter sowing density (plants/m2)
            depth = 50  # Enter sowing depth (mm)
            cultivar = Oxford  # Enter cultivar
            row_spacing = 600  # Enter row spacing (mm)
        rule Harvest on a Growth Stage: same as Patagonia1.Paddock.Manager.Harvest on a Growth Stage
      lettuce
      soil: same as Patagonia1.Paddock.Soil
      outputfile
        variables
          variables: day, sowing_date, sowing_das, maturity_das, maturity_date
        events Reporting Frequency: event=harvesting
  simulation Oxford2
    clock
      start_date = 3-may-2004  # Select the start date of the simulation
      end_date = 15/10/2007  # Select the end date of the simulation
    summaryfile: filename=GreenBelt1997.sum
    metfile met
      filename=C:\development\apsim\Lettuce\Validation\Phenology\Gatton.met
    area Paddock
      registrations global
      manager
        rule Sow on a fixed date
          condition start_of_day:
            if (today = date('[date]') then
                                [crop] sow plants =[density], sowing_depth = [depth], cultivar = [cultivar], row_spacing = [row_spacing]
                    endif
          category Sowing criteria
            date = 3-may-2004  # Enter sowing date (dd-mmm)
          category Sowing parameters
            crop = lettuce  # Enter name of crop to sow
            density = 6  # Enter sowing density (plants/m2)
            depth = 50  # Enter sowing depth (mm)
            cultivar = Oxford  # Enter cultivar
            row_spacing = 600  # Enter row spacing (mm)
        rule Harvest on a Growth Stage: same as Patagonia1.Paddock.Manager.Harvest on a Growth Stage
      lettuce
      soil: same as Patagonia1.Paddock.Soil
      outputfile
        variables
          variables: day, sowing_date, sowing_das, maturity_das, maturity_date
        events Reporting Frequency: event=harvesting
  simulation Oxford3
    clock
      start_date = 18-may-2004  # Select the start date of the simulation
      end_date = 15/10/2007  # Select the end date of the simulation
    summaryfile: filename=GreenBelt1997.sum
    metfile met
      filename=C:\development\apsim\Lettuce\Validation\Phenology\Gatton.met
    area Paddock
      registrations global
      manager
        rule Sow on a fixed date
          condition start_of_day:
            if (today = date('[date]') then
                                [crop] sow plants =[density], sowing_depth = [depth], cultivar = [cultivar], row_spacing = [row_spacing]
                    endif
          category Sowing criteria
            date = 18-may-2004  # Enter sowing date (dd-mmm)
          category Sowing parameters
            crop = lettuce  # Enter name of crop to sow
            density = 6  # Enter sowing density (plants/m2)
            depth = 50  # Enter sowing depth (mm)
            cultivar = Oxford  # Enter cultivar
            row_spacing = 600  # Enter row spacing (mm)
        rule Harvest on a Growth Stage: same as Patagonia1.Paddock.Manager.Harvest on a Growth Stage
      lettuce
      soil: same as Patagonia1.Paddock.Soil
      outputfile
        variables
          variables: day, sowing_date, sowing_das, maturity_das, maturity_date
        events Reporting Frequency: event=harvesting
  simulation Oxford4
    clock
      start_date = 12-jul-2001  # Select the start date of the simulation
      end_date = 15/10/2007  # Select the end date of the simulation
    summaryfile: filename=GreenBelt1997.sum
    metfile met
      filename=C:\development\apsim\Lettuce\Validation\Phenology\Gatton.met
    area Paddock
      registrations global
      manager
        rule Sow on a fixed date
          condition start_of_day:
            if (today = date('[date]') then
                                [crop] sow plants =[density], sowing_depth = [depth], cultivar = [cultivar], row_spacing = [row_spacing]
                    endif
          category Sowing criteria
            date = 12-jul-2001  # Enter sowing date (dd-mmm)
          category Sowing parameters
            crop = lettuce  # Enter name of crop to sow
            density = 6  # Enter sowing density (plants/m2)
            depth = 50  # Enter sowing depth (mm)
            cultivar = Oxford  # Enter cultivar
            row_spacing = 600  # Enter row spacing (mm)
        rule Harvest on a Growth Stage: same as Patagonia1.Paddock.Manager.Harvest on a Growth Stage
      lettuce
      soil: same as Patagonia1.Paddock.Soil
      outputfile
        variables
          variables: day, sowing_date, sowing_das, maturity_das, maturity_date
        events Reporting Frequency: event=harvesting
  simulation Titanic1
    clock
      start_date = 26-may-2004  # Select the start date of the simulation
      end_date = 15/10/2007  # Select the end date of the simulation
    summaryfile: filename=GreenBelt1997.sum
    metfile met
      filename=C:\development\apsim\Lettuce\Validation\Phenology\Gatton.met
    area Paddock
      registrations global
      manager
        rule Sow on a fixed date
          condition start_of_day:
            if (today = date('[date]') then
                                [crop] sow plants =[density], sowing_depth = [depth], cultivar = [cultivar], row_spacing = [row_spacing]
                    endif
          category Sowing criteria
            date = 26-may-2004  # Enter sowing date (dd-mmm)
          category Sowing parameters
            crop = lettuce  # Enter name of crop to sow
            density = 6  # Enter sowing density (plants/m2)
            depth = 50  # Enter sowing depth (mm)
            cultivar = Titanic  # Enter cultivar
            row_spacing = 600  # Enter row spacing (mm)
        rule Harvest on a Growth Stage: same as Patagonia1.Paddock.Manager.Harvest on a Growth Stage
      lettuce
      soil: same as Patagonia1.Paddock.Soil
      outputfile
        variables
          variables: day, sowing_date, sowing_das, maturity_das, maturity_date
        events Reporting Frequency: event=harvesting
  simulation Titanic2
    clock
      start_date = 7-jun-2004  # Select the start date of the simulation
      end_date = 15/10/2007  # Select the end date of the simulation
    summaryfile: filename=GreenBelt1997.sum
    metfile met
      filename=C:\development\apsim\Lettuce\Validation\Phenology\Gatton.met
    area Paddock
      registrations global
      manager
        rule Sow on a fixed date
          condition start_of_day:
            if (today = date('[date]') then
                                [crop] sow plants =[density], sowing_depth = [depth], cultivar = [cultivar], row_spacing = [row_spacing]
                    endif
          category Sowing criteria
            date = 7-jun-2004  # Enter sowing date (dd-mmm)
          category Sowing parameters
            crop = lettuce  # Enter name of crop to sow
            density = 6  # Enter sowing density (plants/m2)
            depth = 50  # Enter sowing depth (mm)
            cultivar = Titanic  # Enter cultivar
            row_spacing = 600  # Enter row spacing (mm)
        rule Harvest on a Growth Stage: same as Patagonia1.Paddock.Manager.Harvest on a Growth Stage
      lettuce
      soil: same as Patagonia1.Paddock.Soil
      outputfile
        variables
          variables: day, sowing_date, sowing_das, maturity_das, maturity_date
        events Reporting Frequency: event=harvesting
  simulation Titanic3
    clock
      start_date = 12-apr-2007  # Select the start date of the simulation
      end_date = 15/10/2007  # Select the end date of the simulation
    summaryfile: filename=GreenBelt1997.sum
    metfile met
      filename=C:\development\apsim\Lettuce\Validation\Phenology\Gatton.met
    area Paddock
      registrations global
      manager
        rule Sow on a fixed date
          condition start_of_day:
            if (today = date('[date]') then
                                [crop] sow plants =[density], sowing_depth = [depth], cultivar = [cultivar], row_spacing = [row_spacing]
                    endif
          category Sowing criteria
            date = 12-apr-2007  # Enter sowing date (dd-mmm)
          category Sowing parameters
            crop = lettuce  # Enter name of crop to sow
            density = 6  # Enter sowing density (plants/m2)
            depth = 50  # Enter sowing depth (mm)
            cultivar = Titanic  # Enter cultivar
            row_spacing = 600  # Enter row spacing (mm)
        rule Harvest on a Growth Stage: same as Patagonia1.Paddock.Manager.Harvest on a Growth Stage
      lettuce
      soil: same as Patagonia1.Paddock.Soil
      outputfile
        variables
          variables: day, sowing_date, sowing_das, maturity_das, maturity_date
        events Reporting Frequency: event=harvesting
