folder Simulations: version=7
  simulation Bare
    clock
      start_date = 1/03/2006  # Select the start date of the simulation
      end_date = 04/09/2006  # Select the end date of the simulation
    summaryfile: filename=Continuous Wheat Simulation.sum
    metfile met -> met
    climatechange ShelterEffects
      maxtmodifier = 0.0  # Change in maximum temperature in degrees celsius
      mintmodifier = 0.0  # Change in minimum temperature in degrees celsius
      rainmodifier = 0  # Relative change in rainfall
      radiationmodifier = 0.66  # Relative change in radiation
      co2 = 350  # Atmospheric C02 concentration (ppm)
    area paddock
      registrations global
      operations
        1-mar  'WellCamp Water' set sw = 0.53 0.49 0.48 0.41 0.30 0.31 0.32
      outputfile -> outputfile
      irrigation
        automatic_irrigation = off
        asw_depth = 600.0  # Depth to which ASW is calculated. (mm)
        crit_fr_asw = 0.5  # Fraction of ASW below which irrigation is applied (0-1.0)
        irrigation_efficiency = 1.0  # Efficiency of the irrigation. (0-1.0)
      surfaceom surface organic matter -> surface organic matter
      seedling -> seedling
      logic OutputCalculator -> OutputCalculator
      soil WellCamp: Site=Jimbour; Region=South East Queensland; LocalName=Waco; SoilType=Black Vertosol; NearestTown=Jimbour, Q 4352; NaturalVegetation=Grassland, mainly Qld bluegrass; Cona=5; DiffusConst=40; DiffusSlope=16; U=11; Salb=0.09; Cn2Bare=76; CnRed=20; CnCov=0.8; CnCanopyFact=1; RootCn=40; RootWt=200; SoilCn=12.5; EnrACoeff=7.4; EnrBCoeff=0.2
        profile
          layer:
            thickness  bd    ll15  airdry  dul   sat   sw       swcon  oc    ph   fbiom  finert  no3  nh4  ec    ll Sorghum  kl Sorghum  xf Sorghum  ll Seedling  xf Seedling  kl Seedling
            150        1.02  0.2   0.18    0.54  0.59  9999.99  0.3    1.04  8.4  0.025  0.4     6.5  0.6  0.2   0.2         0.1         1           0.2          0.5          0.02
            150        1.03  0.3   0.25    0.53  0.58  9999.99  0.3    0.89  8.8  0.02   0.6     2.1  0.1  0.25  0.3         0.1         1           0.25         0.5          0.02
            300        1.02  0.3   0.3     0.54  0.59  9999.99  0.3    0.89  9    0.015  0.8     2.1  0.1  0.31  0.32        0.1         1           0.3          0.75         0.02
            300        1.02  0.25  0.25    0.48  0.53  9999.99  0.3    0.89  9.2  0.01   0.9     1.7  0.1  0.4   0.25        0.08        1           0.25         1            0.02
            300        1.06  0.21  0.21    0.4   0.45  9999.99  0.3    0.77  9.2  0.01   0.95    1.7  0.1  0.59  0.21        0.06        1           0.21         1            0.02
            300        1.11  0.21  0.21    0.38  0.43  9999.99  0.3    0.45  9.1  0.01   0.95    1.7  0.1  0.84  0.21        0.04        1           0.21         1            0.02
        InitWater
          DepthWetSoilMethod: Depth=200
        InitNitrogen
          layer:
            no3      nh4
            6.50251  0.599196
            5        0.099866
            5        0.099866
            5        0.099866
            5        0.099866
            5        0.099866
  simulation MelliodoraOutside
    clock
      start_date = 1/03/2006  # Select the start date of the simulation
      end_date = 04/09/2006  # Select the end date of the simulation
    summaryfile: filename=Continuous Wheat Simulation.sum
    metfile met -> met
    area paddock
      registrations global
      operations
        1-mar  seedling sow plants = 6.25, cultivar = melliodora, sowing_depth = 5
        1-mar  'WellCamp Water' set sw = 0.43 0.49 0.49 0.43 0.31 0.36
      outputfile -> outputfile
      irrigation
        automatic_irrigation = off
        asw_depth = 600.0  # Depth to which ASW is calculated. (mm)
        crit_fr_asw = 0.5  # Fraction of ASW below which irrigation is applied (0-1.0)
        irrigation_efficiency = 1.0  # Efficiency of the irrigation. (0-1.0)
      surfaceom surface organic matter -> surface organic matter
      seedling -> seedling
      logic OutputCalculator -> OutputCalculator
      soil WellCamp: same as Bare.paddock.WellCamp
  simulation MelliodoraW1
    clock
      start_date = 1/03/2006  # Select the start date of the simulation
      end_date = 04/09/2006  # Select the end date of the simulation
    summaryfile: filename=Continuous Wheat Simulation.sum
    metfile met -> met
    climatechange ShelterEffects -> ShelterEffects
    area paddock
      registrations global
      operations
        1-mar  seedling sow plants = 6.25, cultivar = melliodora, sowing_depth = 5
        1-mar  'WellCamp Water' set sw = 0.25 0.36 0.3 0.25 0.21 0.21 0.28
      outputfile -> outputfile
      irrigation
        automatic_irrigation = off
        asw_depth = 600.0  # Depth to which ASW is calculated. (mm)
        crit_fr_asw = 0.5  # Fraction of ASW below which irrigation is applied (0-1.0)
        irrigation_efficiency = 1.0  # Efficiency of the irrigation. (0-1.0)
      surfaceom surface organic matter -> surface organic matter
      seedling -> seedling
      logic OutputCalculator -> OutputCalculator
      soil WellCamp: same as Bare.paddock.WellCamp
  simulation MelliodoraW2
    clock
      start_date = 1/03/2006  # Select the start date of the simulation
      end_date = 04/09/2006  # Select the end date of the simulation
    summaryfile: filename=Continuous Wheat Simulation.sum
    metfile met -> met
    climatechange ShelterEffects -> ShelterEffects
    area paddock
      registrations global
      operations
        1-mar  seedling sow plants = 6.25, cultivar = melliodora, sowing_depth = 5
        1-mar  'WellCamp Water' set sw = 0.25 0.39 0.35 0.25 0.21 0.21 0.28
      outputfile -> outputfile
      irrigation
        automatic_irrigation = off
        asw_depth = 600.0  # Depth to which ASW is calculated. (mm)
        crit_fr_asw = 0.5  # Fraction of ASW below which irrigation is applied (0-1.0)
        irrigation_efficiency = 1.0  # Efficiency of the irrigation. (0-1.0)
      surfaceom surface organic matter -> surface organic matter
      seedling -> seedling
      logic OutputCalculator -> OutputCalculator
      soil WellCamp: same as Bare.paddock.WellCamp
  simulation MelliodoraW3
    clock
      start_date = 1/03/2006  # Select the start date of the simulation
      end_date = 04/09/2006  # Select the end date of the simulation
    summaryfile: filename=Continuous Wheat Simulation.sum
    metfile met -> met
    climatechange ShelterEffects -> ShelterEffects
    area paddock
      registrations global
      operations
        1-mar  seedling sow plants = 6.25, cultivar = melliodora, sowing_depth = 5
        1-mar  'WellCamp Water' set sw = 0.25 0.43 0.36 0.25 0.21 0.21 0.28
      outputfile -> outputfile
      irrigation
        automatic_irrigation = off
        asw_depth = 600.0  # Depth to which ASW is calculated. (mm)
        crit_fr_asw = 0.5  # Fraction of ASW below which irrigation is applied (0-1.0)
        irrigation_efficiency = 1.0  # Efficiency of the irrigation. (0-1.0)
      surfaceom surface organic matter -> surface organic matter
      seedling -> seedling
      logic OutputCalculator -> OutputCalculator
      soil WellCamp: same as Bare.paddock.WellCamp
  simulation MelliodoraW4
    clock
      start_date = 1/03/2006  # Select the start date of the simulation
      end_date = 04/09/2006  # Select the end date of the simulation
    summaryfile: filename=Continuous Wheat Simulation.sum
    metfile met -> met
    climatechange ShelterEffects -> ShelterEffects
    area paddock
      registrations global
      operations
        1-mar  seedling sow plants = 6.25, cultivar = melliodora, sowing_depth = 5
        1-mar  'WellCamp Water' set sw = 0.54 0.52 0.53 0.48 0.21 0.21 0.28
      outputfile -> outputfile
      irrigation
        automatic_irrigation = off
        asw_depth = 600.0  # Depth to which ASW is calculated. (mm)
        crit_fr_asw = 0.5  # Fraction of ASW below which irrigation is applied (0-1.0)
        irrigation_efficiency = 1.0  # Efficiency of the irrigation. (0-1.0)
      surfaceom surface organic matter -> surface organic matter
      seedling -> seedling
      logic OutputCalculator -> OutputCalculator
      soil WellCamp: same as Bare.paddock.WellCamp
  simulation MelliodoraW5
    clock
      start_date = 1/03/2006  # Select the start date of the simulation
      end_date = 04/09/2006  # Select the end date of the simulation
    summaryfile: filename=Continuous Wheat Simulation.sum
    metfile met -> met
    climatechange ShelterEffects -> ShelterEffects
    area paddock
      registrations global
      operations
        1-mar  seedling sow plants = 6.25, cultivar = melliodora, sowing_depth = 5
        1-mar  'WellCamp Water' set sw = 0.54 0.52 0.53 0.48 0.40 0.21 0.28
      outputfile -> outputfile
      irrigation
        automatic_irrigation = off
        asw_depth = 600.0  # Depth to which ASW is calculated. (mm)
        crit_fr_asw = 0.5  # Fraction of ASW below which irrigation is applied (0-1.0)
        irrigation_efficiency = 1.0  # Efficiency of the irrigation. (0-1.0)
      surfaceom surface organic matter -> surface organic matter
      seedling -> seedling
      logic OutputCalculator -> OutputCalculator
      soil WellCamp: same as Bare.paddock.WellCamp
  simulation MelliodoraW6
    clock
      start_date = 1/03/2006  # Select the start date of the simulation
      end_date = 04/09/2006  # Select the end date of the simulation
    summaryfile: filename=Continuous Wheat Simulation.sum
    metfile met -> met
    climatechange ShelterEffects -> ShelterEffects
    area paddock
      registrations global
      operations
        1-mar  seedling sow plants = 6.25, cultivar = melliodora, sowing_depth = 5
        1-mar  'WellCamp Water' set sw = 0.37 0.48 0.47 0.40 0.29 0.32
      outputfile -> outputfile
      irrigation
        automatic_irrigation = off
        asw_depth = 600.0  # Depth to which ASW is calculated. (mm)
        crit_fr_asw = 0.5  # Fraction of ASW below which irrigation is applied (0-1.0)
        irrigation_efficiency = 1.0  # Efficiency of the irrigation. (0-1.0)
      surfaceom surface organic matter -> surface organic matter
      seedling -> seedling
      logic OutputCalculator -> OutputCalculator
      soil WellCamp: same as Bare.paddock.WellCamp
  simulation MelliodoraWet
    clock
      start_date = 1/03/2006  # Select the start date of the simulation
      end_date = 04/09/2006  # Select the end date of the simulation
    summaryfile: filename=Continuous Wheat Simulation.sum
    metfile met -> met
    climatechange ShelterEffects -> ShelterEffects
    area paddock
      registrations global
      operations
        1-mar  seedling sow plants = 6.25, cultivar = melliodora, sowing_depth = 5
        1-mar  'WellCamp Water' set sw = 0.41 0.49 0.49 0.41 0.30 0.31
      outputfile -> outputfile
      irrigation
        automatic_irrigation = on
        asw_depth = 1000  # Depth to which ASW is calculated. (mm)
        crit_fr_asw = 1  # Fraction of ASW below which irrigation is applied (0-1.0)
        irrigation_efficiency = 1.0  # Efficiency of the irrigation. (0-1.0)
      surfaceom surface organic matter -> surface organic matter
      seedling -> seedling
      logic OutputCalculator -> OutputCalculator
      soil WellCamp: same as Bare.paddock.WellCamp
  folder shared
    outputfile
      variables
        variables: dd/mm/yyyy as Date, day, lai, node_no, stem_wt, leaf_wt, swdef_photo, swdef_expan, nfact_photo, nfact_expan, leaf_no(), rain, irrigation, es, sw, sw_dep(), leaf_area_tot, temp_stress_photo, plantleaf, plantstem, plantla, plantbiomass, swsi, plants, dlt_dm_green_leaf, dlt_lai_pot, dlt_lai_stressed, slai, biomass_n, no3(), nh4(), n_conc_stem, n_conc_leaf, leaf_n, stem_n, dlt_lai, dlt_lai_carbon, tlai, node_no_sen, nodes, root_depth, rlv, biomass_wt, ep, eo, rtr
      events Reporting Frequency: event=Daily
    seedling
    surfaceom surface organic matter
      PoolName = wheat  # Organic Matter pool name
      type = wheat  # Organic Matter type
      mass = 100  # Initial surface residue (kg/ha)
      cnr = 80.0  # C:N ratio of initial residue
      standing_fraction = 0.0  # Fraction of residue standing
    metfile met: filename=D:\Development\apsim\Seedling\Validation\Toowoomba.met
    climatechange ShelterEffects
      maxtmodifier = 0.0  # Change in maximum temperature in degrees celsius
      mintmodifier = 0.0  # Change in minimum temperature in degrees celsius
      rainmodifier = 0  # Relative change in rainfall
      radiationmodifier = 0.66  # Relative change in radiation
      co2 = 350  # Atmospheric C02 concentration (ppm)
    logic OutputCalculator
      on script:
```
scriptscriptscriptscriptscriptscriptscriptscriptinit 
plantbiomass = 0 
plantleaf = 0
plantstem = 0
plantla = 0
SWSI = 0
nodes = 0
RTR = 0
```
      on script:
```
scriptscriptscriptscriptscriptscriptscriptscriptstartofday
```
      on script:
```
scriptscriptscriptscriptscriptscriptscriptscriptendofday if lai > 0 then
   plantbiomass = green_biomass_wt/plants
   plantleaf = dm_green_leaf / plants
   plantstem = dm_green_stem / plants
   plantla = lai * 10000 / plants
   nodes = node_no + 17
   SWSI = SWSI + (1.0 - swdef_photo)
   RTR = ep / (eo * cover_green)
endif
```
    soil WellCamp: same as Bare.paddock.WellCamp
