simulations untitled: version=5
  simulation PacSeeds
    clock
      start_date = 1/09/2004  # Select the start date of the simulation
      end_date = 30/06/2005  # Select the end date of the simulation
    summaryfile: filename=PacSeeds.sum
    metfile met: filename=lawes0405.met
    area Planting1
      registrations global
      manager
        rule Harvesting rule
          condition end_of_day:
            if [crop].stage_name = 'harvest_ripe' or [crop].plant_status = 'dead' then
                          [crop]  harvest
                          [crop]  end_crop
                       endif
          category Harvesting criteria
            crop = SweetSorghum  # Enter name of crop to harvest when ripe
        rule Sowing fertiliser
          condition [modulename].[eventname]=[fertmodule] apply amount = [fert_amount_sow] (kg/ha), depth = 50 (mm), type = [fert_type_sow]
          category When should fertiliser be applied
            modulename = SweetSorghum  # On which module should the event come from
            eventname = sowing  # On which event should fertiliser be applied
          category Fertiliser application details
            fertmodule = fertiliser  # Module used to apply the fertiliser
            fert_amount_sow = 300  # Amount of starter fertiliser at sowing (kg/ha)
            fert_type_sow = NO3_N  # Sowing fertiliser type
        rule Sow on a fixed date
          condition start_of_day:
            if (today = date('[date]') then
                                [crop] sow plants =[density], sowing_depth = [depth], cultivar = [cultivar], row_spacing = [row_spacing]
                    endif
          category Sowing criteria
            date = 15-sep  # Enter sowing date (dd-mmm)
          category Sowing parameters
            crop = SweetSorghum  # Enter name of crop to sow
            density = 10  # Enter sowing density (plants/m2)
            depth = 50  # Enter sowing depth (mm)
            cultivar = sugargraze  # Enter cultivar
            row_spacing = 600  # Enter row spacing (mm)
      fertiliser
      surfaceom surface organic matter
        PoolName = wheat  # Organic Matter pool name
        type = wheat  # Organic Matter type
        mass = 1000.  # Initial surface residue (kg/ha)
        cnr = 80.0  # C:N ration of initial residue
        standing_fraction = 0.0  # Fraction of residue standing
      soil -> LawesSoil
      SweetSorghum
      outputfile: filename=PacSeeds Planting1.out
        variables My Variables
          variables: dd/mm/yyyy as Date, SweetSorghum.zadok_stage, SweetSorghum.lai, SweetSorghum.leaf_wt, SweetSorghum.stem_wt, SweetSorghum.head_wt, SweetSorghum.biomass_wt
        events My Variables Events: event=Daily
      irrigation
        automatic_irrigation = on  # switch
        asw_depth = 600.0  # Depth to which ASW is calculated. (mm)
        crit_fr_asw = 0.5  # Fraction of ASW below which irrigation is applied (0-1.0)
        irrigation_efficiency = 1.0  # Efficiency of the irrigation. (0-1.0)
    area Planting2
      registrations global
      manager
        rule Harvesting rule
          condition end_of_day:
            if [crop].stage_name = 'harvest_ripe' or [crop].plant_status = 'dead' then
                          [crop]  harvest
                          [crop]  end_crop
                       endif
          category Harvesting criteria
            crop = SweetSorghum  # Enter name of crop to harvest when ripe
        rule Sowing fertiliser: same as PacSeeds.Planting1.Manager.Sowing fertiliser
        rule Sow on a fixed date
          condition start_of_day:
            if (today = date('[date]') then
                                [crop] sow plants =[density], sowing_depth = [depth], cultivar = [cultivar], row_spacing = [row_spacing]
                    endif
          category Sowing criteria
            date = 12-jan  # Enter sowing date (dd-mmm)
          category Sowing parameters
            crop = SweetSorghum  # Enter name of crop to sow
            density = 10  # Enter sowing density (plants/m2)
            depth = 50  # Enter sowing depth (mm)
            cultivar = sugargraze  # Enter cultivar
            row_spacing = 600  # Enter row spacing (mm)
      fertiliser
      surfaceom surface organic matter
        PoolName = wheat  # Organic Matter pool name
        type = wheat  # Organic Matter type
        mass = 1000.  # Initial surface residue (kg/ha)
        cnr = 80.0  # C:N ration of initial residue
        standing_fraction = 0.0  # Fraction of residue standing
      soil -> LawesSoil
      SweetSorghum
      outputfile: filename=PacSeeds Planting2.out
        variables My Variables
          variables: dd/mm/yyyy as Date, SweetSorghum.zadok_stage, SweetSorghum.lai, SweetSorghum.leaf_wt, SweetSorghum.stem_wt, SweetSorghum.head_wt, SweetSorghum.biomass_wt
        events My Variables Events: event=Daily
      irrigation
        automatic_irrigation = on  # switch
        asw_depth = 600.0  # Depth to which ASW is calculated. (mm)
        crit_fr_asw = 0.5  # Fraction of ASW below which irrigation is applied (0-1.0)
        irrigation_efficiency = 1.0  # Efficiency of the irrigation. (0-1.0)
  folder shared
    soil LawesSoil: Site=UQ, Lawes; Region=Lockyer; SoilType=Black Vertosol; NearestTown=Gatton, Q 4343; NaturalVegetation=Blue Gum, Moreton Bay Ash, Tea Tree; Comment=oc and ph not measured
      Water: Cona=3.5; DiffusConst=40; DiffusSlope=16; U=6; Salb=0.13; Cn2Bare=73; CnRed=20; CnCov=0.8
        layer:
          thickness  bd    ll15  airdry  dul   sat   sw       swcon
          150        1.32  0.26  0.13    0.41  0.47  9999.99  0.3
          150        1.3   0.26  0.234   0.43  0.48  9999.99  0.3
          300        1.23  0.26  0.26    0.46  0.51  9999.99  0.3
          300        1.27  0.26  0.26    0.44  0.49  9999.99  0.3
          300        1.37  0.25  0.25    0.4   0.45  9999.99  0.3
          300        1.35  0.28  0.28    0.41  0.46  9999.99  0.3
          300        1.35  0.31  0.31    0.38  0.46  9999.99  0.3
      Nitrogen: CnCanopyFact=1; RootCn=40; RootWt=200; SoilCn=12.5; EnrACoeff=7.4; EnrBCoeff=0.2
        layer:
          fbiom  finert  no3  nh4  oc    ph
          0.03   0.4     6.5  0.6  1.24  7
          0.02   0.6     2.1  0.1  1.24  7
          0.01   0.8     2.1  0.1  1.25  7
          0.01   0.9     1.7  0.1  1.1   7
          0.01   0.95    1.7  0.1  0.71  7
          0.01   0.95    1.7  0.1  0.34  7
          0.01   0.95    1.7  0.1  0.26  7
      InitWater
        PercentMethod: Percent=0.83; Distributed=Filled from top
      InitNitrogen
        layer:
          no3      nh4
          6.49399  0.608229
          2.09806  0.101371
          2.09806  0.101371
          1.69843  0.101371
          1.69843  0.101371
          1.69843  0.101371
          1.69843  0.101371
      SoilCrop SweetSorghum
        layer:
          ll    kl    xf
          0.26  0.1   1
          0.26  0.1   1
          0.26  0.08  1
          0.26  0.06  1
          0.25  0.04  1
          0.29  0.02  1
          0.38  0.01  1
  simulation Lawes0102
    clock
      start_date = 1/11/2001  # Select the start date of the simulation
      end_date = 30/06/2002  # Select the end date of the simulation
    summaryfile: filename=Lawes0102.sum
    metfile met: filename=UQG0102.met
    area Planting1
      registrations global
      manager
        rule Harvesting rule
          condition end_of_day:
            if [crop].stage_name = 'harvest_ripe' or [crop].plant_status = 'dead' then
                          [crop]  harvest
                          [crop]  end_crop
                       endif
          category Harvesting criteria
            crop = SweetSorghum  # Enter name of crop to harvest when ripe
        rule Sowing fertiliser: same as PacSeeds.Planting1.Manager.Sowing fertiliser
        rule Sow on a fixed date
          condition start_of_day:
            if (today = date('[date]') then
                                [crop] sow plants =[density], sowing_depth = [depth], cultivar = [cultivar], row_spacing = [row_spacing]
                    endif
          category Sowing criteria
            date = 23-nov  # Enter sowing date (dd-mmm)
          category Sowing parameters
            crop = SweetSorghum  # Enter name of crop to sow
            density = 10  # Enter sowing density (plants/m2)
            depth = 50  # Enter sowing depth (mm)
            cultivar = sugargraze  # Enter cultivar
            row_spacing = 600  # Enter row spacing (mm)
      fertiliser
      surfaceom surface organic matter
        PoolName = wheat  # Organic Matter pool name
        type = wheat  # Organic Matter type
        mass = 1000.  # Initial surface residue (kg/ha)
        cnr = 80.0  # C:N ration of initial residue
        standing_fraction = 0.0  # Fraction of residue standing
      soil -> LawesSoil
      SweetSorghum
      outputfile: filename=Lawes0102 Planting1.out
        variables My Variables
          variables: dd/mm/yyyy as Date, SweetSorghum.zadok_stage, SweetSorghum.lai, SweetSorghum.leaf_wt, SweetSorghum.stem_wt, SweetSorghum.head_wt, SweetSorghum.biomass_wt, SweetCorn.swdef_photo, SweetCorn.node_no, SweetCorn.node_no_sen, SweetCorn.node_no_fx, SweetCorn.nfact_photo, SweetCorn.temp_stress_photo, SweetCorn.tt_tot, SweetCorn.das, Irrigation.irrigation, SweetCorn.root_depth, DPIGatton Water.sw_dep(), DPIGatton Water.sw, SweetCorn.dlt_lai_pot, SweetCorn.ep, SweetCorn.sw_demand, SweetCorn.nfact_expan, SweetCorn.swdef_expan, DPIGatton Water.runoff, DPIGatton Water.es, wheat.nfact_expan, wheat.root_depth, wheat.ep, eo
        events My Variables Events: event=Daily
      irrigation
        automatic_irrigation = on  # switch
        asw_depth = 600.0  # Depth to which ASW is calculated. (mm)
        crit_fr_asw = 0.5  # Fraction of ASW below which irrigation is applied (0-1.0)
        irrigation_efficiency = 1.0  # Efficiency of the irrigation. (0-1.0)
    area Planting2
      registrations global
      manager
        rule Harvesting rule
          condition end_of_day:
            if [crop].stage_name = 'harvest_ripe' or [crop].plant_status = 'dead' then
                          [crop]  harvest
                          [crop]  end_crop
                       endif
          category Harvesting criteria
            crop = SweetSorghum  # Enter name of crop to harvest when ripe
        rule Sowing fertiliser: same as PacSeeds.Planting1.Manager.Sowing fertiliser
        rule Sow on a fixed date
          condition start_of_day:
            if (today = date('[date]') then
                                [crop] sow plants =[density], sowing_depth = [depth], cultivar = [cultivar], row_spacing = [row_spacing]
                    endif
          category Sowing criteria
            date = 21-dec  # Enter sowing date (dd-mmm)
          category Sowing parameters
            crop = SweetSorghum  # Enter name of crop to sow
            density = 10  # Enter sowing density (plants/m2)
            depth = 50  # Enter sowing depth (mm)
            cultivar = sugargraze  # Enter cultivar
            row_spacing = 600  # Enter row spacing (mm)
      fertiliser
      surfaceom surface organic matter
        PoolName = wheat  # Organic Matter pool name
        type = wheat  # Organic Matter type
        mass = 1000.  # Initial surface residue (kg/ha)
        cnr = 80.0  # C:N ration of initial residue
        standing_fraction = 0.0  # Fraction of residue standing
      soil -> LawesSoil
      SweetSorghum
      outputfile: filename=Lawes0102 Planting2.out
        variables My Variables
          variables: dd/mm/yyyy as Date, SweetSorghum.zadok_stage, SweetSorghum.lai, SweetSorghum.leaf_wt, SweetSorghum.stem_wt, SweetSorghum.head_wt, SweetSorghum.biomass_wt
        events My Variables Events: event=Daily
      irrigation
        automatic_irrigation = on  # switch
        asw_depth = 600.0  # Depth to which ASW is calculated. (mm)
        crit_fr_asw = 0.5  # Fraction of ASW below which irrigation is applied (0-1.0)
        irrigation_efficiency = 1.0  # Efficiency of the irrigation. (0-1.0)
    area Planting3
      registrations global
      manager
        rule Harvesting rule
          condition end_of_day:
            if [crop].stage_name = 'harvest_ripe' or [crop].plant_status = 'dead' then
                          [crop]  harvest
                          [crop]  end_crop
                       endif
          category Harvesting criteria
            crop = SweetSorghum  # Enter name of crop to harvest when ripe
        rule Sowing fertiliser: same as PacSeeds.Planting1.Manager.Sowing fertiliser
        rule Sow on a fixed date
          condition start_of_day:
            if (today = date('[date]') then
                                [crop] sow plants =[density], sowing_depth = [depth], cultivar = [cultivar], row_spacing = [row_spacing]
                    endif
          category Sowing criteria
            date = 22-jan  # Enter sowing date (dd-mmm)
          category Sowing parameters
            crop = SweetSorghum  # Enter name of crop to sow
            density = 10  # Enter sowing density (plants/m2)
            depth = 50  # Enter sowing depth (mm)
            cultivar = sugargraze  # Enter cultivar
            row_spacing = 600  # Enter row spacing (mm)
      fertiliser
      surfaceom surface organic matter
        PoolName = wheat  # Organic Matter pool name
        type = wheat  # Organic Matter type
        mass = 1000.  # Initial surface residue (kg/ha)
        cnr = 80.0  # C:N ration of initial residue
        standing_fraction = 0.0  # Fraction of residue standing
      soil -> LawesSoil
      SweetSorghum
      outputfile: filename=Lawes0102 Planting3.out
        variables My Variables
          variables: dd/mm/yyyy as Date, SweetSorghum.zadok_stage, SweetSorghum.lai, SweetSorghum.leaf_wt, SweetSorghum.stem_wt, SweetSorghum.head_wt, SweetSorghum.biomass_wt
        events My Variables Events: event=Daily
      irrigation
        automatic_irrigation = on  # switch
        asw_depth = 600.0  # Depth to which ASW is calculated. (mm)
        crit_fr_asw = 0.5  # Fraction of ASW below which irrigation is applied (0-1.0)
        irrigation_efficiency = 1.0  # Efficiency of the irrigation. (0-1.0)
    area Planting4
      registrations global
      manager
        rule Harvesting rule
          condition end_of_day:
            if [crop].stage_name = 'harvest_ripe' or [crop].plant_status = 'dead' then
                          [crop]  harvest
                          [crop]  end_crop
                       endif
          category Harvesting criteria
            crop = SweetSorghum  # Enter name of crop to harvest when ripe
        rule Sowing fertiliser: same as PacSeeds.Planting1.Manager.Sowing fertiliser
        rule Sow on a fixed date
          condition start_of_day:
            if (today = date('[date]') then
                                [crop] sow plants =[density], sowing_depth = [depth], cultivar = [cultivar], row_spacing = [row_spacing]
                    endif
          category Sowing criteria
            date = 21-feb  # Enter sowing date (dd-mmm)
          category Sowing parameters
            crop = SweetSorghum  # Enter name of crop to sow
            density = 10  # Enter sowing density (plants/m2)
            depth = 50  # Enter sowing depth (mm)
            cultivar = sugargraze  # Enter cultivar
            row_spacing = 600  # Enter row spacing (mm)
      fertiliser
      surfaceom surface organic matter
        PoolName = wheat  # Organic Matter pool name
        type = wheat  # Organic Matter type
        mass = 1000.  # Initial surface residue (kg/ha)
        cnr = 80.0  # C:N ration of initial residue
        standing_fraction = 0.0  # Fraction of residue standing
      soil -> LawesSoil
      SweetSorghum
      outputfile: filename=Lawes0102 Planting4.out
        variables My Variables
          variables: dd/mm/yyyy as Date, SweetSorghum.zadok_stage, SweetSorghum.lai, SweetSorghum.leaf_wt, SweetSorghum.stem_wt, SweetSorghum.head_wt, SweetSorghum.biomass_wt
        events My Variables Events: event=Daily
      irrigation
        automatic_irrigation = on  # switch
        asw_depth = 600.0  # Depth to which ASW is calculated. (mm)
        crit_fr_asw = 0.5  # Fraction of ASW below which irrigation is applied (0-1.0)
        irrigation_efficiency = 1.0  # Efficiency of the irrigation. (0-1.0)
