folder Simulations: version=9
  simulation WaterSupply Sample Simulation
    metfile met: filename=%apsuite\apsim\met\sample\goond.met
    clock
      start_date = 1/01/1940  # Select the start date of the simulation
      end_date = 31/12/1942  # Select the end date of the simulation
    summaryfile: filename=Continuous Wheat Simulation.sum
    area paddock
      registrations global
      manager
        rule Sowing rule
          condition start_of_day:
            if (paddock_is_fallow() = 1 and FallowIn <> 'yes' and (NextCrop = 0 or NextCrop = '[crop]')) then
                     if (date_within('[date1], [date2]') = 1) then
                        if (rain[[rainnumdays]] >= [raincrit] AND esw >= [esw_amount]) OR
                            ('[must_sow]' = 'yes' AND today = date('[date2]'))) THEN
                           ChooseNextCrop = 'yes'   ! for rotations
                           [crop] sow plants =[density], sowing_depth = [depth], cultivar = [cultivar], row_spacing = [row_spacing], crop_class = [class]
                        endif
                        if today = date('[date2]') then
                           ChooseNextCrop = 'yes'
                        endif
                     endif
                  endif
          category Sowing criteria
            date1 = 15-may  # Enter sowing window START date (dd-mmm)
            date2 = 10-jul  # Enter sowing window END date (dd-mmm)
            must_sow = no  # Must sow?
            raincrit = 30  # Amount of rainfall
            rainnumdays = 3  # Number of days of rainfall
            esw_amount = 200  # Enter minimum allowable available soil water (mm)
          category Sowing parameters
            crop = wheat  # Enter name of crop to sow
            density = 100  # Enter sowing density (plants/m2)
            depth = 30  # Enter sowing depth (mm)
            cultivar = hartog  # Enter cultivar
            class = plant  # Enter crop growth class
            row_spacing = 250  # Enter row spacing (mm)
        rule Harvesting rule
          condition end_of_day:
            if [crop].stage_name = 'harvest_ripe' or [crop].plant_status = 'dead' then
                          [crop]  harvest
                          [crop]  end_crop
                       endif
          category Harvesting criteria
            crop = wheat  # Enter name of crop to harvest when ripe
        rule Sowing fertiliser
          condition [modulename].[eventname]=[fertmodule] apply amount = [fert_amount_sow] (kg/ha), depth = 50 (mm), type = [fert_type_sow]
          category When should fertiliser be applied
            modulename = wheat  # On which module should the event come from
            eventname = sowing  # On which event should fertiliser be applied
          category Fertiliser application details
            fertmodule = fertiliser  # Module used to apply the fertiliser
            fert_amount_sow = 150  # Amount of starter fertiliser at sowing (kg/ha)
            fert_type_sow = urea_N  # Sowing fertiliser type
      fertiliser
      surfaceom surface organic matter
        PoolName = wheat  # Organic Matter pool name
        type = wheat  # Organic Matter type
        mass = 1000.  # Initial surface residue (kg/ha)
        cnr = 80.0  # C:N ratio of initial residue
        standing_fraction = 0.0  # Fraction of residue standing
      wheat
      outputfile: events=Reporting Frequency
        variables
          variable:
            dd/mm/yyyy as Date
            wheat.biomass
            wheat.yield
            wheat.grain_protein
            wheat.grain_size
            esw
            dam.available_water as dam_water
            channel.available_water as channel_water
            bore.available_water as bore_water
            irrigation
            logic.deficit
      soil Jimbour,Waco (#016): Site=Jimbour; Region=South East Queensland; LocalName=Waco; SoilType=Black Vertosol; NearestTown=Jimbour, Q 4352; NaturalVegetation=Grassland, mainly Qld bluegrass; Cona=3.5; DiffusConst=40; DiffusSlope=16; U=6; Salb=0.13; Cn2Bare=73; CnRed=20; CnCov=0.8; CnCanopyFact=1; RootCn=40; RootWt=200; SoilCn=12.5; EnrACoeff=7.4; EnrBCoeff=0.2
        InitWater
          PercentMethod: Percent=0.22; Distributed=Filled from top
        InitNitrogen
          profile
            layer:
              no3    nh4    thickness
              6.503  0.599  150
              2.101  0.100  150
              2.101  0.100  300
              1.701  0.100  300
              1.701  0.100  300
              1.701  0.100  300
              1.701  0.100  300
              1.701  0.100  300
              1.701  0.100  300
              1.701  0.100  300
              1.701  0.100  300
        profile
          layer:
            thickness  bd     ll15   airdry  dul    sat    sw        swcon  oc     ph     fbiom  finert  no3    nh4    ec     ll Barley  kl Barley  xf Barley  ll Chickpea  kl Chickpea  xf Chickpea  ll Lucerne  kl Lucerne  xf Lucerne  ll Maize  kl Maize  xf Maize  ll Perennial Grass  kl Perennial Grass  xf Perennial Grass  ll Sorghum  kl Sorghum  xf Sorghum  ll Wheat  kl Wheat  xf Wheat
            150        1.020  0.290  0.150   0.540  0.590  9999.990  0.300  1.040  8.400  0.025  0.400   6.500  0.600  0.200  0.290      0.100      1          0.290        0.100        1            0.290       0.100       1           0.290     0.100     1         0.290               0.100               1                   0.290       0.100       1           0.290     0.100     1
            150        1.030  0.290  0.260   0.530  0.580  9999.990  0.300  0.890  8.800  0.020  0.600   2.100  0.100  0.250  0.290      0.100      1          0.290        0.100        1            0.290       0.100       1           0.290     0.100     1         0.290               0.100               1                   0.290       0.100       1           0.290     0.100     1
            300        1.020  0.290  0.290   0.540  0.590  9999.990  0.300  0.890  9      0.015  0.800   2.100  0.100  0.310  0.320      0.080      1          0.360        0.080        1            0.290       0.100       1           0.340     0.100     1         0.390               0.100               1                   0.350       0.100       1           0.320     0.080     1
            300        1.020  0.290  0.290   0.540  0.580  9999.990  0.300  0.890  9.200  0.010  0.900   1.700  0.100  0.400  0.380      0.060      1          0.430        0.060        1            0.290       0.100       1           0.340     0.080     1         0.410               0.100               1                   0.380       0.080       1           0.320     0.060     1
            300        1.060  0.300  0.300   0.520  0.570  9999.990  0.300  0.770  9.200  0.010  0.950   1.700  0.100  0.590  0.390      0.040      1          0.510        0.040        1            0.300       0.090       1           0.370     0.060     1         0.400               0.090               1                   0.400       0.060       1           0.350     0.040     1
            300        1.110  0.310  0.310   0.500  0.550  9999.990  0.300  0.450  9.100  0.010  0.950   1.700  0.100  0.840  0.390      0.020      1          0.500        0.020        1            0.310       0.090       1           0.400     0.040     1         0.400               0.070               1                   0.400       0.040       1           0.380     0.020     1
            300        1.120  0.320  0.320   0.500  0.550  9999.990  0.300  0.270  9      0.010  0.950   1.700  0.100  0.930  0.410      0.010      1          0.500        0.010        1            0.320       0.090       1           0.420     0.020     1         0.410               0.050               1                   0.400       0.020       1           0.410     0.010     1
            300        1.150  0.330  0.330   0.480  0.530  9999.990  0.300  0.220  9      0.010  0.950   1.700  0.100  1.010  0.480      0          0          0.480        0            0            0.330       0.090       1           0.480     0         0         0.410               0                   0                   0.480       0           0           0.480     0         0
            300        1.180  0.340  0.340   0.470  0.520  9999.990  0.300  0.160  8.900  0.010  0.950   1.700  0.100  1.060  0.470      0          0          0.470        0            0            0.340       0.090       1           0.470     0         0         0.400               0                   0                   0.470       0           0           0.470     0         0
            300        1.200  0.350  0.350   0.460  0.510  9999.990  0.300  0.130  8.900  0.010  0.950   1.700  0.100  1.050  0.460      0          0          0.460        0            0            0.350       0.090       1           0.460     0         0         0.400               0                   0                   0.460       0           0           0.460     0         0
            300        1.250  0.360  0.360   0.440  0.490  9999.990  0.300  0.120  8.900  0.010  0.950   1.700  0.100  1.010  0.440      0          0          0.440        0            0            0.360       0.090       1           0.440     0         0         0.420               0                   0                   0.440       0           0           0.440     0         0
      logic
        on init:
```
 ! hello

crop_area = 50
```
        on start_of_day:
```
 ! hello

!look at available soil water (mm) in the top 7 layers (wheat rooting depth)
max_avail_soil_water = (dul_dep(1) - ll15_dep(1)) + (dul_dep(2) - ll15_dep(2)) +  (dul_dep(3) - ll15_dep(3)) +  (dul_dep(4) - ll15_dep(4))  +  (dul_dep(5) - ll15_dep(5))    +  (dul_dep(6) - ll15_dep(6))    +  (dul_dep(7) - ll15_dep(7))  
avail_soil_water = (sw_dep(1) - ll15_dep(1)) + (sw_dep(2) - ll15_dep(2)) +  (sw_dep(3) - ll15_dep(3)) +  (sw_dep(4) - ll15_dep(4))  +  (sw_dep(5) - ll15_dep(5))  +  (sw_dep(6) - ll15_dep(6))  +  (sw_dep(7) - ll15_dep(7))  
avail_sw_proportion = avail_soil_water / max_avail_soil_water

deficit = max_avail_soil_water - avail_soil_water


If wheat.plant_status = 'alive' and deficit >35.0 then
     Irrigation apply amount = deficit, source = dam
endif

if dam.available_water < 20.0 then
    dam top_up amount = 40, source = channel
endif

if channel.available_water < 900.0  then
    channel top_up amount = 10, source = bore
endif
```
        on end_of_day:
```
 !hello


outputfile do_output
```
      channel
        max_available_water = 1000  # Capacity (ML)
        init_available_water = 50  # Supply volume available at start of simulation (ML)
        max_pump = 200  # Maximum pump delivery volume per day (ML/day)
        min_volume = 2  # Minimum volume in storage that the pump cannot access
        annual_allocation = 1000  # Annual Allocation in ML
        allocation_renewal_day = 180  # Day of year on which allocation is granted
        init_salt_conc = 704.0  # Initial chloride concentration (ppm)
      bore
        max_available_water = 100  # Capacity (ML)
        init_available_water = 50  # Supply volume available at start of simulation (ML)
        max_pump = 200  # Maximum pump delivery volume per day (ML/day)
        min_volume = 2  # Minimum volume in storage below which pump cannot access
        annual_allocation = 100  # Annual Allocation in ML
        allocation_renewal_day = 180  # Day of year on which allocation is granted
        init_salt_conc = 704.0  # Initial chloride concentration (ppm)
      irrigation
        automatic_irrigation = on
        asw_depth = 600.0  # Depth to which ASW is calculated. (mm)
        crit_fr_asw = 0.5  # Fraction of ASW below which irrigation is applied (0-1.0)
        irrigation_efficiency = 1.0  # Efficiency of the irrigation. (0-1.0)
      dam
        source_type = dam_gully
        max_available_water = 100  # Capacity (ML)
        max_area = 5  # Storage water surface area at capacity (ha)
        init_available_water = 50  # Initial supply volume available(ML)
        max_pump = 200  # Maximum pump delivery volume per day (ML/day)
        min_volume = 2  # Minimum volume in storage that the pump cannot access
        permeability = 0.00007  # Permeability of sealing layer (m/day)
        seal_thickness = 0.5  # Thickness of low permeability seal (m)
        receive_rainfall = yes  # Does the dam recieve rainfall faling directly into its surface area
        receive_catchment_runoff = no  # Does the dam receive runoff from a catchment
        receive_crop_runoff = no  # Dam collects runoff from simulated crop area
        receive_catchment_runoff = no  # Dam collects runoff from larger catchment area
        catchment_area = 50.0  # Catchment area (ha)
        catchment_runoff_factor = 0.5  # multiplier for soilwat2 runoff to simulate catchment runoff
        init_salt_conc = 704.0  # Initial chloride concentration (ppm)
        receive_crop_runoff = yes  # Dam collects runoff from simulated crop area
        runoff_salt_conc = 700.0  # Runoff chloride concentration (ppm)
        rainfall_salt_conc = 20.0  # Rainfall chloride concentration (ppm)
    log: debugoutput=on; filename=log.txt
