folder Simulations: version=5
  simulation Canopy Sample Simulation
    metfile met: filename=C:\development\apsim\met\sample\dalby.met
    clock
      start_date = 1/01/1988  # Select the start date of the simulation
      end_date = 31/12/1988  # Select the end date of the simulation
    summaryfile: filename=Blank Simulation.sum
    area paddock
      registrations global
      outputfile: filename=sample.out
        variables
          variables: dd/mm/yyyy as Date, sw_dep(), cowpea.lai as lai_cowpea, maize.lai as lai_maize, canopy.cover_tot_sum, cowpea.biomass as biom_cowpea, maize.biomass as biom_maize
        events Reporting Frequency: event=Daily
      logic
        on start_of_day:
```
 ! MAIZE SOWING AND HARVEST ************
if day = 10 and year = 1988 then
      maize sow cultivar = dekalb_xl82, plants = 10, sowing_depth = 30 (mm)
endif

if (maize.stage = 11) then
      maize harvest
      maize end_crop
endif

! COWPEA SOWING AND HARVEST**********
if day = 10 and year  = 1988 then
   cowpea sow cultivar = banjo, plants = 25 (/m2), sowing_depth = 40 (mm)
endif

if cowpea.stage_name = 'harvest_ripe' or cowpea.plant_status = 'dead' then
   cowpea harvest
   cowpea end_crop   
endif
```
      canopy
        intercrop = maize cowpea  # Enter crop names to intercrop
      cowpea
      maize
      soil No000 SampleBlackVertosol (No000): state=Queensland; region=South East Queensland; nearesttown=Generic; site=Generic; SoilType=Black Vertosol; comment=estimated cotton LL
        InitWater
          sw=[0.29, 0.29, 0.35, 0.36, 0.38, 0.39, 0.39, 0.48, 0.47, 0.46, 0.44]
        InitNitrogen
          layer:
            no3  nh4
            6    1
            5    1
            3    0.9
            2    0.7
            1    0.2
            1    0.1
            1    0.01
            1    0.01
            1    0.01
            1    0.01
            1    0.01
        Water: Cona=3.5; U=6; Salb=0.12; DiffusConst=40; DiffusSlope=16; CN2Bare=73; CNRed=20; CNCov=0.8
          layer:
            thickness  bd    ll15  airdry  dul   sat   swcon
            150        1.02  0.29  0.15    0.54  0.59  0.3
            150        1.03  0.29  0.23    0.53  0.58  0.3
            300        1.02  0.29  0.29    0.54  0.59  0.3
            300        1.02  0.29  0.29    0.54  0.58  0.3
            300        1.06  0.29  0.29    0.52  0.57  0.3
            300        1.11  0.29  0.29    0.5   0.55  0.3
            300        1.12  0.29  0.29    0.5   0.55  0.3
            300        1.15  0.29  0.29    0.48  0.53  0.3
            300        1.18  0.29  0.29    0.47  0.52  0.3
            300        1.2   0.29  0.29    0.46  0.51  0.3
            300        1.25  0.29  0.29    0.44  0.49  0.3
        Nitrogen: RootCN=40; RootWT=1000; SoilCN=12; EnrACoeff=7.4; EnrBCoeff=0.2
          layer:
            fbiom  finert  oc    ph
            0.04   0.4     1.04  8.4
            0.02   0.6     0.89  8.8
            0.02   0.8     0.89  9
            0.02   1       0.89  9.2
            0.01   1       0.77  9.2
            0.01   1       0.45  9.1
            0.01   1       0.27  9
            0.01   1       0.22  9
            0.01   1       0.16  8.9
            0.01   1       0.13  8.9
            0.01   1       0.12  8.9
        other
          layer:
            texture  ec
            999999   0.2
            999999   0.3
            999999   0.3
            999999   0.4
            999999   0.6
            999999   0.8
            999999   0.9
            999999   1
            999999   1.1
            999999   1.1
            999999   1
        SoilCrop wheat
          layer:
            ll    kl    xf
            0.29  0.06  1
            0.29  0.06  1
            0.32  0.06  1
            0.32  0.04  1
            0.35  0.04  1
            0.38  0.02  0.42
            0.41  0.02  0.37
            0.48  0     0
            0.47  0     0
            0.46  0     0
            0.44  0     0
        SoilCrop canola
          layer:
            ll    kl    xf
            0.29  0.06  1
            0.29  0.06  1
            0.32  0.06  1
            0.32  0.04  1
            0.35  0.04  1
            0.38  0.02  0.42
            0.41  0.01  0.37
            0.48  0     0
            0.47  0     0
            0.46  0     0
            0.44  0     0
        SoilCrop barley
          layer:
            ll    kl    xf
            0.29  0.07  1
            0.29  0.07  1
            0.32  0.07  1
            0.38  0.05  1
            0.39  0.05  1
            0.39  0.03  0.42
            0.41  0.02  0.37
            0.48  0     0
            0.47  0     0
            0.46  0     0
            0.44  0     0
        SoilCrop chickpea
          layer:
            ll    kl    xf
            0.29  0.06  1
            0.29  0.06  1
            0.36  0.06  1
            0.43  0.06  1
            0.51  0.06  1
            0.5   0.06  0.42
            0.5   0.06  0.37
            0.48  0     0
            0.47  0     0
            0.46  0     0
            0.44  0     0
        SoilCrop fababean
          layer:
            ll    kl    xf
            0.29  0.08  1
            0.29  0.08  1
            0.32  0.08  1
            0.32  0.08  1
            0.35  0.06  1
            0.38  0.04  0.42
            0.41  0.03  0.37
            0.48  0     0
            0.47  0     0
            0.46  0     0
            0.44  0     0
        SoilCrop Cotton
          layer:
            ll    kl    xf
            0.29  0.1   1
            0.29  0.1   1
            0.35  0.1   1
            0.36  0.1   1
            0.38  0.09  1
            0.39  0.07  0.42
            0.39  0.05  0.37
            0.48  0     0
            0.47  0     0
            0.46  0     0
            0.44  0     0
        SoilCrop Sorghum
          layer:
            ll    kl    xf
            0.29  0.07  1
            0.29  0.07  1
            0.35  0.07  1
            0.38  0.05  1
            0.4   0.05  1
            0.4   0.04  0.42
            0.4   0.03  0.37
            0.48  0     0
            0.47  0     0
            0.46  0     0
            0.44  0     0
        SoilCrop Mungbean
          layer:
            ll    kl    xf
            0.29  0.06  1
            0.29  0.06  1
            0.32  0.06  1
            0.32  0.04  1
            0.35  0.04  1
            0.38  0.01  0.42
            0.41  0.01  0.37
            0.48  0     0
            0.47  0     0
            0.46  0     0
            0.44  0     0
        SoilCrop sunflowr
          layer:
            ll    kl    xf
            0.29  0.1   1
            0.29  0.1   1
            0.32  0.08  1
            0.32  0.06  1
            0.35  0.04  1
            0.38  0.02  0.42
            0.41  0.01  0.37
            0.48  0     0
            0.47  0     0
            0.46  0     0
            0.44  0     0
        SoilCrop Lucerne
          layer:
            ll    kl    xf
            0.29  0.1   1
            0.29  0.1   1
            0.29  0.1   1
            0.29  0.1   1
            0.3   0.09  1
            0.31  0.09  0.42
            0.32  0.09  0.37
            0.33  0.09  0.33
            0.34  0.09  0.31
            0.35  0.09  0.31
            0.36  0.09  0.33
        SoilCrop Maize
          layer:
            ll    kl    xf
            0.29  0.06  1
            0.29  0.06  1
            0.34  0.06  1
            0.34  0.04  1
            0.37  0.04  1
            0.4   0.02  0.42
            0.42  0.01  0.37
            0.48  0     0
            0.47  0     0
            0.46  0     0
            0.44  0     0
        SoilCrop Perennial Grass
          layer:
            ll    kl    xf
            0.29  0.1   1
            0.29  0.1   1
            0.39  0.1   1
            0.41  0.1   1
            0.4   0.09  1
            0.4   0.07  0.42
            0.41  0.05  0.37
            0.41  0     0
            0.4   0     0
            0.4   0     0
            0.42  0     0
        SoilCrop Cowpea: same as Canopy Sample Simulation.paddock.No000 SampleBlackVertosol (No000).canola
        SoilCrop Navybean: same as Canopy Sample Simulation.paddock.No000 SampleBlackVertosol (No000).Mungbean
        SoilCrop Peanut: same as Canopy Sample Simulation.paddock.No000 SampleBlackVertosol (No000).Mungbean
        SoilCrop Pigeonpea
          layer:
            ll    kl    xf
            0.29  0.06  1
            0.29  0.06  1
            0.32  0.06  1
            0.32  0.05  1
            0.35  0.04  1
            0.38  0.02  0.42
            0.41  0.01  0.37
            0.48  0     0
            0.47  0     0
            0.46  0     0
            0.44  0     0
        SoilCrop Soybean: same as Canopy Sample Simulation.paddock.No000 SampleBlackVertosol (No000).canola
        SoilCrop Stylo: same as Canopy Sample Simulation.paddock.No000 SampleBlackVertosol (No000).sunflowr
        SoilCrop Sugar: same as Canopy Sample Simulation.paddock.No000 SampleBlackVertosol (No000).sunflowr
        SoilCrop Lablab: same as Canopy Sample Simulation.paddock.No000 SampleBlackVertosol (No000).sunflowr
        SoilCrop cowpea
