simulations untitled: version=8
  simulation Sample Economics Simulation
    clock
      start_date = 31/12/1940  # Select the start date of the simulation
      end_date = 31/12/1942  # Select the end date of the simulation
    summaryfile: filename=Sample Economics Simulation.sum
    metfile met: filename=c:\development\apsim\met\sample\goond.met
    area paddock
      registrations global
      manager
        rule Sowing rule
          condition start_of_day:
            ! Ask the system (economics/machinery module) whether the tractor/implement combination is available:
            if (available('tractor=t1,implement=p1')) THEN

                  if (paddock_is_fallow() = 1 and FallowIn <> 'yes' and (NextCrop = 0 or NextCrop = '[crop]')) then
                     if (date_within('[date1], [date2]') = 1) then
                        if (rain[[rainnumdays]] >= [raincrit] AND
                            esw >= [esw_amount] ) <> 0) OR
                            ('[must_sow]' = 'yes' AND today = date('[date2]'))) THEN
                           ChooseNextCrop = 'yes'   ! for rotations

                           ! When machinery 'operates', it stops them being 'available', and incurs operating costs.
                           economics operate tractor=t1, implement = p1, area = 200

                           ! incur seed costs (should be others too, eg fungicide etc)
                           economics expenditure category = seedcost, name = [crop], rate = 120 (kg/ha), area = 200 (ha)

                           [crop] sow plants =[density], sowing_depth = [depth], cultivar = [cultivar], row_spacing = [row_spacing], crop_class = [class]

                        endif
                        if today = date('[date2]') then
                           ChooseNextCrop = 'yes'
                        endif
                     endif
                  endif

            ENDIF
          category Sowing criteria
            date1 = 15-may  # Enter sowing window START date (dd-mmm)
            date2 = 10-jul  # Enter sowing window END date (dd-mmm)
            must_sow = no  # Must sow?
            raincrit = 30  # Amount of rainfall
            rainnumdays = 3  # Number of days of rainfall
            esw_amount = 200  # Enter minimum allowable available soil water (mm)
          category Sowing parameters
            crop = wheat  # Enter name of crop to sow
            density = 100  # Enter sowing density (plants/m2)
            depth = 30  # Enter sowing depth (mm)
            cultivar = hartog  # Enter cultivar
            class = plant  # Enter crop growth class
            row_spacing = 250  # Enter row spacing (mm)
        rule Harvesting rule
          condition end_of_day:
            if [crop].stage_name = 'harvest_ripe' or [crop].plant_status = 'dead' then

                          ! harvesting costs
                          economics expenditure category = contract, name = broadacre_harvesting, rate = 1, area = 200 (ha)

                          ! income
                          cropyieldTONNES = [crop].yield / 1000.0
                          if ('[crop]' = 'wheat') THEN
                              protein = [crop].grain_protein           !?may need adjustment?
                              economics income category= cropprice, name = [crop], yield = cropyieldTONNES, protein = protein, area = 200 (ha)
                          else
                              economics income category= cropprice, name = [crop], yield = cropyieldTONNES, area = 200 (ha)
                          endif

                          [crop]  harvest
                          [crop]  end_crop
            endif
          category Harvesting criteria
            crop = wheat  # Enter name of crop to harvest when ripe
        rule Sowing fertiliser
          condition [modulename].[eventname]:
            ! Fertiliser costs
                    economics expenditure category = fertilisercost, name = [fert_type_sow], rate = [fert_amount_sow], area = 200 (ha)
                    [fertmodule] apply amount = [fert_amount_sow] (kg/ha), depth = 50 (mm), type = [fert_type_sow]
          category When should fertiliser be applied
            modulename = wheat  # On which module should the event come from
            eventname = sowing  # On which event should fertiliser be applied
          category Fertiliser application details
            fertmodule = fertiliser  # Module used to apply the fertiliser
            fert_amount_sow = 150  # Amount of starter fertiliser at sowing (kg/ha)
            fert_type_sow = urea  # Sowing fertiliser type
      fertiliser
      surfaceom surface organic matter
        PoolName = wheat  # Organic Matter pool name
        type = wheat  # Organic Matter type
        mass = 1000.  # Initial surface residue (kg/ha)
        cnr = 80.0  # C:N ratio of initial residue
        standing_fraction = 0.0  # Fraction of residue standing
      wheat
      outputfile: filename=Sample Economics Simulation.out
        variables My Variables
          variables: dd/mm/yyyy as Date, wheat.biomass, wheat.yield, wheat.grain_protein, wheat.grain_size, esw
        events My Variables Events: event=wheat.harvesting
      soil Jimbour,Waco (#016): Site=Jimbour; Region=South East Queensland; LocalName=Waco; SoilType=Black Vertosol; NearestTown=Jimbour, Q 4352; NaturalVegetation=Grassland, mainly Qld bluegrass; Cona=3.5; DiffusConst=40; DiffusSlope=16; U=6; Salb=0.13; Cn2Bare=73; CnRed=20; CnCov=0.8; CnCanopyFact=1; RootCn=40; RootWt=200; SoilCn=12.5; EnrACoeff=7.4; EnrBCoeff=0.2
        InitWater
          percentmethod: percent=1; distributed=filled from top
        InitNitrogen
          profile
            layer:
              no3    nh4    thickness
              6.503  0.599  150
              2.101  0.100  150
              2.101  0.100  300
              1.701  0.100  300
              1.701  0.100  300
              1.701  0.100  300
              1.701  0.100  300
              1.701  0.100  300
              1.701  0.100  300
              1.701  0.100  300
              1.701  0.100  300
        profile
          layer:
            thickness  bd     ll15   airdry  dul    sat    sw        swcon  oc     ph     fbiom  finert  no3    nh4    ec     ll Barley  kl Barley  xf Barley  ll Chickpea  kl Chickpea  xf Chickpea  ll Lucerne  kl Lucerne  xf Lucerne  ll Maize  kl Maize  xf Maize  ll Perennial Grass  kl Perennial Grass  xf Perennial Grass  ll Sorghum  kl Sorghum  xf Sorghum  ll Wheat  kl Wheat  xf Wheat
            150        1.020  0.290  0.150   0.540  0.590  9999.990  0.300  1.040  8.400  0.025  0.400   6.500  0.600  0.200  0.290      0.100      1          0.290        0.100        1            0.290       0.100       1           0.290     0.100     1         0.290               0.100               1                   0.290       0.100       1           0.290     0.100     1
            150        1.030  0.290  0.260   0.530  0.580  9999.990  0.300  0.890  8.800  0.020  0.600   2.100  0.100  0.250  0.290      0.100      1          0.290        0.100        1            0.290       0.100       1           0.290     0.100     1         0.290               0.100               1                   0.290       0.100       1           0.290     0.100     1
            300        1.020  0.290  0.290   0.540  0.590  9999.990  0.300  0.890  9      0.015  0.800   2.100  0.100  0.310  0.320      0.080      1          0.360        0.080        1            0.290       0.100       1           0.340     0.100     1         0.390               0.100               1                   0.350       0.100       1           0.320     0.080     1
            300        1.020  0.290  0.290   0.540  0.580  9999.990  0.300  0.890  9.200  0.010  0.900   1.700  0.100  0.400  0.380      0.060      1          0.430        0.060        1            0.290       0.100       1           0.340     0.080     1         0.410               0.100               1                   0.380       0.080       1           0.320     0.060     1
            300        1.060  0.300  0.300   0.520  0.570  9999.990  0.300  0.770  9.200  0.010  0.950   1.700  0.100  0.590  0.390      0.040      1          0.510        0.040        1            0.300       0.090       1           0.370     0.060     1         0.400               0.090               1                   0.400       0.060       1           0.350     0.040     1
            300        1.110  0.310  0.310   0.500  0.550  9999.990  0.300  0.450  9.100  0.010  0.950   1.700  0.100  0.840  0.390      0.020      1          0.500        0.020        1            0.310       0.090       1           0.400     0.040     1         0.400               0.070               1                   0.400       0.040       1           0.380     0.020     1
            300        1.120  0.320  0.320   0.500  0.550  9999.990  0.300  0.270  9      0.010  0.950   1.700  0.100  0.930  0.410      0.010      1          0.500        0.010        1            0.320       0.090       1           0.420     0.020     1         0.410               0.050               1                   0.400       0.020       1           0.410     0.010     1
            300        1.150  0.330  0.330   0.480  0.530  9999.990  0.300  0.220  9      0.010  0.950   1.700  0.100  1.010  0.480      0          0          0.480        0            0            0.330       0.090       1           0.480     0         0         0.410               0                   0                   0.480       0           0           0.480     0         0
            300        1.180  0.340  0.340   0.470  0.520  9999.990  0.300  0.160  8.900  0.010  0.950   1.700  0.100  1.060  0.470      0          0          0.470        0            0            0.340       0.090       1           0.470     0         0         0.400               0                   0                   0.470       0           0           0.470     0         0
            300        1.200  0.350  0.350   0.460  0.510  9999.990  0.300  0.130  8.900  0.010  0.950   1.700  0.100  1.050  0.460      0          0          0.460        0            0            0.350       0.090       1           0.460     0         0         0.400               0                   0                   0.460       0           0           0.460     0         0
            300        1.250  0.360  0.360   0.440  0.490  9999.990  0.300  0.120  8.900  0.010  0.950   1.700  0.100  1.010  0.440      0          0          0.440        0            0            0.360       0.090       1           0.440     0         0         0.420               0                   0                   0.440       0           0           0.440     0         0
      tclgroup Economics
        initscript:
          source $apsuite/apsim/Economics/lib/Cashbook.tcl
          source $apsuite/apsim/Economics/lib/Machinery.tcl
        tclui Initial Capital Assets: uiscript=source $apsuite/apsim/Economics/lib/CapitalUI.tcl; category=icapital
          icapital: ivalue=400000.0; loanRate=6.0; loanDuration=5
        tclui Cash Journal: uiscript=source $apsuite/apsim/Economics/lib/CashbookUI.tcl; balance=42000; outputfilename=cashbook.csv
        tclui Machinery - 200kwFWA: uiscript=source $apsuite/apsim/Economics/lib/MachineryUI.tcl; category=tractor
          tractor t1: fuelrate (lts/hour)=[25.0, 60.0]; workrate (ha/hour)=[100.0, 500.0]; workrate=[100.0, 20, 10]; fuelrate=[40.0, 15, 10]; hoursperday=[8, 8]; newPrice=100000; tradeInValue=10000; lifeOfEquipment=3000; insuranceRate=6.2; repairs=30; oil=10; loanInterestRate=4.5; loanDuration=5; age=2
            image:
              IAQEDBBaQAgIADs=
        tclui Machinery - Precision Planter: uiscript=source $apsuite/apsim/Economics/lib/MachineryUI.tcl; category=implement
          implement p1: newPrice=20000; tradeInValue=2000; lifeOfEquipment=1500; insuranceRate=2.3; repairs=30; oil=0; loanInterestRate=4.5; loanDuration=4; age=200
            image:

        tclui Machinery - Plough: uiscript=source $apsuite/apsim/Economics/lib/MachineryUI.tcl; category=implement
          implement p2: same as Sample Economics Simulation.paddock.Economics.Machinery - Precision Planter.p1
        tclui Prices: uiscript=source $apsuite/apsim/Economics/lib/PricesUI.tcl; category=cropprice
          cropprice wheat: desc=Wheat; units=$/tonne; price=145.0 160.0 170.0 180.0 185.0; protein=9.5 10.0 12.0 13.0 14.0; updated=27/10/2006
          cropprice sorghum: desc=Sorghum; units=$/tonne; price=120.0; updated=27/10/2006
        tclui Costs - Farm Overheads: uiscript=source $apsuite/apsim/Economics/lib/OverheadsUI.tcl; category Overhead Expenses=overhead
          overhead accountancy: description=Accountant/Consultancy fees; value=5000
          overhead administration: description=Administration; value=500
          overhead bankcharges: description=Bank Charges other than interest; value=500
          overhead electricity: description=Electricity - Farm; value=2000
          overhead freight: description=Freight & Cartage (sundry); value=0
          overhead fuels: description=Fuel & Oil (other than farming); value=10000
          overhead insurance: description=Insurance - Farm; value=6000
          overhead vehicleexpenses: description=Motor Vehicle Expenses - Farm; value=5000
          overhead rates: description=Rates and Rents - Farm; value=3500
          overhead repairs: description=Repairs & Maintenance (extra); value=20000
          overhead subs: description=Subscriptions; value=1000
          overhead telephone: description=Telephone - Farm; value=2500
          overhead wages: description=Wages (other than casual included in activity budgets); value=30000
          overhead other: description=Other Overhead Expenses; value=0
          overhead operator: description=Operators labour and management; value=50000
        tclui Costs - Fuel: uiscript=source $apsuite/apsim/Economics/lib/TreatmentsUI.tcl; category=fuelcosts
          fuelcosts: desc=Cost of fuel (net); price=1.205; units=$/litre; updated=20/12/2005
        tclui Costs - Fertilisers: uiscript=source $apsuite/apsim/Economics/lib/TreatmentsUI.tcl; category=fertilisercost
          fertilisercost big_n: desc=Big n (82n); price=0.61; units=$/kg
          fertilisercost ck700: desc=CK700 (32.3n;5.1p;18.9s); price=0.52; units=$/kg; updated=30/03/2004
          fertilisercost ck1: desc=CK1 (14.6p;14.5k;1s;10.6ca); price=0.52; units=$/kg; updated=30/03/2004
          fertilisercost ck600s: desc=CK600s (17.9n;5.1p;18.9s); price=0.52; units=$/kg; updated=30/03/2004
          fertilisercost dap: desc=DAP (18n;20p); price=0.48; units=$/kg; updated=30/03/2004
          fertilisercost granam: desc=granam (20.2n;24s); price=0.48; units=$/kg; updated=30/03/2004
          fertilisercost granulock: desc=granulock (starter z - 10.5n;19.5p;2.2s); price=0.62; units=$/kg; updated=30/03/2004
          fertilisercost gypsum: desc=Gypsum (14.5s;18.5ca); price=0.07; units=$/kg; updated=30/03/2004
          fertilisercost lime: desc=Lime (Ca); price=0.05; units=$/kg; updated=30/03/2004
          fertilisercost map: desc=MAP (starterphos - 10n;21.9p;1.5s); price=0.52; units=$/kg; updated=30/03/2004
          fertilisercost mop: desc=Muriate of Potash (mop - 50k); price=0.51; units=$/kg; updated=30/03/2004
          fertilisercost nitram: desc=nitram (34N); price=0.71; units=$/kg; updated=30/03/2004
          fertilisercost nitram_and_sulphur: desc=Nitram and Sulphur; price=0.13; units=$/kg
          fertilisercost phosul: desc=Phosul; price=0.57; units=$/kg
          fertilisercost potassium_nitrate: desc=potassium nitrate (13n;38.3k); price=0.95; units=$/kg; updated=30/03/2004
          fertilisercost solubor: desc=solubor (20.5b); price=3.83; units=$/kg; updated=30/03/2004
          fertilisercost starter_z: desc=starter z; price=0.62; units=$/kg; updated=30/03/2004
          fertilisercost starterphos: desc=starterphos (10n;21.9p;1.5s); price=0.48; units=$/kg; updated=30/03/2004
          fertilisercost sulphate_of_potash: desc=sulphate of potash (41K;18S); price=0.69; updated=30/03/2004
          fertilisercost supazinc: desc=Supazinc (7.5Zn); price=4.82; updated=30/03/2004
          fertilisercost superphosphate: desc=Superphosphate (8.8P;11S;20Ca); price=0.34; updated=30/03/2004
          fertilisercost tech_feed: desc=tech feed; price=0.58; updated=needs to be specific
          fertilisercost urea: desc=Urea (46N); price=0.5; updated=30/03/2004
          fertilisercost zinc_sulphate_heptahydrate: desc=zinc sulphate heptahydrate; price=0.72; updated=30/03/2004
          fertilisercost zinc sulphate monohydrate: desc=zinc sulphate monohydrate (35Zn;17.2S); price=1.12; updated=30/03/2004
          fertilisercost ammonium_sulphate: desc=Ammonium Sulphate; price=0.5
        tclui Costs - Herbicides: uiscript=source $apsuite/apsim/Economics/lib/TreatmentsUI.tcl; category=herbicide
          herbicide Achieve: desc=Achieve; price=87.82; updated=29/03/2004
          herbicide Ally: desc=Ally (metsulfuron); price ($ per kg or per litre)=0.2; updated=30/03/2004
          herbicide Amicide625: desc=Amicide 625; price ($ per kg or per litre)=500
          herbicide Avadex Xtra: desc=Avadex Xtra (tri-allate); price ($ per kg or per litre)=14.29
          herbicide Basagran: desc=Basagran (bentazone); price ($ per kg or per litre)=34.27; updated=30/03/2004
          herbicide Blazer 2L: desc=Blazer 2L (acifluorfen); price ($ per kg or per litre)=43.45; updated=30/03/2004
          herbicide Broadstrike: desc=Broadstrike (flumetsulam); price ($ per kg or per litre)=0.65; updated=30/03/2004
          herbicide Bromicide_MA: desc=Bromicide MA (bromicide + MCPA); price ($ per kg or per litre)=13.95
          herbicide Buticide: desc=Buticide; price ($ per kg or per litre)=500
          herbicide Cotogard: desc=Cotogard (flurometuron + prometryn); price ($ per kg or per litre)=12.32; updated=30/03/2004
          herbicide Cotoran: desc=Cotoran (flurometuron); price ($ per kg or per litre)=12.3
          herbicide Diuron: desc=Diuron; price ($ per kg or per litre)=8.5
          herbicide Dual Gold: desc=Dual Gold (metolachlor); price ($ per kg or per litre)=32.23; updated=30/03/2004
          herbicide Eclipse: desc=Eclipse (metosulam); price ($ per kg or per litre)=1.19
          herbicide Eptam: desc=Eptam (EPTC); price ($ per kg or per litre)=23.9
          herbicide Flame: desc=Flame (imazipac); price ($ per kg or per litre)=142.77; updated=30/03/2004
          herbicide Fusilade: desc=Fusilade (fluazifop-p); price ($ per kg or per litre)=69.27; updated=30/03/2004
          herbicide Garlon 600: desc=Garlon 600 (triclopyr); price ($ per kg or per litre)=50.91; updated=30/03/2004
          herbicide Gesagard 500SC: desc=Gesagard 500SC (prometryn); price ($ per kg or per litre)=14.23; updated=30/03/2004
          herbicide Gesaprim: desc=Gesaprim (atrazine); price ($ per kg or per litre)=6.23; updated=30/03/2004
          herbicide Glean: desc=Glean (chlorsulfuron); price ($ per kg or per litre)=0.18
          herbicide Glyphosate 450 CT: desc=Glyphosate 450 CT (glyphosate IPA salt); price ($ per kg or per litre)=4.64; updated=30/03/2004
          herbicide Gramoxone 250: desc=Gramoxone 250 (paraquat); price ($ per kg or per litre)=9.68; updated=30/03/2004
          herbicide Harmony M: desc=Harmony M (thifensulfuron-methyl + metsulfuron-methyl); price ($ per kg or per litre)=0.38; updated=30/03/2004
          herbicide Jaguar: desc=Jaguar (bromoxynil + diflufenican); price ($ per kg or per litre)=31.2
          herbicide Kamba 500: desc=Kamba 500 (Dicamba); price ($ per kg or per litre)=39; updated=3/06/2004
          herbicide Kamba M: desc=Kamba M (MCPA + dicamba); price ($ per kg or per litre)=10.4; updated=30/03/2004
          herbicide MCPA LVE: desc=MCPA LVE (MCPA ester); price ($ per kg or per litre)=10.4; updated=30/03/2004
          herbicide Primextra Gold: desc=Primextra Gold (metolachlor + atrazine); price ($ per kg or per litre)=14.64; updated=30/03/2004
          herbicide Promo-mix: desc=Promo-mix (fluometuron + prometryn); price ($ per kg or per litre)=11.75; updated=20/12/2002
          herbicide Reglone: desc=Reglone (diquat); price ($ per kg or per litre)=18.72; updated=30/03/2004
          herbicide Roundup POWERMAX: desc=Roundup POWERMAX (glyphosate MEA salt); price ($ per kg or per litre)=7.64; updated=30/03/2004
          herbicide Select: desc=Select (clethodim); price ($ per kg or per litre)=84.5; updated=20/12/2002
          herbicide Simazine 900DF: desc=Simazine 900DF (simazine); price ($ per kg or per litre)=9.93; updated=20/12/2002
          herbicide Simazine Flowable: desc=Simazine Flowable (simazine); price ($ per kg or per litre)=5.65; updated=20/12/2002
          herbicide Spinnaker 700 WDG: desc=Spinnaker 700 WDG (imazethapyr); price ($ per kg or per litre)=34.74; updated=30/03/2004
          herbicide Sprayseed: desc=Sprayseed (paraquat + diquat); price ($ per kg or per litre)=10.32; updated=30/03/2004
          herbicide Starane: desc=Starane (fluroxypyr); price ($ per kg or per litre)=21.5; updated=30/03/2004
          herbicide Stomp XTRA: desc=Stomp XTRA (pendimethalin); price ($ per kg or per litre)=11.41; updated=30/03/2004
          herbicide Striker: desc=Striker (diuron); price ($ per kg or per litre)=43.6
          herbicide Surpass 300: desc=Surpass 300
          herbicide Tigrex: desc=Tigrex (MCPA + diflufenican); price ($ per kg or per litre)=21.95
          herbicide Topik: desc=Topik (clodinafop + cloquintocet); price ($ per kg or per litre)=400; updated=30/03/2004
          herbicide Tordon 242: desc=Tordon 242 (MCPA + picloram); price ($ per kg or per litre)=16.82; updated=30/03/2004
          herbicide Tordon 75D: desc=Tordon 75D; price ($ per kg or per litre)=300 g/L + 75 g/L
          herbicide Trifluralin 480: desc=Trifluralin 480 (trifluralin); price ($ per kg or per litre)=7.82; updated=30/03/2004
          herbicide Verdict 520: desc=Verdict 520 (haloxyfop); price ($ per kg or per litre)=240; updated=30/03/2004
          herbicide Wildcat: desc=Wildcat; price ($ per kg or per litre)=78.6; updated=20/12/2002
          herbicide S-metolachlor: desc=S-metolachlor; price ($ per kg or per litre)=32.14; updated=20/12/2002
          herbicide Treflan: desc=Treflan (Triflur 480); price ($ per kg or per litre)=8.6; updated=3/06/2004
          herbicide Express: desc=Express; price ($ per kg or per litre)=0.48; updated=3/06/2004
        tclui Costs - Fungicides: uiscript=source $apsuite/apsim/Economics/lib/TreatmentsUI.tcl; category=fungicide
          fungicide Alto 100SL: desc=Alto 100SL (cyproconazole); price ($ per kg or per litre)=116.9; updated=30/03/2004
          fungicide Dithane: desc=Dithane (mancozeb); price ($ per kg or per litre)=7.25; updated=30/03/2004
          fungicide Elect 720: desc=Elect 720 (chlorothalonil); qty (kg bag/drum)=chlorothalonil; price ($ per kg or per litre)=18.83; updated=30/03/2004
          fungicide Folicur 430 SC: desc=Folicur 430 SC; qty (kg bag/drum)=tebuconazole; price ($ per kg or per litre)=94; updated=30/03/2004
          fungicide Fortress 500: desc=Fortress 500 (procymidone); price ($ per kg or per litre)=67; updated=20/12/2002
          fungicide Rover: desc=Rover; price ($ per kg or per litre)=14.75; updated=20/12/2002
          fungicide Rovral Aquaflo: desc=Rovral Aquaflo (iprodione); price ($ per kg or per litre)=55.82; updated=20/12/2002
          fungicide Wettable Sulphur: desc=Wettable Sulphur; price ($ per kg or per litre)=2.16; updated=30/03/2004
        tclui Costs - Insecticides: uiscript=source $apsuite/apsim/Economics/lib/TreatmentsUI.tcl; category=insecticide
          insecticide Amino-feed: desc=Amino-feed; price ($ per kg or per litre)=3.91; updated=30/03/2004
          insecticide Amitraz EC: desc=Amitraz EC (amitraz); price ($ per kg or per litre)=14.27; updated=20/12/2002
          insecticide Cosmos: desc=Cosmos (fipronil); price ($ per kg or per litre)=687.27; updated=30/03/2004
          insecticide Curacron Pro: desc=Curacron Pro (profenofos); price ($ per kg or per litre)=27; updated=20/12/2002
          insecticide Decis Options: desc=Decis Options (deltamethrin); price ($ per kg or per litre)=26.5; updated=30/03/2004
          insecticide Dimethoate: desc=Dimethoate; price ($ per kg or per litre)=7.36; updated=30/03/2004
          insecticide Dipel: desc=Dipel (Bt); price ($ per kg or per litre)=6.23; updated=30/03/2004
          insecticide Dipel: desc=Dipel (Strain HD-1); price ($ per kg or per litre)=66; updated=20/12/2002
          insecticide Dominex 100 EC: desc=Dominex 100 EC (alpha cypermethrin); price ($ per kg or per litre)=19.5; updated=20/12/2002
          insecticide Dominex Duo: desc=Dominex Duo (alpha cypermethrin); price ($ per kg or per litre)=22; updated=20/12/2002
          insecticide Elect 760: desc=Elect 760; price ($ per kg or per litre)=24; updated=20/12/2002
          insecticide Emamectin: desc=Emamectin; price ($ per kg or per litre)=102.92; updated=20/12/2002
          insecticide Endosulfan EC: desc=Endosulfan EC; qty (kg bag/drum)=endosulfan; price ($ per kg or per litre)=10.23; updated=30/03/2004
          insecticide Ethion + Zeta-cypermethrin: desc=Ethion + Zeta-cypermethrin; price ($ per kg or per litre)=18.41; updated=20/12/2002
          insecticide Fastac Duo: desc=Fastac Duo (alpha cypermethrin); price ($ per kg or per litre)=6; updated=20/12/2002
          insecticide Fenitrothion: desc=Fenitrothion 1000; qty (kg bag/drum)=fenitrothion; price ($ per kg or per litre)=30; updated=30/03/2004
          insecticide L Marlin: desc=L Marlin (methomyl); price ($ per kg or per litre)=10.95; updated=30/03/2004
          insecticide Larvin 375: desc=Larvin 375 (thiodicarb); price ($ per kg or per litre)=25.68; updated=30/03/2004
          insecticide Larvin LV: desc=Larvin LV; price ($ per kg or per litre)=17.97
          insecticide Lorsban 500 EC: desc=Lorsban 500 EC (chlorpyrifos); price ($ per kg or per litre)=9.77; updated=30/03/2004
          insecticide Lorsban 750WG: desc=Lorsban 750WG (chlorpyrifos); price ($ per kg or per litre)=65
          insecticide NPV Gemstar/Vivus: desc=NPV Gemstar/Vivus; price ($ per kg or per litre)=66.9
          insecticide PBO: desc=PBO (piperonyl butoxide); price ($ per kg or per litre)=30; updated=30/03/2004
          insecticide Phostoxin tablets: desc=Phostoxin tablets (aluminium phosphide); qty (kg bag/drum)=aluminium phosphide; price ($ per kg or per litre)=0.15; updated=30/03/2004
          insecticide Predator 300: desc=Predator 300 (chlorpyrifos); price ($ per kg or per litre)=11; updated=30/03/2004
          insecticide Regent: desc=Regent (fipronil); price ($ per kg or per litre)=360; updated=30/03/2004
          insecticide Sabre EC: desc=Sabre EC )(profenofos); price ($ per kg or per litre)=14
          insecticide Semevin: desc=Semevin (thiodicarb); price ($ per kg or per litre)=67
          insecticide Steward: desc=Steward (indoxacarb); price ($ per kg or per litre)=85.36; updated=30/03/2004
          insecticide Talstar EC: desc=Talstar EC (bifenthrin); price ($ per kg or per litre)=49.04; updated=30/03/2004
          insecticide Thidiazuron: desc=Thidiazuron
          insecticide Tracer: desc=Tracer (spinosad); price ($ per kg or per litre)=76.5; updated=30/03/2004
          insecticide Thidiazuron: desc=Thidiazuron
          insecticide Tracer: desc=Tracer (spinosad); price ($ per kg or per litre)=91.75
        tclui Costs - Seed: uiscript=source $apsuite/apsim/Economics/lib/TreatmentsUI.tcl; category=seedcost
          seedcost Barley: desc=Barley (Tallon); price ($ per kg or per litre)=0.78; updated=30/03/2004
          seedcost Chickpea: desc=Chickpea (Jimbour); price ($ per kg or per litre)=1.51; updated=30/03/2004
          seedcost Cotton: desc=Cotton; price ($ per kg or per litre)=5.6; updated=30/03/2004
          seedcost Forage Sorghum: desc=Forage Sorghum (Jumbo); price ($ per kg or per litre)=3.96; updated=30/03/2004
          seedcost Lucerne: desc=Lucerne (sequel); price ($ per kg or per litre)=5.45; updated=30/03/2004
          seedcost Maize: desc=Maize P3237; price ($ per kg or per litre)=6.51; updated=30/03/2004
          seedcost Millet: desc=Millet (White frend); price ($ per kg or per litre)=1; updated=30/03/2004
          seedcost Mungbean: desc=Mungbean (Emerald); price ($ per kg or per litre)=1.45; updated=30/03/2004
          seedcost NavyBean: desc=Navy Bean (Spearfeld); qty (kg bag/drum)=Spearfeld; price ($ per kg or per litre)=1.49; updated=30/03/2004
          seedcost PeanutC: desc=Peanut Streeton (20-23 weeks); price ($ per kg or per litre)=2.91; updated=30/03/2004
          seedcost PeanutS: desc=Peanut Conder (17-19 weeks); price ($ per kg or per litre)=2.7; updated=30/03/2004
          seedcost PeanutVB: desc=Peanut VB97 (20-23 weeks); price ($ per kg or per litre)=2.7; updated=30/03/2004
          seedcost PeanutNC7: desc=Peanut NC7 (20-23 weeks); price ($ per kg or per litre)=2.7; updated=30/03/2004
          seedcost Sorghum: desc=Sorghum (Buster); price ($ per kg or per litre)=5.82; updated=30/03/2004
          seedcost Soybean: desc=Soybean (Soya791); price ($ per kg or per litre)=1.31; updated=30/03/2004
          seedcost Sunflower: desc=Sunflower (Sunolei 04); price ($ per kg or per litre)=11.82; updated=30/03/2004
          seedcost Wheat: desc=Wheat (Kennedy); price ($ per kg or per litre)=0.73; updated=30/03/2004
        tclui Costs - Defoliants: uiscript=source $apsuite/apsim/Economics/lib/TreatmentsUI.tcl; category=defoliant
          defoliant dropp: desc=dropp (thidiazuron + diuron); price=147; units=kg
          defoliant salt defoliant: desc=Salt Defoliant; price=1.55; units=kg
        tclui Costs - Contractors: uiscript=source $apsuite/apsim/Economics/lib/TreatmentsUI.tcl; category=contract
          contract aerial_spraying: desc=aerial spraying - broadacre; price=12.5; units=$/ha; updated=20/12/2002
          contract aerial_spraying_cotton_ec: desc=aerial spraying-cotton ec; price=12.5; units=$/ha; updated=20/12/2002
          contract aerial spraying-cotton ulv: desc=aerial_spraying_cotton_ulv; price=9.5; units=$/ha
          contract broadacre_harvesting: desc=Broadacre Harvesting; price=250; units=$/ha
          contract chickpea_scouting: desc=chickpea scouting; price=10; units=$/ha; updated=20/12/2002
          contract cotton_casual_labour: desc=Cotton casual labour; price=80; units=$/ha
          contract peanut_chipping: desc=peanut chipping; price=40; units=$/ha; updated=30/05/2004
          contract cotton_consultant: desc=cotton consultant; price=35; units=$/ha
          contract cotton_crop_insurance: desc=cotton crop insurance; price=30; units=$/ha
          contract cotton_harvesting_double_skip: desc=Cotton harvesting double skip; price=41.67; units=$170 / hr at 1.36 ha / hour @ 3 bales/ha
          contract heavy_offsets: desc=heavy offsets - contract; price=0; units=$/ha
          contract light_chisel_plough: desc=light chisel plough - contract; price=0; units=$/ha
          contract light_offsets: desc=light offsets - contract; price=0; units=$/ha
          contract peanut_scouting: desc=peanut scouting; price=45; units=$/ha
          contract Cotton eliminator: desc=cotton_eliminator; price=22; units=$/bale
          contract cotton_harvest_solid_nsw: desc=Cotton harvest solid nsw; price=280; units=$/ha
          contract gypsum_spread: desc=gypsum spread on farm; price=72.72; units=$/ha; updated=30/05/2004
          contract lime_spread: desc=lime spread on farm; price=50; units=$/ha; updated=30/05/2004
          contract high clearance spray rig: desc=high clearance spray rig; price=10; units=$/ha
