folder Simulations: version=15
  simulation Rice Simulation
    metfile met: filename=%apsuite\apsim\oryza\sample\DarlingtonPoint.met
    clock
      start_date = 1/10/1990  # Select the start date of the simulation
      end_date = 28/03/1991  # Select the end date of the simulation
    summaryfile: filename=Blank Simulation.sum
    area paddock
      registrations global
      folder Manager folder
        manager Rice sowing rule
          on start_of_day:
```
if (day = 288) then
  rice sow cultivar = experimental, establishment_section = direct-seed
endif
```
          on end_of_day:
```
if (rice.plant_status = 'dead') then
  rice end_crop
endif
```
      micromet
        soilalbedo = 0.23
        a_interception = 0
        b_interception = 0
        c_interception = 0
        d_interception = 0
      irrigation
        automatic_irrigation = on
        asw_depth = 600  # Depth to which ASW is calculated. (mm)
        crit_fr_asw = 0.5  # Fraction of ASW below which irrigation is applied (0-1.0)
        irrigation_efficiency = 1  # Efficiency of the irrigation. (0-1.0)
        default_no3_conc = 0.0  # Nitrate concentration (ppm N)
        default_nh4_conc = 0.0  # Ammonium concentration (ppm N)
        default_cl_conc = 0.0  # Chloride concentration (ppm Cl)
      soil: state=Queensland; region=South East Queensland; nearesttown=Generic; site=Generic; SoilType=Black Vertosol; Latitude=999999; Longitude=999999; LocationAccuracy=Regional Soil Type; comment=estimated cotton LL; SummerCona=3.5; WinterCona=2.5; SummerU=6; WinterU=4; SummerDate=1-Nov; WinterDate=1-apr; Salb=0.12; DiffusConst=40; DiffusSlope=16; CN2Bare=73; CNRed=20; CNCov=0.8; RootCN=40; RootWT=1000; SoilCN=12; EnrACoeff=7.4; EnrBCoeff=0.2
        profile
          layer:
            thickness  bd    ll15  airdry  dul   sat   swcon  fbiom  finert  oc    ec   ph   ll wheat  kl wheat  xf wheat  ll barley  kl barley  xf barley  ll canola  kl canola  xf canola  ll chickpea  kl chickpea  xf chickpea  ll cotton  kl cotton  xf cotton  ll sorghum  kl sorghum  xf sorghum  ll mungbean  kl mungbean  xf mungbean  ll sunflower  kl sunflower  xf sunflower  ll fababean  kl fababean  xf fababean  ll lucerne  kl lucerne  xf lucerne  ll maize  kl maize  xf maize  ll perennial grass  kl perennial grass  xf perennial grass  ll cowpea  kl cowpea  xf cowpea  ll navybean  kl navybean  xf navybean  ll peanut  kl peanut  xf peanut  ll pigeonpea  kl pigeonpea  xf pigeonpea  ll soybean  kl soybean  xf soybean  ll stylo  kl stylo  xf stylo  ll sugar  kl sugar  xf sugar  ll lablab  kl lablab  xf lablab
            150        1.02  0.29  0.145   0.54  0.59  0.3    0.04   0.4     1.04  0.2  8.4  0.29      0.06      1         0.29       0.07       1          0.29       0.06       1          0.29         0.06         1            0.29       0.1        1          0.29        0.07        1           0.29         0.06         1            0.29          0.1           1             0.29         0.08         1            0.29        0.1         1           0.29      0.06      1         0.29                0.1                 1                   0.29       0.06       1          0.29         0.06         1            0.29       0.06       1          0.29          0.06          1             0.29        0.06        1           0.29      0.1       1         0.29      0.1       1         0.29       0.1        1
            150        1.03  0.29  0.232   0.53  0.58  0.3    0.02   0.6     0.89  0.3  8.8  0.29      0.06      1         0.29       0.07       1          0.29       0.06       1          0.29         0.06         1            0.29       0.1        1          0.29        0.07        1           0.29         0.06         1            0.29          0.1           1             0.29         0.08         1            0.29        0.1         1           0.29      0.06      1         0.29                0.1                 1                   0.29       0.06       1          0.29         0.06         1            0.29       0.06       1          0.29          0.06          1             0.29        0.06        1           0.29      0.1       1         0.29      0.1       1         0.29       0.1        1
            300        1.02  0.29  0.29    0.54  0.59  0.3    0.02   0.8     0.89  0.3  9    0.32      0.06      1         0.32       0.07       1          0.32       0.06       1          0.36         0.06         1            0.35       0.1        1          0.35        0.07        1           0.32         0.06         1            0.32          0.08          1             0.32         0.08         1            0.29        0.1         1           0.34      0.06      1         0.39                0.1                 1                   0.32       0.06       1          0.32         0.06         1            0.32       0.06       1          0.32          0.06          1             0.32        0.06        1           0.32      0.08      1         0.32      0.08      1         0.32       0.08       1
            300        1.02  0.29  0.29    0.54  0.58  0.3    0.02   1       0.89  0.4  9.2  0.32      0.04      1         0.38       0.05       1          0.32       0.04       1          0.43         0.06         1            0.36       0.1        1          0.38        0.05        1           0.32         0.04         1            0.32          0.06          1             0.32         0.08         1            0.29        0.1         1           0.34      0.04      1         0.41                0.1                 1                   0.32       0.04       1          0.32         0.04         1            0.32       0.04       1          0.32          0.05          1             0.32        0.04        1           0.32      0.06      1         0.32      0.06      1         0.32       0.06       1
            300        1.06  0.29  0.29    0.52  0.57  0.3    0.01   1       0.77  0.6  9.2  0.35      0.04      1         0.39       0.05       1          0.35       0.04       1          0.51         0.06         1            0.38       0.09       1          0.4         0.05        1           0.35         0.04         1            0.35          0.04          1             0.35         0.06         1            0.3         0.09        1           0.37      0.04      1         0.4                 0.09                1                   0.35       0.04       1          0.35         0.04         1            0.35       0.04       1          0.35          0.04          1             0.35        0.04        1           0.35      0.04      1         0.35      0.04      1         0.35       0.04       1
            300        1.11  0.29  0.29    0.5   0.55  0.3    0.01   1       0.45  0.8  9.1  0.38      0.02      0.42      0.39       0.03       0.42       0.38       0.02       0.42       0.5          0.06         0.42         0.39       0.07       0.42       0.4         0.04        0.42        0.38         0.01         0.42         0.38          0.02          0.42          0.38         0.04         0.42         0.31        0.09        0.42        0.4       0.02      0.42      0.4                 0.07                0.42                0.38       0.02       0.42       0.38         0.01         0.42         0.38       0.01       0.42       0.38          0.02          0.42          0.38        0.02        0.42        0.38      0.02      0.42      0.38      0.02      0.42      0.38       0.02       0.42
            300        1.12  0.29  0.29    0.5   0.55  0.3    0.01   1       0.27  0.9  9    0.41      0.02      0.37      0.41       0.02       0.37       0.41       0.01       0.37       0.5          0.06         0.37         0.39       0.05       0.37       0.4         0.03        0.37        0.41         0.01         0.37         0.41          0.01          0.37          0.41         0.03         0.37         0.32        0.09        0.37        0.42      0.01      0.37      0.41                0.05                0.37                0.41       0.01       0.37       0.41         0.01         0.37         0.41       0.01       0.37       0.41          0.01          0.37          0.41        0.01        0.37        0.41      0.01      0.37      0.41      0.01      0.37      0.41       0.01       0.37
            300        1.15  0.29  0.29    0.48  0.53  0.3    0.01   1       0.22  1    9    0.48      0         0         0.48       0          0          0.48       0          0          0.48         0            0            0.48       0          0          0.48        0           0           0.48         0            0            0.48          0             0             0.48         0            0            0.33        0.09        0.33        0.48      0         0         0.41                0                   0                   0.48       0          0          0.48         0            0            0.48       0          0          0.48          0             0             0.48        0           0           0.48      0         0         0.48      0         0         0.48       0          0
            300        1.18  0.29  0.29    0.47  0.52  0.3    0.01   1       0.16  1.1  8.9  0.47      0         0         0.47       0          0          0.47       0          0          0.47         0            0            0.47       0          0          0.47        0           0           0.47         0            0            0.47          0             0             0.47         0            0            0.34        0.09        0.31        0.47      0         0         0.4                 0                   0                   0.47       0          0          0.47         0            0            0.47       0          0          0.47          0             0             0.47        0           0           0.47      0         0         0.47      0         0         0.47       0          0
            300        1.2   0.29  0.29    0.46  0.51  0.3    0.01   1       0.13  1.1  8.9  0.46      0         0         0.46       0          0          0.46       0          0          0.46         0            0            0.46       0          0          0.46        0           0           0.46         0            0            0.46          0             0             0.46         0            0            0.35        0.09        0.31        0.46      0         0         0.4                 0                   0                   0.46       0          0          0.46         0            0            0.46       0          0          0.46          0             0             0.46        0           0           0.46      0         0         0.46      0         0         0.46       0          0
            300        1.25  0.29  0.29    0.44  0.49  0.3    0.01   1       0.12  1    8.9  0.44      0         0         0.44       0          0          0.44       0          0          0.44         0            0            0.44       0          0          0.44        0           0           0.44         0            0            0.44          0             0             0.44         0            0            0.36        0.09        0.33        0.44      0         0         0.42                0                   0                   0.44       0          0          0.44         0            0            0.44       0          0          0.44          0             0             0.44        0           0           0.44      0         0         0.44      0         0         0.44       0          0
        InitWater
          percentmethod: percent=1; distributed=filled from top
        InitNitrogen
          profile
            layer:
              no3    nh4       thickness
              6.503  0.599004  150
              2.101  0.100001  150
              2.101  0.100001  300
              1.701  0.100001  300
              1.701  0.100001  300
              1.701  0.100001  300
              1.701  0.100001  300
              1.701  0.100001  300
              1.701  0.100001  300
              1.701  0.100001  300
              1.701  0.100001  300
      rice
        estab = transplant
        sbdur = 50
        nplh = 10
        nh = 2
        nplsb = 100
        nplds = 180
        eo_source = eo
      outputfile
        variables
          variables: dd/mm/yyyy as Date, ancr, anlv, anso, cover_green, cover_tot, crop_type, cropsta, dae, dtga, dvr, dvs, eff, etae, etd, etrd, fnlv, gcr, height, hu, ldstrs, lestrs, lrstrs, nacr, nflv, pcew, plant_status, rlai, rnstrs, ssga, tnsoil, trc, wagt, wlvd, wlvg, wso, wst, zrt
        events Reporting Frequency: event=Daily
        SplitReport XY Chart
