folder HE2: version=13
  folder shared
    events My Variables Events
    soil HRS: Site=HRS; Region=SE Queensland; LocalName=HRS; SoilType=HMM; NearestTown=Unknown; NaturalVegetation=Unknown; Cona=6.5; DiffusConst=40; DiffusSlope=16; U=1.5; Salb=0.2; Cn2Bare=85; CnRed=20; CnCov=0.8; CnCanopyFact=0.8; RootCn=50; RootWt=1000; SoilCn=12.5; EnrACoeff=7.4; EnrBCoeff=0.2
      profile
        layer:
          thickness  bd     ll15   airdry  dul    sat    sw     swcon  oc     ph     fbiom  finert  ll Sorghum  kl Sorghum  xf Sorghum
          100        1.340  0.226  0.080   0.420  0.450  0.286  0.300  1.190  6.300  0.050  0.450   0.226       0.070       1
          100        1.340  0.226  0.190   0.420  0.450  0.331  0.300  0.590  6.400  0.020  0.600   0.226       0.070       1
          200        1.330  0.258  0.230   0.460  0.470  0.403  0.300  0.450  6.500  0.010  0.750   0.258       0.070       1
          200        1.380  0.270  0.260   0.460  0.470  0.382  0.300  0.300  6.600  0.010  0.900   0.270       0.070       1
          200        1.400  0.268  0.260   0.430  0.450  0.315  0.300  0.200  6.600  0.010  0.900   0.268       0.060       1
          200        1.550  0.304  0.280   0.400  0.410  0.307  0.300  0.160  6.500  0.010  0.900   0.304       0.060       1
          200        1.590  0.335  0.250   0.370  0.380  0.313  0.300  0.170  6.500  0.010  0.900   0.335       0.060       1
          200        1.630  0.330  0.280   0.330  0.370  0.312  0.300  0.170  6.500  0.050  0.900   0.330       0.050       1
          200        1.660  0.320  0.300   0.320  0.370  0.329  0.300  0.170  6.500  0.020  0.900   0.320       0.050       1
          200        1.680  0.330  0.310   0.330  0.360  0.326  0.300  0.170  6.500  0.010  0.900   0.330       0.040       1
      InitWater
        profile
          layer:
            sw     thickness
            0.235  100
            0.252  100
            0.270  200
            0.300  200
            0.268  200
            0.304  200
            0.335  200
            0.330  200
            0.320  200
            0.330  200
      InitNitrogen
        profile
          layer:
            no3    nh4    thickness
            0.100  0.100  100
            0.026  0.100  100
            0.050  0.100  200
            0.058  0.100  200
            0.037  0.100  200
            0.187  0.100  200
            0.512  0.100  200
            0.762  0.100  200
            0.719  0.100  200
            0.700  0.100  200
    Sorghum
      sorghumConstants standard
        crop_type = sorghum
        default_crop_class = plant
        stage_names = sowing germination emergence end_of_juvenile floral_initiation flag_leaf flowering start_grain_fill end_grain_fill maturity harvest_ripe end_crop
        stage_code = 1   2   3    4      5     6     7    8    9    10   11   12
        pesw_germ = 0
        shoot_lag = 15
        shoot_rate = 0.6
        twilight = -2.2
        x_temp = 11 30  42
        y_tt = 0  19   0
        x_temp_fm = 5.7 23.5
        y_tt_fm = 0   17.8
        SorghumCanopy = Canopy --------------------------------------------------
        leaf_no_at_emerg = 1
        leaf_no_seed = 4
        leaf_no_min = 10
        leaf_no_max = 40
        leaf_init_rate = 21.6
        leaf_app_rate1 = 41
        leaf_app_rate2 = 20
        leaf_no_rate_change = 3.5
        leaf_app_rate = 41
        rue = 0   0  1.25  1.25  1.25 1.25  1.25 1.25 1.25 1.25    0    0
        row_spacing_default = 750
        x_row_spacing = 0.20   0.50   1.00
        y_extinct_coef = 0.70   0.40   0.40
        x_ave_temp = 8 20 35 50
        y_stress_photo = 0  1  1  0
        leaf_no_correction = 1.52
        x_lai = 0.1    4
        y_lai_sla_max = 50000 25000
        lai_sla_min = 8000  8000
        sla_max = 45000
        sla_min = 8000
        initial_tpla = 200
        tiller_coef = 0.66
        tpla_inflection_ratio = 0.66
        height_max = 3500
        height_stem_slope = 250
        Biomass = Biomass --------------------------------------------------
        dm_leaf_init = 0.1
        dm_root_init = 0.1
        dm_stem_init = 0.1
        stem_trans_frac = 0.2
        leaf_trans_frac = 0.15
        retransRate = 0.15
        ratio_root_shoot = 0   0   1    1     0.33  0.33  0.087  0    0     0    0    0
        partition_rate_leaf = 0.006
        frac_stem2flower = 0.3
        grn_water_cont = 0.13
        Roots = ROOTS --------------------------------------------------
        root_depth_rate = 0 27.0  27.0  27.0 27.0  27.0   27.0   0      0       0    0    0
        x_sw_ratio = 0   0.25
        y_sw_fac_root = 0   1
        initial_root_depth = 50
        specific_root_length = 100000
        x_plant_rld = 0.0  0.1
        y_rel_root_rate = 1.0  1.0
        Water = WATER --------------------------------------------------
        transp_eff_cf = 0.009 0.009 0.009 0.009 0.009 0.009  0.009  0.009  0.009  0.009   0.009   0.009
        svp_fract = 0.75
        x_sw_demand_ratio = 0.1 1.1
        y_swdef_leaf = 0   1
        x_sw_avail_ratio = 0 0.2 1.0
        y_swdef_pheno = 0 1.0 1.0
        Nitrogen = Nitrogen --------------------------------------------------
        no3_diffn_const = 2
        maxUptakeRate = 0.029
        initialRootNConc = 0.02
        targetRootNConc = 0.002
        initialLeafSLN = 1.5
        targetLeafSLN = 1.5
        newLeafSLN = 1
        senescedLeafSLN = 0.3
        initialStemNConc = 0.01
        x_stem_n = 3         5       7         10
        targetStemNConc = 0.055   0.016   0.01      0.005
        structStemNConc = 0.012  0.012   0.005   0.0015
        initialRachisNConc = 0
        targetRachisNConc = 0.01
        structRachisNConc = 0.003
        stemDilnNSlope = 0.0062
        stemDilnNInt = -0.001
        rachisDilnNSlope = 0.0062
        rachisDilnNInt = -0.001
        leafDilnNSlope = 0.0043
        leafDilnNInt = -0.0017
        grainFillRate = 0.001
        grainFillIntercept = 0.0000319
        grainFillSlope = 0.4026
        targetGrainNConc = 0.0175
        nUptakeCease = 570
        nSupplyFrac = 5
        Senescence = Senescence --------------------------------------------------
        dm_root_sen_frac = 0.002
        lai_sen_light = 4
        sen_light_slope = 0.008
        x_temp_senescence = 0.0 6.0
        y_senescence_fac = 1   0
        sen_rate_water = 0.05
        dead_detach_frac = 0 0 0 0 0
        dm_leaf_detach_frac = 0
        sen_light_time_const = 10
        sen_radn_crit = 2
        frost_kill = 1
        sen_water_time_const = 10
        sen_threshold = 0.25
        spla_slope = 81.5
        tt_emerg_limit = 150
        days_germ_limit = 40
        swdf_photo_limit = 99
        swdf_photo_rate = 0
        swdf_pheno_limit = 99
        x_weighted_temp = 55.0  60.0
        y_plant_death = 0.0   1.0
        stress_determinants = leaf stem grain
        Phosphorous = Phosphorous --------------------------------------------------
        yield_parts = grain
        retrans_parts = leaf stem  flower
        pfact_photo_slope = 2.5
        pfact_expansion_slope = 2.5
        pfact_pheno_slope = 6
        pfact_grain_slope = 20
        p_uptake_factor = 1.5
        x_p_stage_code = 3       4      5      6      7      8      10
        y_p_conc_max_leaf = 0.0059  0.0054 0.0040 0.0029 0.0026 0.0025 0.0022
        y_p_conc_min_leaf = 0.003   0.003  0.0029 0.0011 0.0011 0.0008 0.0006
        y_p_conc_sen_leaf = 0.0005  0.0005 0.0005 0.0005 0.0005 0.0005 0.0005
        y_p_conc_max_stem = 0.0057  0.0038 0.0037 0.0018 0.0016 0.0013 0.0013
        y_p_conc_min_stem = 0.003   0.003  0.002  0.0006 0.0006 0.0002 0.0002
        y_p_conc_sen_stem = 0.0002  0.0002 0.0002 0.0002 0.0002 0.0002 0.0002
        y_p_conc_max_root = 0.0010  0.0010 0.0010 0.0010 0.0010 0.0010 0.0010
        y_p_conc_min_root = 0.0010  0.0010 0.0010 0.0010 0.0010 0.0010 0.0010
        y_p_conc_sen_root = 0.0010  0.0010 0.0010 0.0010 0.0010 0.0010 0.0010
        y_p_conc_max_flower = 0.0057  0.0038 0.0037 0.0018 0.0016 0.0013 0.0013
        y_p_conc_min_flower = 0.003   0.003  0.002  0.0006 0.0006 0.0002 0.0002
        y_p_conc_sen_flower = 0.0002  0.0002 0.0002 0.0002 0.0002 0.0002 0.0002
        y_p_conc_max_grain = 0.001   0.001  0.001  0.001  0.052  0.0044  0.0034
        y_p_conc_min_grain = 0.001   0.001  0.001  0.001  0.001  0.0015  0.0015
        y_p_conc_sen_grain = 0.001   0.001  0.001  0.001  0.001  0.0015  0.0015
        y_p_conc_max_energy = 0.001   0.001  0.001  0.001  0.001  0.001  0.001
        y_p_conc_min_energy = 0.001   0.001  0.001  0.001  0.001  0.001  0.001
        y_p_conc_sen_energy = 0.001   0.001  0.001  0.001  0.001  0.001  0.001
        p_conc_init_leaf = 0.0059
        p_conc_init_stem = 0.0057
        p_conc_init_root = 0.01
        p_conc_init_flower = 0.0057
        p_conc_init_grain = 0.0052
        p_conc_init_energy = 0
        Bounds = Bounds --------------------------------------------------
        ll_ub = 1000
        kl_ub = 1
        minsw = 0.00001
        latitude_ub = 90
        latitude_lb = -90
        maxt_ub = 55
        maxt_lb = 0
        mint_ub = 40
        mint_lb = -10
        radn_ub = 50
        radn_lb = 1
        dlayer_ub = 1000
        dlayer_lb = 0
        dul_dep_ub = 1000
        dul_dep_lb = 0
        sw_dep_ub = 1000
        sw_dep_lb = 0
        sw_ub = 1
        sw_lb = 0
        no3_ub = 10000
        no3_lb = 0
        no3_min_ub = 10000
        no3_min_lb = 0
        nh4_ub = 10000
        nh4_lb = 0
        nh4_min_ub = 10000
        nh4_min_lb = 0
        head_grain_no_max_ub = 45000
        grain_gth_rate_ub = 20
        tt_emerg_to_endjuv_ub = 500
        pp_endjuv_to_init_ub = 200
        tt_flower_to_maturity_ub = 1000
        tt_maturity_to_ripe_ub = 1000
        tt_flower_to_start_grain_ub = 1000
        tt_flag_to_flower_ub = 1000
        x_co2_te_modifier = 350
        y_co2_te_modifier = 1
      sorghumGenotype Buster
        tt_emerg_to_endjuv = 100
        photoperiod_crit1 = 11.5
        photoperiod_crit2 = 13.5
        photoperiod_slope = 11.5
        tt_endjuv_to_init = 160
        tt_flag_to_flower = 170
        tt_flower_to_start_grain = 80
        tt_flower_to_maturity = 761
        tt_maturity_to_ripe = 1
        main_stem_coef = 2.9
        tpla_prod_coef = 0.018
        dm_per_seed = 0.00083
        x_stem_wt = 0    80
        y_height = 0  2000
      sorghumGenotype M35-1
        tt_emerg_to_endjuv = 100
        photoperiod_crit1 = 11.5
        photoperiod_crit2 = 13.5
        photoperiod_slope = 61
        tt_endjuv_to_init = 252
        tt_flag_to_flower = 170
        tt_flower_to_start_grain = 80
        tt_flower_to_maturity = 761
        tt_maturity_to_ripe = 1
        main_stem_coef = 2.82
        tpla_prod_coef = 0.011
        dm_per_seed = 0.00142784
        x_stem_wt = 0    80
        y_height = 0  2000
        partition_rate_leaf = 0.018
        nUptakeCease = 10
        leaf_init_rate = 26.1
        targetLeafSLN = 1.2
      sorghumGenotype CSH13R: tt_emerg_to_endjuv=100; photoperiod_crit1=11.5; photoperiod_crit2=13.5; photoperiod_slope=17; tt_endjuv_to_init=228; tt_flag_to_flower=170; tt_flower_to_start_grain=80; tt_flower_to_maturity=761; tt_maturity_to_ripe=1; main_stem_coef=2.95; tpla_prod_coef=0.014; dm_per_seed=0.0015; x_stem_wt=0    80; y_height=0  2000; rue=0   0  1.6  1.6  1.6 1.6  1.6 1.6 1.6 1.6    0    0; partition_rate_leaf=0.018; targetLeafSLN=1.2; leaf_init_rate=23.2
      sorghumGenotype QL41xQL36: tt_emerg_to_endjuv=100; photoperiod_crit1=11.5; photoperiod_crit2=13.5; photoperiod_slope=12.5; tt_endjuv_to_init=179; tt_flag_to_flower=170; tt_flower_to_start_grain=80; tt_flower_to_maturity=761; tt_maturity_to_ripe=1; main_stem_coef=2.90; tpla_prod_coef=0.018; dm_per_seed=0.00083; x_stem_wt=0    80; y_height=0  2000
      sorghumGenotype ATX623xRTX430: tt_emerg_to_endjuv=100; photoperiod_crit1=11.5; photoperiod_crit2=13.5; photoperiod_slope=13; tt_endjuv_to_init=202; tt_flag_to_flower=170; tt_flower_to_start_grain=80; tt_flower_to_maturity=761; tt_maturity_to_ripe=1; main_stem_coef=2.90; tpla_prod_coef=0.018; dm_per_seed=0.00083; x_stem_wt=0    80; y_height=0  2000
      sorghumGenotype QL39xQL36: tt_emerg_to_endjuv=100; photoperiod_crit1=11.8; photoperiod_crit2=14; photoperiod_slope=39.7; tt_endjuv_to_init=114.4; tt_flag_to_flower=170; tt_flower_to_start_grain=80; tt_flower_to_maturity=761; tt_maturity_to_ripe=1; main_stem_coef=2.9; tpla_prod_coef=0.018; dm_per_seed=0.00083; x_stem_wt=0    80; y_height=0  2000
      sorghumGenotype A35xQL36: tt_emerg_to_endjuv=100; photoperiod_crit1=11.8; photoperiod_crit2=14.0; photoperiod_slope=39.7; tt_endjuv_to_init=134.4; tt_flag_to_flower=170; tt_flower_to_start_grain=80; tt_flower_to_maturity=761; tt_maturity_to_ripe=1; main_stem_coef=2.90; tpla_prod_coef=0.018; dm_per_seed=0.00083; x_stem_wt=0    80; y_height=0  2000; partition_rate_leaf=0.012
      sorghumGenotype early: tt_emerg_to_endjuv=100; photoperiod_crit1=11.5; photoperiod_crit2=13.5; photoperiod_slope=11.5; tt_endjuv_to_init=114; tt_flag_to_flower=170; tt_flower_to_start_grain=80; tt_flower_to_maturity=761; tt_maturity_to_ripe=1; main_stem_coef=2.9; tpla_prod_coef=0.018; dm_per_seed=0.00083; x_stem_wt=0    80; y_height=0  2000
      sorghumGenotype medium: tt_emerg_to_endjuv=100; photoperiod_crit1=11.5; photoperiod_crit2=13.5; photoperiod_slope=11.5; tt_endjuv_to_init=157; tt_flag_to_flower=170; tt_flower_to_start_grain=80; tt_flower_to_maturity=761; tt_maturity_to_ripe=1; main_stem_coef=2.9; tpla_prod_coef=0.018; dm_per_seed=0.00083; x_stem_wt=0    80; y_height=0  2000
      sorghumGenotype late: tt_emerg_to_endjuv=100; photoperiod_crit1=11.5; photoperiod_crit2=13.5; photoperiod_slope=11.5; tt_endjuv_to_init=201; tt_flag_to_flower=170; tt_flower_to_start_grain=80; tt_flower_to_maturity=761; tt_maturity_to_ripe=1; main_stem_coef=2.9; tpla_prod_coef=0.018; dm_per_seed=0.00083; x_stem_wt=0    80; y_height=0  2000
      sorghumGenotype dekalb_DK55: tt_emerg_to_endjuv=100; photoperiod_crit1=11; photoperiod_crit2=13; photoperiod_slope=0; tt_endjuv_to_init=205; tt_flag_to_flower=100; tt_flower_to_start_grain=30; tt_flower_to_maturity=695; tt_maturity_to_ripe=1; main_stem_coef=2.95; tpla_prod_coef=0.012; dm_per_seed=0.00083; x_stem_wt=0  80; y_height=0  2000
      sorghumGenotype texas_RS610: tt_emerg_to_endjuv=100; photoperiod_crit1=12.3; photoperiod_crit2=14.6; photoperiod_slope=38.4; tt_endjuv_to_init=120; tt_flag_to_flower=100; tt_flower_to_start_grain=30; tt_flower_to_maturity=695; tt_maturity_to_ripe=1; main_stem_coef=2.88; tpla_prod_coef=0.018; dm_per_seed=0.00083; x_stem_wt=0  80; y_height=0  2000
      sorghumGenotype pioneer_s34: tt_emerg_to_endjuv=100; photoperiod_crit1=12.3; photoperiod_crit2=14.6; photoperiod_slope=25; tt_endjuv_to_init=115; tt_flag_to_flower=100; tt_flower_to_start_grain=30; tt_flower_to_maturity=695; tt_maturity_to_ripe=1; main_stem_coef=2.95; tpla_prod_coef=0.015; dm_per_seed=0.00083; x_stem_wt=0  80; y_height=0  2000
      sorghumGenotype texas_671: tt_emerg_to_endjuv=100; photoperiod_crit1=12.3; photoperiod_crit2=14.6; photoperiod_slope=15.2; tt_endjuv_to_init=159; tt_flag_to_flower=100; tt_flower_to_start_grain=30; tt_flower_to_maturity=695; tt_maturity_to_ripe=1; main_stem_coef=2.88; tpla_prod_coef=0.015; dm_per_seed=0.00083; x_stem_wt=0  80; y_height=0  2000
    manager Calculator
      on init:
```
 head_wt = 0
root_n = 0
head_n = 0
leaf_n = 0
sd = 0
```
      on end_of_day:
```
 
head_wt = dw_green(4)
root_n = n_green(1)
head_n = n_green(4)
leaf_n = n_green(2)

if (sw_demand > 0) then
   sd = sw_supply / sw_demand
else
   sd = 1
endif

if (sd > 1) then
   sd = 1
endif
```
    variables My Variables
      variable:
        today format dd/mm/yyyy as Date
        das
        Stage
        Biomass
        GreenWt
        Biomass units g/m^2 as BiomassWt
        RootGreenWt
        LeafGreenWt
        StemGreenWt
        RachisGreenWt
        GrainGreenWt
        GreenN
        RootGreenN
        LeafGreenN
        StemGreenN
        RachisGreenN
        GrainGreenN
        GrainGreenNConc
        GrainNo
        GrainSize
        HI
        LeafNo
        LAI
        SLAI
        ESW
        no3() as NO3
        SLN
        WaterSD
        sw
  simulation Sorghum_HE2_T1
    clock
      start_date = 1/12/1996  # Select the start date of the simulation
      end_date = 30/06/1997  # Select the end date of the simulation
    summaryfile: filename=Sorghum_HE2_T1.sum
    metfile met: filename=HE2.met
    area paddock
      registrations global
      outputfile
        events My Variables Events -> /HE2/shared/My Variables Events
        variables My Variables -> /HE2/shared/My Variables
      folder Manager folder
        manager Sow SkipRow on a fixed date
          date = 9/01/1997  # Enter sowing date (d/m/yyyy)
          crop = Sorghum  # Enter name of crop to sow
          density = 10  # Enter sowing density (plants/m2)
          depth = 30  # Enter sowing depth (mm)
          cultivar = QL41xQL36  # Enter cultivar
          row_spacing = 0.5  # Enter row spacing (m)
          RowConfiguration = solid  # Enter skip row configuration
          ftn = 0  # Enter Fertile Tiller No.
          on start_of_day:
```
            if (paddock_is_fallow() = 1 and today = date('[date]')) then
              [crop] sow plants =[density], sowing_depth = [depth], cultivar = [cultivar], row_spacing = [row_spacing], skip = [RowConfiguration], tiller_no_fertile = [ftn] ()
            endif
            if (paddock_is_fallow() = 0) then
               outputfile do_output
            endif
```
        manager Harvesting rule
          crop = Sorghum  # Enter name of crop to harvest when ripe
          on end_of_day:
```
           if [crop].stage_name = 'harvest_ripe' or [crop].plant_status = 'dead' then
              [crop]  harvest
              [crop]  end_crop
           endif
```
      irrigation
        automatic_irrigation = off  # switch
        asw_depth = 600.0  # Depth to which ASW is calculated. (mm)
        crit_fr_asw = 0.5  # Fraction of ASW below which irrigation is applied (0-1.0)
        irrigation_efficiency = 1.0  # Efficiency of the irrigation. (0-1.0)
      fertiliser
      operations
        9/01/1997  Irrigation apply amount = 54
        16/01/1997  Irrigation apply amount = 37
        21/01/1997  Irrigation apply amount = 19
        29/01/1997  Irrigation apply amount = 20
        7/02/1997  Irrigation apply amount = 14
        13/03/1997  Irrigation apply amount = 30
        21/03/1997  Irrigation apply amount = 46
        10/04/1997  Irrigation apply amount = 24
        17/04/1997  Irrigation apply amount = 41
        2/05/1997  Irrigation apply amount = 25
        20/12/1996  fertiliser apply amount = 0(kg/ha), depth = 50 (mm), type = NO3_N ()
        23/12/1996  fertiliser apply amount = 0 (kg/ha), depth = 50 (mm), type = NO3_N ()
        23/12/1996  fertiliser apply amount = 10 (kg/ha), depth = 50 (mm), type = NO3_N ()
      soil HRS -> /HE2/shared/HRS
      Sorghum -> /HE2/shared/Sorghum
      manager Calculator -> /HE2/shared/Calculator
  simulation Sorghum_HE2_T2
    clock
      start_date = 1/12/1996  # Select the start date of the simulation
      end_date = 30/06/1997  # Select the end date of the simulation
    summaryfile: filename=Sorghum_HE2_T2.sum
    metfile met: filename=HE2.met
    area paddock
      registrations global
      outputfile
        events My Variables Events -> /HE2/shared/My Variables Events
        variables My Variables -> /HE2/shared/My Variables
      folder Manager folder
        manager Sow SkipRow on a fixed date
          date = 9/01/1997  # Enter sowing date (d/m/yyyy)
          crop = Sorghum  # Enter name of crop to sow
          density = 10  # Enter sowing density (plants/m2)
          depth = 30  # Enter sowing depth (mm)
          cultivar = Buster  # Enter cultivar
          row_spacing = 0.5  # Enter row spacing (m)
          RowConfiguration = solid  # Enter skip row configuration
          ftn = 0  # Enter Fertile Tiller No.
          on start_of_day:
          script: same as in Sorghum_HE2_T1.paddock.Manager folder.Sow SkipRow on a fixed date
        manager Harvesting rule
          crop = Sorghum  # Enter name of crop to harvest when ripe
          on end_of_day:
          script: same as in Sorghum_HE2_T1.paddock.Manager folder.Harvesting rule
      irrigation
        automatic_irrigation = off  # switch
        asw_depth = 600.0  # Depth to which ASW is calculated. (mm)
        crit_fr_asw = 0.5  # Fraction of ASW below which irrigation is applied (0-1.0)
        irrigation_efficiency = 1.0  # Efficiency of the irrigation. (0-1.0)
      fertiliser
      operations
        9/01/1997  Irrigation apply amount = 54
        16/01/1997  Irrigation apply amount = 37
        21/01/1997  Irrigation apply amount = 19
        29/01/1997  Irrigation apply amount = 20
        7/02/1997  Irrigation apply amount = 14
        13/03/1997  Irrigation apply amount = 30
        21/03/1997  Irrigation apply amount = 46
        10/04/1997  Irrigation apply amount = 24
        17/04/1997  Irrigation apply amount = 41
        2/05/1997  Irrigation apply amount = 25
        20/12/1996  fertiliser apply amount = 0 (kg/ha), depth = 50 (mm), type = NO3_N ()
        23/12/1996  fertiliser apply amount = 0 (kg/ha), depth = 50 (mm), type = NO3_N ()
        23/12/1996  fertiliser apply amount = 10 (kg/ha), depth = 50 (mm), type = NO3_N ()
      soil HRS -> /HE2/shared/HRS
      Sorghum -> /HE2/shared/Sorghum
      manager Calculator -> /HE2/shared/Calculator
  simulation Sorghum_HE2_T3
    clock
      start_date = 1/12/1996  # Select the start date of the simulation
      end_date = 30/06/1997  # Select the end date of the simulation
    summaryfile: filename=Sorghum_HE2_T3.sum
    metfile met: filename=HE2.met
    area paddock
      registrations global
      outputfile
        events My Variables Events -> /HE2/shared/My Variables Events
        variables My Variables -> /HE2/shared/My Variables
      folder Manager folder
        manager Sow SkipRow on a fixed date
          date = 9/01/1997  # Enter sowing date (d/m/yyyy)
          crop = Sorghum  # Enter name of crop to sow
          density = 10  # Enter sowing density (plants/m2)
          depth = 30  # Enter sowing depth (mm)
          cultivar = M35-1  # Enter cultivar
          row_spacing = 0.5  # Enter row spacing (m)
          RowConfiguration = solid  # Enter skip row configuration
          ftn = 0  # Enter Fertile Tiller No.
          on start_of_day:
          script: same as in Sorghum_HE2_T1.paddock.Manager folder.Sow SkipRow on a fixed date
        manager Harvesting rule
          crop = Sorghum  # Enter name of crop to harvest when ripe
          on end_of_day:
          script: same as in Sorghum_HE2_T1.paddock.Manager folder.Harvesting rule
      irrigation
        automatic_irrigation = off  # switch
        asw_depth = 600.0  # Depth to which ASW is calculated. (mm)
        crit_fr_asw = 0.5  # Fraction of ASW below which irrigation is applied (0-1.0)
        irrigation_efficiency = 1.0  # Efficiency of the irrigation. (0-1.0)
      fertiliser
      operations
        9/01/1997  Irrigation apply amount = 54
        16/01/1997  Irrigation apply amount = 37
        21/01/1997  Irrigation apply amount = 19
        29/01/1997  Irrigation apply amount = 20
        7/02/1997  Irrigation apply amount = 14
        13/03/1997  Irrigation apply amount = 30
        21/03/1997  Irrigation apply amount = 46
        10/04/1997  Irrigation apply amount = 24
        17/04/1997  Irrigation apply amount = 41
        2/05/1997  Irrigation apply amount = 25
        20/12/1996  fertiliser apply amount = 3 (kg/ha), depth = 50 (mm), type = NO3_N ()
        23/12/1996  fertiliser apply amount = 0 (kg/ha), depth = 50 (mm), type = NO3_N ()
        23/12/1996  fertiliser apply amount = 10 (kg/ha), depth = 50 (mm), type = NO3_N ()
      soil HRS -> /HE2/shared/HRS
      Sorghum -> /HE2/shared/Sorghum
      manager Calculator -> /HE2/shared/Calculator
