folder Simulations: version=14
  simulation Sample Rotation 1
    clock
      start_date = 1/01/1940  # Select the start date of the simulation
      end_date = 31/12/1950  # Select the end date of the simulation
    summaryfile
    metfile met: filename=%apsuite\apsim\met\sample\goond.met
    area Paddock
      registrations global
      tclmanager Manager
        tclui Rotation Initialisation: initialState=WinterFallow; simpleLogging=0
          uiscript=source $apsuite/apsim/tcllink/lib/RotationInitialisationUI.tcl
          rule Sample Rotation 1 Rotation Initialisation.out - Rotation Initialisation UI1
            on init:
```
source $apsuite/apsim/tcllink/lib/RotationInitialisation.tcl
set state "WinterFallow"
```
          rule Sample Rotation 1 Rotation Initialisation.out - Rotation Initialisation UI2
            on process:
```
checkSetup
doProcess
```
          rule Sample Rotation 1 Rotation Initialisation.out - Rotation Initialisation UI3
            on exit:
```
exit
```
        tclui Rotation Management: uiscript=source $apsuite/apsim/tcllink/lib/RotationsUI.tcl
          node SummerFallow2: desc=New state
          node Chickpea: desc=Chickpea
          node Wheat: desc=Wheat Crop
          node WinterFallow: desc=New state
          node SummerFallow1: desc=New state
          node F1: desc=New state
          node Cotton: desc=A Cotton Crop
          arc arc2: source=SummerFallow1; target=WinterFallow; rules=[apsimGet day]  == 192
          arc arc6: source=WinterFallow; target=Cotton; actions=sow_cotton; rules=[canPlant_cotton]
          arc arc3: source=Wheat; target=SummerFallow2
            actions=[apsimSendMessage wheat harvest, apsimSendMessage wheat end_crop]
            rules={[apsimGet wheat.stagename] == "harvest_ripe" || [apsimGet wheat.plant_status] == "dead"}
          arc arc7: source=F1; target=SummerFallow1; rules=[apsimGet day]  == 192
          arc arc0: source=F1; target=Chickpea; actions=sow_chickpea; rules=[canPlant_chickpea]
          arc arc8: source=Chickpea; target=SummerFallow1
            actions=[apsimSendMessage chickpea harvest, apsimSendMessage chickpea end_crop]
            rules={[apsimGet chickpea.stagename] == "harvest_ripe" || [apsimGet chickpea.plant_status] == "dead"}
          arc arc1: source=SummerFallow1; target=Wheat; actions=sow_wheat; rules=[canPlant_wheat]
          arc arc5: source=Cotton; target=F1; actions=apsimSendMessage cotton harvest; rules=[apsimGet ozcot_status] > 0
          arc arc9: source=SummerFallow2; target=WinterFallow; rules=[apsimGet day]  == 74
          rule Init rule
            on init:
```
package require struct
::struct::graph stateGraph
stateGraph node insert "SummerFallow2"
set colour(SummerFallow2) "gray"
stateGraph node insert "Chickpea"
set colour(Chickpea) "lightgreen"
stateGraph node insert "Wheat"
set colour(Wheat) "darkgreen"
stateGraph node insert "WinterFallow"
set colour(WinterFallow) "gray"
stateGraph node insert "SummerFallow1"
set colour(SummerFallow1) "maroon"
stateGraph node insert "F1"
set colour(F1) "gray"
stateGraph node insert "Cotton"
set colour(Cotton) "purple"
stateGraph arc insert "SummerFallow1" "WinterFallow" "arc2"
stateGraph arc lappend "arc2" rules {[apsimGet day]  == 192}
stateGraph arc lappend "arc2" actions {}
stateGraph arc insert "WinterFallow" "Cotton" "arc6"
stateGraph arc lappend "arc6" actions {sow_cotton}
stateGraph arc lappend "arc6" rules {[canPlant_cotton]}
stateGraph arc lappend "arc6" actions {}
stateGraph arc insert "Wheat" "SummerFallow2" "arc3"
stateGraph arc lappend "arc3" actions {apsimSendMessage wheat harvest}
stateGraph arc lappend "arc3" actions {apsimSendMessage wheat end_crop}
stateGraph arc lappend "arc3" rules {{[apsimGet wheat.stagename] == "harvest_ripe" || [apsimGet wheat.plant_status] == "dead"}}
stateGraph arc lappend "arc3" actions {}
stateGraph arc insert "F1" "SummerFallow1" "arc7"
stateGraph arc lappend "arc7" rules {[apsimGet day]  == 192}
stateGraph arc lappend "arc7" actions {}
stateGraph arc insert "F1" "Chickpea" "arc0"
stateGraph arc lappend "arc0" actions {sow_chickpea}
stateGraph arc lappend "arc0" rules {[canPlant_chickpea]}
stateGraph arc lappend "arc0" actions {}
stateGraph arc insert "Chickpea" "SummerFallow1" "arc8"
stateGraph arc lappend "arc8" actions {apsimSendMessage chickpea harvest}
stateGraph arc lappend "arc8" actions {apsimSendMessage chickpea end_crop}
stateGraph arc lappend "arc8" rules {{[apsimGet chickpea.stagename] == "harvest_ripe" || [apsimGet chickpea.plant_status] == "dead"}}
stateGraph arc lappend "arc8" actions {}
stateGraph arc insert "SummerFallow1" "Wheat" "arc1"
stateGraph arc lappend "arc1" actions {sow_wheat}
stateGraph arc lappend "arc1" rules {[canPlant_wheat]}
stateGraph arc lappend "arc1" actions {}
stateGraph arc insert "Cotton" "F1" "arc5"
stateGraph arc lappend "arc5" actions {apsimSendMessage cotton harvest}
stateGraph arc lappend "arc5" rules {[apsimGet ozcot_status] > 0}
stateGraph arc lappend "arc5" actions {}
stateGraph arc insert "SummerFallow2" "WinterFallow" "arc9"
stateGraph arc lappend "arc9" rules {[apsimGet day]  == 74}
stateGraph arc lappend "arc9" actions {}
```
        tclui Wheat Sowing Rule: uiscript=source $apsuite/apsim/tcllink/lib/GenericSowingUI.tcl; crop=wheat; criteria=variable; date1=15-may; date2=10-jul; raincrit=25; rainnumdays=3; esw_amount=50; must_sow=no; plants=100; sowing_depth=30; row_spacing=250; skipplant=0; skiprow=0; cultivar=hartog; class=plant; module=plant
          ruletemplate Sowing rule - initialisation:
            # Support procedures
            # Can we plant a crop today?
            proc canPlant_[crop] {} {
              if {"[criteria]" == "variable"} {
                 set year [apsimGet year]; set day [apsimGet day]
                 set d1 [clock format [clock scan "[date1]-$year"] -format %j]
                 set d2 [clock format [clock scan "[date2]-$year"] -format %j]

                 if {"[must_sow]" == "yes" && $day == $d2} {return 1}

                 if {$d1 > $d2} {
                    set dateOK [expr $day >= $d1 || $day <= $d2]
                 } else {
                    set dateOK [expr $day >= $d1 && $day <= $d2]
                 }
                 set rainOK [expr [apsimGet rain\[[rainnumdays]\]] >= [raincrit]]
                 set eswOK [expr [apsimGet esw] >= [esw_amount]]
                 return [expr $dateOK && $rainOK && $eswOK]
              } elseif {"[criteria]" == "fixed"} {
                 set year [apsimGet year]; set day [apsimGet day]
                 set d1 [clock format [clock scan "[date1]-$year"] -format %j]
                 return [expr $day == $d1]
              } else {
                 error "Unknown sowing criteria \"[criteria]\"."
              }
              return "notreached"
            }

            # Plant a crop now
            proc sow_[crop] {} {
              if {"[module]" == "plant"} {
                 apsimSendMessage [crop] sow {plants [plants]} {sowing_depth [sowing_depth]} \
                         {cultivar [cultivar]} {row_spacing [row_spacing]} \
                         {skipplant [skipplant]} {skiprow [skiprow]} {crop_class [class]}
              } elseif {"[module]" == "cropmod"} {
                 apsimSendMessage [crop] sow {plants [density]} {sowing_depth [depth]} \
                         {cultivar [cultivar]} {row_spacing [row_spacing]} {skiprow [skiprow]}
              } elseif {"[module]" == "growth"} {
                 apsimSendMessage [crop] ???
              } elseif {"[module]" == "ozcot"} {
                 apsimSendMessage [crop] sow {plants_pm [plants_pm]} {sowing_depth [sowing_depth]} \
                         {row_spacing [row_spacing]} {skiprow [skiprow]} {cultivar [cultivar]}
              } elseif {"[module]" == "oryza"} {
                 apsimSendMessage [crop] sow {cultivar [cultivar]}
              } elseif {"[module]" == "sorghum"} {
                 apsimSendMessage [crop] sow {plants [plants]} {sowing_depth [sowing_depth]} \
                         {cultivar [cultivar]} {row_spacing [row_spacing]} {skiprow [skiprow]} \
                         {tiller_no_fertile [tiller_no_fertile]}
              } elseif {"[module]" == "sugar"} {
                 apsimSendMessage [crop] sow {plants [plants]} {cultivar [cultivar]} {sowing_depth [sowing_depth]}
              } else {
                error "Unknown crop module \"[module]\"."
              }
            }
          rule Sample Rotation 1 Wheat Sowing Rule.out - Sowing rule - initialisation
            on init:
```
# Support procedures
# Can we plant a crop today?
proc canPlant_wheat {} {
  if {"variable" == "variable"} {
     set year [apsimGet year]; set day [apsimGet day]
     set d1 [clock format [clock scan "15-may-$year"] -format %j]
     set d2 [clock format [clock scan "10-jul-$year"] -format %j]

     if {"no" == "yes" && $day == $d2} {return 1}

     if {$d1 > $d2} {
        set dateOK [expr $day >= $d1 || $day <= $d2]
     } else {   
        set dateOK [expr $day >= $d1 && $day <= $d2]
     }
     set rainOK [expr [apsimGet rain\[3\]] >= 25]
     set eswOK [expr [apsimGet esw] >= 50]
     return [expr $dateOK && $rainOK && $eswOK]
  } elseif {"variable" == "fixed"} {
     set year [apsimGet year]; set day [apsimGet day]
     set d1 [clock format [clock scan "15-may-$year"] -format %j]
     return [expr $day == $d1]
  } else {
     error "Unknown sowing criteria \"variable\"."
  }
  return "notreached"
}

# Plant a crop now
proc sow_wheat {} {
  if {"plant" == "plant"} {
     apsimSendMessage wheat sow {plants 100} {sowing_depth 30} \
             {cultivar hartog} {row_spacing 250} \
             {skipplant 0} {skiprow 0} {crop_class plant} 
  } elseif {"plant" == "cropmod"} {
     apsimSendMessage wheat sow {plants [density]} {sowing_depth [depth]} \
             {cultivar hartog} {row_spacing 250} {skiprow 0} 
  } elseif {"plant" == "growth"} {
     apsimSendMessage wheat ???
  } elseif {"plant" == "ozcot"} {
     apsimSendMessage wheat sow {plants_pm [plants_pm]} {sowing_depth 30} \
             {row_spacing 250} {skiprow 0} {cultivar hartog}
  } elseif {"plant" == "oryza"} {
     apsimSendMessage wheat sow {cultivar hartog} 
  } elseif {"plant" == "sorghum"} {
     apsimSendMessage wheat sow {plants 100} {sowing_depth 30} \
             {cultivar hartog} {row_spacing 250} {skiprow 0} \
             {tiller_no_fertile [tiller_no_fertile]}
  } elseif {"plant" == "sugar"} {
     apsimSendMessage wheat sow {plants 100} {cultivar hartog} {sowing_depth 30}
  } else {
    error "Unknown crop module \"plant\"."
  }
}
```
        tclui Cotton Sowing Rule: uiscript=source $apsuite/apsim/tcllink/lib/GenericSowingUI.tcl; crop=cotton; criteria=variable; date1=15-oct; date2=15-dec; raincrit=10; rainnumdays=3; esw_amount=100; must_sow=yes; plants_pm=10; sowing_depth=30; row_spacing=1000; skiprow=0; cultivar=Siok; module=ozcot; plants=100; skipplant=0; class=plant
          ruletemplate Sowing rule - initialisation:
            # Support procedures
            # Can we plant a crop today?
            proc canPlant_[crop] {} {
              if {"[criteria]" == "variable"} {
                 set year [apsimGet year]; set day [apsimGet day]
                 set d1 [clock format [clock scan "[date1]-$year"] -format %j]
                 set d2 [clock format [clock scan "[date2]-$year"] -format %j]

                 if {"[must_sow]" == "yes" && $day == $d2} {return 1}

                 if {$d1 > $d2} {
                    set dateOK [expr $day >= $d1 || $day <= $d2]
                 } else {
                    set dateOK [expr $day >= $d1 && $day <= $d2]
                 }
                 set rainOK [expr [apsimGet rain\[[rainnumdays]\]] >= [raincrit]]
                 set eswOK [expr [apsimGet esw] >= [esw_amount]]
                 return [expr $dateOK && $rainOK && $eswOK]
              } elseif {"[criteria]" == "fixed"} {
                 set year [apsimGet year]; set day [apsimGet day]
                 set d1 [clock format [clock scan "[date1]-$year"] -format %j]
                 return [expr $day == $d1]
              } else {
                 error "Unknown sowing criteria \"[criteria]\"."
              }
              return "notreached"
            }

            # Plant a crop now
            proc sow_[crop] {} {
              if {"[module]" == "plant"} {
                 apsimSendMessage [crop] sow {plants [plants]} {sowing_depth [sowing_depth]} \
                         {cultivar [cultivar]} {row_spacing [row_spacing]} \
                         {skipplant [skipplant]} {skiprow [skiprow]} {crop_class [class]}
              } elseif {"[module]" == "cropmod"} {
                 apsimSendMessage [crop] sow {plants [density]} {sowing_depth [depth]} \
                         {cultivar [cultivar]} {row_spacing [row_spacing]} {skiprow [skiprow]}
              } elseif {"[module]" == "growth"} {
                 apsimSendMessage [crop] ???
              } elseif {"[module]" == "ozcot"} {
                 apsimSendMessage [crop] sow {plants_pm [plants_pm]} {sowing_depth [sowing_depth]} \
                         {row_spacing [row_spacing]} {skiprow [skiprow]} {cultivar [cultivar]}
              } elseif {"[module]" == "oryza"} {
                 apsimSendMessage [crop] sow {cultivar [cultivar]}
              } elseif {"[module]" == "sorghum"} {
                 apsimSendMessage [crop] sow {plants [plants]} {sowing_depth [sowing_depth]} \
                         {cultivar [cultivar]} {row_spacing [row_spacing]} {skiprow [skiprow]} \
                         {tiller_no_fertile [tiller_no_fertile]}
              } elseif {"[module]" == "sugar"} {
                 apsimSendMessage [crop] sow {plants [plants]} {cultivar [cultivar]} {sowing_depth [sowing_depth]}
              } else {
                error "Unknown crop module \"[module]\"."
              }
            }
          rule Sample Rotation 1 Cotton Sowing Rule.out - Sowing rule - initialisation
            on init:
```
# Support procedures
# Can we plant a crop today?
proc canPlant_cotton {} {
  if {"variable" == "variable"} {
     set year [apsimGet year]; set day [apsimGet day]
     set d1 [clock format [clock scan "15-oct-$year"] -format %j]
     set d2 [clock format [clock scan "15-dec-$year"] -format %j]

     if {"yes" == "yes" && $day == $d2} {return 1}

     if {$d1 > $d2} {
        set dateOK [expr $day >= $d1 || $day <= $d2]
     } else {   
        set dateOK [expr $day >= $d1 && $day <= $d2]
     }
     set rainOK [expr [apsimGet rain\[3\]] >= 10]
     set eswOK [expr [apsimGet esw] >= 100]
     return [expr $dateOK && $rainOK && $eswOK]
  } elseif {"variable" == "fixed"} {
     set year [apsimGet year]; set day [apsimGet day]
     set d1 [clock format [clock scan "15-oct-$year"] -format %j]
     return [expr $day == $d1]
  } else {
     error "Unknown sowing criteria \"variable\"."
  }
  return "notreached"
}

# Plant a crop now
proc sow_cotton {} {
  if {"ozcot" == "plant"} {
     apsimSendMessage cotton sow {plants 100} {sowing_depth 30} \
             {cultivar Siok} {row_spacing 1000} \
             {skipplant 0} {skiprow 0} {crop_class plant} 
  } elseif {"ozcot" == "cropmod"} {
     apsimSendMessage cotton sow {plants [density]} {sowing_depth [depth]} \
             {cultivar Siok} {row_spacing 1000} {skiprow 0} 
  } elseif {"ozcot" == "growth"} {
     apsimSendMessage cotton ???
  } elseif {"ozcot" == "ozcot"} {
     apsimSendMessage cotton sow {plants_pm 10} {sowing_depth 30} \
             {row_spacing 1000} {skiprow 0} {cultivar Siok}
  } elseif {"ozcot" == "oryza"} {
     apsimSendMessage cotton sow {cultivar Siok} 
  } elseif {"ozcot" == "sorghum"} {
     apsimSendMessage cotton sow {plants 100} {sowing_depth 30} \
             {cultivar Siok} {row_spacing 1000} {skiprow 0} \
             {tiller_no_fertile [tiller_no_fertile]}
  } elseif {"ozcot" == "sugar"} {
     apsimSendMessage cotton sow {plants 100} {cultivar Siok} {sowing_depth 30}
  } else {
    error "Unknown crop module \"ozcot\"."
  }
}
```
        tclui Chickpea Sowing Rule: uiscript=source $apsuite/apsim/tcllink/lib/GenericSowingUI.tcl; crop=chickpea; criteria=variable; date1=15-may; date2=10-jul; raincrit=15; rainnumdays=3; esw_amount=50; must_sow=no; plants=25; sowing_depth=30; row_spacing=500; skipplant=0; skiprow=0; cultivar=amethyst; class=plant; module=plant
          ruletemplate Sowing rule - initialisation:
            # Support procedures
            # Can we plant a crop today?
            proc canPlant_[crop] {} {
              if {"[criteria]" == "variable"} {
                 set year [apsimGet year]; set day [apsimGet day]
                 set d1 [clock format [clock scan "[date1]-$year"] -format %j]
                 set d2 [clock format [clock scan "[date2]-$year"] -format %j]

                 if {"[must_sow]" == "yes" && $day == $d2} {return 1}

                 if {$d1 > $d2} {
                    set dateOK [expr $day >= $d1 || $day <= $d2]
                 } else {
                    set dateOK [expr $day >= $d1 && $day <= $d2]
                 }
                 set rainOK [expr [apsimGet rain\[[rainnumdays]\]] >= [raincrit]]
                 set eswOK [expr [apsimGet esw] >= [esw_amount]]
                 return [expr $dateOK && $rainOK && $eswOK]
              } elseif {"[criteria]" == "fixed"} {
                 set year [apsimGet year]; set day [apsimGet day]
                 set d1 [clock format [clock scan "[date1]-$year"] -format %j]
                 return [expr $day == $d1]
              } else {
                 error "Unknown sowing criteria \"[criteria]\"."
              }
              return "notreached"
            }

            # Plant a crop now
            proc sow_[crop] {} {
              if {"[module]" == "plant"} {
                 apsimSendMessage [crop] sow {plants [plants]} {sowing_depth [sowing_depth]} \
                         {cultivar [cultivar]} {row_spacing [row_spacing]} \
                         {skipplant [skipplant]} {skiprow [skiprow]} {crop_class [class]}
              } elseif {"[module]" == "cropmod"} {
                 apsimSendMessage [crop] sow {plants [density]} {sowing_depth [depth]} \
                         {cultivar [cultivar]} {row_spacing [row_spacing]} {skiprow [skiprow]}
              } elseif {"[module]" == "growth"} {
                 apsimSendMessage [crop] ???
              } elseif {"[module]" == "ozcot"} {
                 apsimSendMessage [crop] sow {plants_pm [plants_pm]} {sowing_depth [sowing_depth]} \
                         {row_spacing [row_spacing]} {skiprow [skiprow]} {cultivar [cultivar]}
              } elseif {"[module]" == "oryza"} {
                 apsimSendMessage [crop] sow {cultivar [cultivar]}
              } elseif {"[module]" == "sorghum"} {
                 apsimSendMessage [crop] sow {plants [plants]} {sowing_depth [sowing_depth]} \
                         {cultivar [cultivar]} {row_spacing [row_spacing]} {skiprow [skiprow]} \
                         {tiller_no_fertile [tiller_no_fertile]}
              } elseif {"[module]" == "sugar"} {
                 apsimSendMessage [crop] sow {plants [plants]} {cultivar [cultivar]} {sowing_depth [sowing_depth]}
              } else {
                error "Unknown crop module \"[module]\"."
              }
            }
          rule Sample Rotation 1 Chickpea Sowing Rule.out - Sowing rule - initialisation
            on init:
```
# Support procedures
# Can we plant a crop today?
proc canPlant_chickpea {} {
  if {"variable" == "variable"} {
     set year [apsimGet year]; set day [apsimGet day]
     set d1 [clock format [clock scan "15-may-$year"] -format %j]
     set d2 [clock format [clock scan "10-jul-$year"] -format %j]

     if {"no" == "yes" && $day == $d2} {return 1}

     if {$d1 > $d2} {
        set dateOK [expr $day >= $d1 || $day <= $d2]
     } else {   
        set dateOK [expr $day >= $d1 && $day <= $d2]
     }
     set rainOK [expr [apsimGet rain\[3\]] >= 15]
     set eswOK [expr [apsimGet esw] >= 50]
     return [expr $dateOK && $rainOK && $eswOK]
  } elseif {"variable" == "fixed"} {
     set year [apsimGet year]; set day [apsimGet day]
     set d1 [clock format [clock scan "15-may-$year"] -format %j]
     return [expr $day == $d1]
  } else {
     error "Unknown sowing criteria \"variable\"."
  }
  return "notreached"
}

# Plant a crop now
proc sow_chickpea {} {
  if {"plant" == "plant"} {
     apsimSendMessage chickpea sow {plants 25} {sowing_depth 30} \
             {cultivar amethyst} {row_spacing 500} \
             {skipplant 0} {skiprow 0} {crop_class plant} 
  } elseif {"plant" == "cropmod"} {
     apsimSendMessage chickpea sow {plants [density]} {sowing_depth [depth]} \
             {cultivar amethyst} {row_spacing 500} {skiprow 0} 
  } elseif {"plant" == "growth"} {
     apsimSendMessage chickpea ???
  } elseif {"plant" == "ozcot"} {
     apsimSendMessage chickpea sow {plants_pm } {sowing_depth 30} \
             {row_spacing 500} {skiprow 0} {cultivar amethyst}
  } elseif {"plant" == "oryza"} {
     apsimSendMessage chickpea sow {cultivar amethyst} 
  } elseif {"plant" == "sorghum"} {
     apsimSendMessage chickpea sow {plants 25} {sowing_depth 30} \
             {cultivar amethyst} {row_spacing 500} {skiprow 0} \
             {tiller_no_fertile [tiller_no_fertile]}
  } elseif {"plant" == "sugar"} {
     apsimSendMessage chickpea sow {plants 25} {cultivar amethyst} {sowing_depth 30}
  } else {
    error "Unknown crop module \"plant\"."
  }
}
```
      wheat
      chickpea
      cotton
      outputfile
        variables
          variables: dd/mm/yyyy as Date, cotton.yield as cotton, wheat.yield as wyield, chickpea.yield as cyield, biomass
        events Reporting Frequency: event=harvesting
      fertiliser
      soil #009 - Kupunn: Site=Kupunn; Region=South East Queensland; LocalName=Brigalow; SoilType=Grey Vertosol; NearestTown=Dalby, Q 4405; NaturalVegetation=Brigalow, belah, wilga; Cona=3.5; DiffusConst=40; DiffusSlope=16; U=6; Salb=0.13; Cn2Bare=73; CnRed=20; CnCov=0.8; CnCanopyFact=1; RootCn=40; RootWt=200; SoilCn=12.5; EnrACoeff=7.4; EnrBCoeff=0.2; Comment=oc and ph not measured
        profile
          layer:
            thickness  bd    ll15  airdry  dul   sat   sw       swcon  fbiom  finert  no3  nh4  oc    ph  ll Chickpea  kl Chickpea  xf Chickpea  ll Cotton  kl Cotton  xf Cotton  ll Sorghum  kl Sorghum  xf Sorghum  ll Wheat  kl Wheat  xf Wheat
            150        1.4   0.21  0.105   0.39  0.44  9999.99  0.3    0.03   0.4     6.5  0.6  1.24  7   0.21         0.1          1            0.21       0.1        1          0.21        0.1         1           0.21      0.1       1
            150        1.39  0.21  0.189   0.39  0.44  9999.99  0.3    0.02   0.6     2.1  0.1  1.24  7   0.21         0.1          1            0.21       0.1        1          0.21        0.1         1           0.21      0.1       1
            300        1.37  0.22  0.22    0.4   0.45  9999.99  0.3    0.01   0.8     2.1  0.1  1.25  7   0.22         0.08         1            0.22       0.1        1          0.26        0.1         1           0.25      0.08      1
            300        1.36  0.25  0.25    0.41  0.46  9999.99  0.3    0.01   0.9     1.7  0.1  1.1   7   0.27         0.06         1            0.25       0.1        1          0.26        0.08        1           0.28      0.06      1
            300        1.38  0.27  0.27    0.4   0.45  9999.99  0.3    0.01   0.95    1.7  0.1  0.71  7   0.29         0.04         1            0.27       0.09       1          0.28        0.06        1           0.31      0.04      1
            300        1.39  0.31  0.31    0.39  0.44  9999.99  0.3    0.01   0.95    1.7  0.1  0.34  7   0.34         0.02         1            0.31       0.07       1          0.34        0.04        1           0.37      0.02      1
            300        1.42  0.36  0.36    0.38  0.43  9999.99  0.3    0.01   0.95    1.7  0.1  0.26  7   0.38         0.01         1            0.36       0.05       1          0.36        0.02        1           0.38      0.01      1
        InitWater
          percentmethod: percent=1; distributed=filled from top
        InitNitrogen
          profile
            layer:
              no3    nh4    thickness
              6.500  0.600  150
              2.100  0.100  150
              2.100  0.100  300
              1.700  0.100  300
              1.700  0.100  300
              1.700  0.100  300
              1.700  0.100  300
  simulation Sample Rotation 2
    clock
      start_date = 1/01/1940  # Select the start date of the simulation
      end_date = 31/12/1950  # Select the end date of the simulation
    summaryfile
    metfile met: filename=%apsuite\apsim\met\sample\goond.met
    farmmanager Farm Manager
      tclui Rug plot: uiscript=source $apsuite/apsim/tcllink/lib/RotationRugPlotUI.tcl; filename=%apsuite/apsim/tcllink/sample/Rotation Sample 2.log
      tclui Paddock Map: uiscript=source $apsuite/apsim/tcllink/lib/PaddockMapUI.tcl; filename=%apsuite/apsim/tcllink/sample/Rotation Sample 2.log; kmlfilename=C:/development/apsim/tcllink/sample/Rotation Sample 2.kml
      rule Farm logic: condition process=doProcess; condition exit=closeLogging
        condition init:
          # Manager initialisation - set up a farm manager interpreter
          ############### INITIAL CONDITIONS
          set paddocks [list Paddock1 Paddock2 Paddock3]

          ########### Support procedures
          # return true if today's date is within 2 points.
          proc dateWithin {t0 t1} {
             set t [apsimGet day]
             if {$t0 > $t1} {
                return [expr $t >= $t0 || $t <= $t1]
             } else {
                return [expr $t >= $t0 && $t <= $t1]
             }
             # notreached
          }

          proc dateIs {t0} {
             set t [apsimGet day]
             return [expr $t0 == $t]
          }

          # Return the fraction of the whole farm planted under a crop
          proc areaPlanted {what} {
             global paddocks
             set sum 0.0; set total 0.0
             foreach paddock $paddocks {
                set paddockState [interp eval $paddock currentState]
                set area [interp eval $paddock set area]
                if {$paddockState == $what} {
                  set sum [expr $sum + $area]
                }
                set total [expr $total + $area]
             }
             return [expr $sum/$total ]
          }

          # "logfile" is used to generate the rugplots of farm activities
          set logFile {}
          proc setupLogging {logFileName} {
             global logFile paddocks
             set logFile [open $logFileName w]
             puts $logFile "Starting [apsimGet day],[apsimGet year]"
             puts $logFile "paddocks = $paddocks"
             foreach {state colour} [interp eval [lindex $paddocks 0] array get colour] {
                puts $logFile "colour $state $colour"
             }
             flush $logFile
             apsimWriteToSummaryFile "initialised logging:paddocks=$paddocks"
          }
          proc closeLogging {} {
             global logFile date
             puts $logFile "Finished $date"
             close $logFile
          }
          proc log {msg} {
             global logFile
             puts $logFile $msg
             flush $logFile
          }
          proc logPaddock {paddock msg} {
             global logFile
             puts $logFile "   $paddock,$msg"
             flush $logFile
          }
          proc logState {paddock state} {
             global logFile
             puts $logFile "changeState $paddock $state"
             flush $logFile
          }

          # Set up alias procedures within paddocks.
          proc setup {} {
             global paddocks
             foreach paddock $paddocks {
                $paddock alias log logPaddock $paddock
                $paddock alias logState logState $paddock
                $paddock alias reportEvent reportEvent $paddock
                $paddock alias apsimSendGlobalMessage apsimSendMessage
                $paddock alias apsimGlobalGet apsimGet
                $paddock alias areaPlanted areaPlanted
             }
          }

          # Do daily process at top level
          proc doProcess {} {
             global date paddocks

             set date "[apsimGet day],[apsimGet year]"
             log "$date"

             set more 1
             while {$more} {
                set more 0
                # 1. Find out what's possible
                set bestPaddock {}; set bestScore -1.0; set bestState {}
                foreach paddock $paddocks {
                   foreach {target score} [interp eval $paddock checkRules] {break}
                   if {$score > $bestScore} {
                      set bestPaddock $paddock; set bestScore $score; set bestTarget $target
                   }
                }
                if {$bestScore > 0.0} {
                   log ">>> Changing state in $bestPaddock to $bestTarget<<<"
                   interp eval $bestPaddock changeState $bestTarget
                   set more 1
                }
             }
          }
        condition start_simulation:
          # NB. some funny business here. Delay opening report file until the 1st day of
          # simulation as it's hard to know how many paddocks are present at init2 time.

          setupLogging "Rotation Sample 2.log"

          setup

          foreach paddock $paddocks {
                interp eval $paddock setup
          }
        on init:
```
# Manager initialisation - set up a farm manager interpreter
############### INITIAL CONDITIONS
set paddocks [list Paddock1 Paddock2 Paddock3]

########### Support procedures
# return true if today's date is within 2 points.
proc dateWithin {t0 t1} {
   set t [apsimGet day]
   if {$t0 > $t1} {
      return [expr $t >= $t0 || $t <= $t1]
   } else {
      return [expr $t >= $t0 && $t <= $t1]
   }
   # notreached
}

proc dateIs {t0} {
   set t [apsimGet day]
   return [expr $t0 == $t]
}

# Return the fraction of the whole farm planted under a crop
proc areaPlanted {what} {
   global paddocks
   set sum 0.0; set total 0.0
   foreach paddock $paddocks {
      set paddockState [interp eval $paddock currentState]
      set area [interp eval $paddock set area]
      if {$paddockState == $what} {
        set sum [expr $sum + $area]
      }
      set total [expr $total + $area]
   }
   return [expr $sum/$total ]
}

# "logfile" is used to generate the rugplots of farm activities
set logFile {}
proc setupLogging {logFileName} {
   global logFile paddocks
   set logFile [open $logFileName w]
   puts $logFile "Starting [apsimGet day],[apsimGet year]"
   puts $logFile "paddocks = $paddocks"
   foreach {state colour} [interp eval [lindex $paddocks 0] array get colour] {
      puts $logFile "colour $state $colour"
   }
   flush $logFile
   apsimWriteToSummaryFile "initialised logging:paddocks=$paddocks"
}
proc closeLogging {} {
   global logFile date
   puts $logFile "Finished $date"
   close $logFile
}
proc log {msg} {
   global logFile
   puts $logFile $msg
   flush $logFile
}
proc logPaddock {paddock msg} {
   global logFile
   puts $logFile "   $paddock,$msg"
   flush $logFile
}
proc logState {paddock state} {
   global logFile
   puts $logFile "changeState $paddock $state"
   flush $logFile
}

# Set up alias procedures within paddocks.
proc setup {} {
   global paddocks
   foreach paddock $paddocks {
      $paddock alias log logPaddock $paddock
      $paddock alias logState logState $paddock
      $paddock alias reportEvent reportEvent $paddock
      $paddock alias apsimSendGlobalMessage apsimSendMessage
      $paddock alias apsimGlobalGet apsimGet
      $paddock alias areaPlanted areaPlanted
   }
}

# Do daily process at top level
proc doProcess {} {
   global date paddocks 

   set date "[apsimGet day],[apsimGet year]"
   log "$date"

   set more 1
   while {$more} {
      set more 0
      # 1. Find out what's possible
      set bestPaddock {}; set bestScore -1.0; set bestState {}
      foreach paddock $paddocks {
         foreach {target score} [interp eval $paddock checkRules] {break}
         if {$score > $bestScore} {
            set bestPaddock $paddock; set bestScore $score; set bestTarget $target
         }
      }
      if {$bestScore > 0.0} {
         log ">>> Changing state in $bestPaddock to $bestTarget<<<"
         interp eval $bestPaddock changeState $bestTarget
         set more 1
      }
   }
}
```
        on start_simulation:
```
# NB. some funny business here. Delay opening report file until the 1st day of
# simulation as it's hard to know how many paddocks are present at init2 time.

setupLogging "Rotation Sample 2.log"

setup

foreach paddock $paddocks {
      interp eval $paddock setup
}
```
        on process:
```
doProcess
```
        on exit:
```
closeLogging
```
    area Paddock1
      registrations global
      paddockmanager Paddock1
        tclui Rotation Management -> /Simulations/shared/Rotation Management
        tclui Wheat Sowing Rule -> /Simulations/shared/Wheat Sowing Rule
        tclui Cotton Sowing Rule -> /Simulations/shared/Cotton Sowing Rule
        tclui Chickpea Sowing Rule -> /Simulations/shared/Chickpea Sowing Rule
        rule Rotation Initialisation: condition exit=exit
          condition init:
            ############### INITIAL CONDITIONS
            set state "F1"
            set area  250.0

            ############### Support procedures
            # Return the current state of the system
            proc currentState {} {
               global state
               return $state
            }

            ############### The decision routine.
            # Return the score for planting "what"
            proc checkRules {} {
              log "State is [currentState]. (esw=[format %.0f [apsimGet esw]])"

              set bestScore -1.0; set bestTarget {}
              foreach arc [stateGraph arcs -out [currentState]] {
                 set expr {}
                 set target [stateGraph arc target $arc]
                 foreach rule [stateGraph arc get $arc rules] {
                    set value [uplevel #0 expr $rule]
                    log "target=$target,rule=$rule, value=$value"
                    lappend expr $value
                 }
                 set score [expr [join $expr "*"]]
                 if {$score > $bestScore} {
                    set bestScore $score
                    set bestTarget $target
                 }
              }
              return [list $bestTarget $bestScore]
            }

            # Change state to another
            proc changeState {newState} {
               global state
               set arcs {}
               foreach arc [stateGraph arcs -out [currentState]] {
                  if {[stateGraph arc target $arc] == "$newState" } {
                     lappend arcs $arc
                  }
              }

               if {[llength $arcs] == 0} {error "No paths from [currentState] to $newState!"}
               if {[llength $arcs] > 1} {
                  # More than 1 path - evaluate best option
                  set bestScore -1.0; set bestArc {}
                  foreach arc $arcs {
                     set expr {}
                     foreach rule [stateGraph arc get $arc rules] {
                        set value [uplevel #0 expr $rule]
                        lappend expr $value
                     }
                     set score [expr [join $expr "*"]]
                     if {$score > $bestScore} {
                        set bestScore $score
                        set bestArc $arc
                     }
                  }
                  if {$bestScore > 0.0} {
                     set arc $bestArc
                  } else {
                     error "No viable paths from [currentState] to $newState! (candidates are $arcs)"
                  }
               } else {
                  # Only 1 path - take it.
                  set arc $arcs
               }
               foreach action [stateGraph arc get $arc actions] { uplevel #0 $action }
               set state $newState
               logState $newState
            }

            proc setup {} {
                #Nothing yet..
            }

            # Apsimish utilities
            proc pawc {} {
              set sw [apsimGet sw_dep]
              set ll [apsimGet ll15_dep]
              set pawc 0.0
              for {set i 0} {$i < [llength $sw]} {incr i} {
                  set pawc [expr $pawc + ([lindex $sw $i] - [lindex $ll $i])]
              }
              return $pawc
            }

            proc fesw {layer} {
              set dul [lindex [apsimGet dul_dep] [expr $layer-1]]
              set sw  [lindex [apsimGet sw_dep] [expr $layer-1]]
              set ll  [lindex [apsimGet ll15_dep] [expr $layer-1]]
              set fesw [expr ($sw - $ll)/($dul - $ll)]
              return $fesw
            }
          on init:
```
############### INITIAL CONDITIONS
set state "F1"
set area  250.0

############### Support procedures
# Return the current state of the system
proc currentState {} {
   global state
   return $state
}

############### The decision routine.
# Return the score for planting "what"
proc checkRules {} {
  log "State is [currentState]. (esw=[format %.0f [apsimGet esw]])"

  set bestScore -1.0; set bestTarget {}
  foreach arc [stateGraph arcs -out [currentState]] {
     set expr {}
     set target [stateGraph arc target $arc]
     foreach rule [stateGraph arc get $arc rules] {
        set value [uplevel #0 expr $rule]
        log "target=$target,rule=$rule, value=$value"
        lappend expr $value
     }
     set score [expr [join $expr "*"]]
     if {$score > $bestScore} {
        set bestScore $score
        set bestTarget $target
     }
  }
  return [list $bestTarget $bestScore]
}

# Change state to another
proc changeState {newState} {
   global state
   set arcs {}
   foreach arc [stateGraph arcs -out [currentState]] {
      if {[stateGraph arc target $arc] == "$newState" } {
         lappend arcs $arc
      }
  }  
   
   if {[llength $arcs] == 0} {error "No paths from [currentState] to $newState!"}
   if {[llength $arcs] > 1} {
      # More than 1 path - evaluate best option
      set bestScore -1.0; set bestArc {}
      foreach arc $arcs {
         set expr {}
         foreach rule [stateGraph arc get $arc rules] {
            set value [uplevel #0 expr $rule]
            lappend expr $value
         }
         set score [expr [join $expr "*"]]
         if {$score > $bestScore} {
            set bestScore $score
            set bestArc $arc
         }
      }  
      if {$bestScore > 0.0} {
         set arc $bestArc
      } else {
         error "No viable paths from [currentState] to $newState! (candidates are $arcs)"
      }
   } else {
      # Only 1 path - take it.
      set arc $arcs
   }
   foreach action [stateGraph arc get $arc actions] { uplevel #0 $action }
   set state $newState
   logState $newState
}

proc setup {} { 
    #Nothing yet..
}

# Apsimish utilities
proc pawc {} {
  set sw [apsimGet sw_dep]
  set ll [apsimGet ll15_dep]
  set pawc 0.0
  for {set i 0} {$i < [llength $sw]} {incr i} {
      set pawc [expr $pawc + ([lindex $sw $i] - [lindex $ll $i])]
  }
  return $pawc
}

proc fesw {layer} {
  set dul [lindex [apsimGet dul_dep] [expr $layer-1]]
  set sw  [lindex [apsimGet sw_dep] [expr $layer-1]]
  set ll  [lindex [apsimGet ll15_dep] [expr $layer-1]]
  set fesw [expr ($sw - $ll)/($dul - $ll)]
  return $fesw
}
```
          on exit:
```
exit
```
      wheat
      chickpea
      cotton
      fertiliser
      soil #009 - Kupunn: same as Sample Rotation 1.Paddock.#009 - Kupunn
    area Paddock2
      registrations global
      paddockmanager Paddock2
        tclui Rotation Management -> /Simulations/shared/Rotation Management
        tclui Wheat Sowing Rule -> /Simulations/shared/Wheat Sowing Rule
        tclui Cotton Sowing Rule -> /Simulations/shared/Cotton Sowing Rule
        tclui Chickpea Sowing Rule -> /Simulations/shared/Chickpea Sowing Rule
        rule Rotation Initialisation: condition exit=exit
          condition init:
            ############### INITIAL CONDITIONS
            set state "WinterFallow"
            set area  250.0

            ############### Support procedures
            # Return the current state of the system
            proc currentState {} {
               global state
               return $state
            }

            ############### The decision routine.
            # Return the score for planting "what"
            proc checkRules {} {
              log "State is [currentState]. (esw=[format %.0f [apsimGet esw]])"

              set bestScore -1.0; set bestTarget {}
              foreach arc [stateGraph arcs -out [currentState]] {
                 set expr {}
                 set target [stateGraph arc target $arc]
                 foreach rule [stateGraph arc get $arc rules] {
                    set value [uplevel #0 expr $rule]
                    log "target=$target,rule=$rule, value=$value"
                    lappend expr $value
                 }
                 set score [expr [join $expr "*"]]
                 if {$score > $bestScore} {
                    set bestScore $score
                    set bestTarget $target
                 }
              }
              return [list $bestTarget $bestScore]
            }

            # Change state to another
            proc changeState {newState} {
               global state
               set arcs {}
               foreach arc [stateGraph arcs -out [currentState]] {
                  if {[stateGraph arc target $arc] == "$newState" } {
                     lappend arcs $arc
                  }
              }

               if {[llength $arcs] == 0} {error "No paths from [currentState] to $newState!"}
               if {[llength $arcs] > 1} {
                  # More than 1 path - evaluate best option
                  set bestScore -1.0; set bestArc {}
                  foreach arc $arcs {
                     set expr {}
                     foreach rule [stateGraph arc get $arc rules] {
                        set value [uplevel #0 expr $rule]
                        lappend expr $value
                     }
                     set score [expr [join $expr "*"]]
                     if {$score > $bestScore} {
                        set bestScore $score
                        set bestArc $arc
                     }
                  }
                  if {$bestScore > 0.0} {
                     set arc $bestArc
                  } else {
                     error "No viable paths from [currentState] to $newState! (candidates are $arcs)"
                  }
               } else {
                  # Only 1 path - take it.
                  set arc $arcs
               }
               foreach action [stateGraph arc get $arc actions] { uplevel #0 $action }
               set state $newState
               logState $newState
            }

            proc setup {} {
                #Nothing yet..
            }

            # Apsimish utilities
            proc pawc {} {
              set sw [apsimGet sw_dep]
              set ll [apsimGet ll15_dep]
              set pawc 0.0
              for {set i 0} {$i < [llength $sw]} {incr i} {
                  set pawc [expr $pawc + ([lindex $sw $i] - [lindex $ll $i])]
              }
              return $pawc
            }

            proc fesw {layer} {
              set dul [lindex [apsimGet dul_dep] [expr $layer-1]]
              set sw  [lindex [apsimGet sw_dep] [expr $layer-1]]
              set ll  [lindex [apsimGet ll15_dep] [expr $layer-1]]
              set fesw [expr ($sw - $ll)/($dul - $ll)]
              return $fesw
            }
          on init:
```
############### INITIAL CONDITIONS
set state "WinterFallow"
set area  250.0

############### Support procedures
# Return the current state of the system
proc currentState {} {
   global state
   return $state
}

############### The decision routine.
# Return the score for planting "what"
proc checkRules {} {
  log "State is [currentState]. (esw=[format %.0f [apsimGet esw]])"

  set bestScore -1.0; set bestTarget {}
  foreach arc [stateGraph arcs -out [currentState]] {
     set expr {}
     set target [stateGraph arc target $arc]
     foreach rule [stateGraph arc get $arc rules] {
        set value [uplevel #0 expr $rule]
        log "target=$target,rule=$rule, value=$value"
        lappend expr $value
     }
     set score [expr [join $expr "*"]]
     if {$score > $bestScore} {
        set bestScore $score
        set bestTarget $target
     }
  }
  return [list $bestTarget $bestScore]
}

# Change state to another
proc changeState {newState} {
   global state
   set arcs {}
   foreach arc [stateGraph arcs -out [currentState]] {
      if {[stateGraph arc target $arc] == "$newState" } {
         lappend arcs $arc
      }
  }  
   
   if {[llength $arcs] == 0} {error "No paths from [currentState] to $newState!"}
   if {[llength $arcs] > 1} {
      # More than 1 path - evaluate best option
      set bestScore -1.0; set bestArc {}
      foreach arc $arcs {
         set expr {}
         foreach rule [stateGraph arc get $arc rules] {
            set value [uplevel #0 expr $rule]
            lappend expr $value
         }
         set score [expr [join $expr "*"]]
         if {$score > $bestScore} {
            set bestScore $score
            set bestArc $arc
         }
      }  
      if {$bestScore > 0.0} {
         set arc $bestArc
      } else {
         error "No viable paths from [currentState] to $newState! (candidates are $arcs)"
      }
   } else {
      # Only 1 path - take it.
      set arc $arcs
   }
   foreach action [stateGraph arc get $arc actions] { uplevel #0 $action }
   set state $newState
   logState $newState
}

proc setup {} { 
    #Nothing yet..
}

# Apsimish utilities
proc pawc {} {
  set sw [apsimGet sw_dep]
  set ll [apsimGet ll15_dep]
  set pawc 0.0
  for {set i 0} {$i < [llength $sw]} {incr i} {
      set pawc [expr $pawc + ([lindex $sw $i] - [lindex $ll $i])]
  }
  return $pawc
}

proc fesw {layer} {
  set dul [lindex [apsimGet dul_dep] [expr $layer-1]]
  set sw  [lindex [apsimGet sw_dep] [expr $layer-1]]
  set ll  [lindex [apsimGet ll15_dep] [expr $layer-1]]
  set fesw [expr ($sw - $ll)/($dul - $ll)]
  return $fesw
}
```
          on exit:
```
exit
```
      wheat
      chickpea
      cotton
      fertiliser
      soil #009 - Kupunn: same as Sample Rotation 1.Paddock.#009 - Kupunn
    area Paddock3
      registrations global
      paddockmanager Paddock3: same as Sample Rotation 2.Paddock2.Paddock2
      wheat
      chickpea
      cotton
      fertiliser
      soil #009 - Kupunn (162mm): Site=Kupunn; Region=South East Queensland; LocalName=Brigalow; SoilType=Grey Vertosol; NearestTown=Dalby, Q 4405; NaturalVegetation=Brigalow, belah, wilga; Cona=3.5; DiffusConst=40; DiffusSlope=16; U=6; Salb=0.13; Cn2Bare=73; CnRed=20; CnCov=0.8; CnCanopyFact=1; RootCn=40; RootWt=200; SoilCn=12.5; EnrACoeff=7.4; EnrBCoeff=0.2; Comment=oc and ph not measured
        profile
          layer:
            thickness  bd    ll15  airdry  dul   sat   sw       swcon  fbiom  finert  no3  nh4  oc    ph  ll Chickpea  kl Chickpea  xf Chickpea  ll Cotton  kl Cotton  xf Cotton  ll Sorghum  kl Sorghum  xf Sorghum  ll Wheat  kl Wheat  xf Wheat
            150        1.4   0.21  0.105   0.39  0.44  9999.99  0.3    0.03   0.4     6.5  0.6  1.24  7   0.25         0.1          1            0.25       0.1        1          0.25        0.1         1           0.21      0.1       1
            150        1.39  0.21  0.189   0.39  0.44  9999.99  0.3    0.02   0.6     2.1  0.1  1.24  7   0.25         0.1          1            0.25       0.1        1          0.25        0.1         1           0.21      0.1       1
            300        1.37  0.22  0.22    0.4   0.45  9999.99  0.3    0.01   0.8     2.1  0.1  1.25  7   0.29         0.08         1            0.29       0.1        1          0.29        0.1         1           0.25      0.08      1
            300        1.36  0.25  0.25    0.41  0.46  9999.99  0.3    0.01   0.9     1.7  0.1  1.1   7   0.29         0.06         1            0.29       0.1        1          0.29        0.08        1           0.28      0.06      1
            300        1.38  0.27  0.27    0.4   0.45  9999.99  0.3    0.01   0.95    1.7  0.1  0.71  7   0.3          0.04         1            0.3        0.09       1          0.3         0.06        1           0.31      0.04      1
            300        1.39  0.31  0.31    0.39  0.44  9999.99  0.3    0.01   0.95    1.7  0.1  0.34  7   0.34         0.02         1            0.34       0.07       1          0.34        0.04        1           0.37      0.02      1
            300        1.42  0.36  0.36    0.38  0.43  9999.99  0.3    0.01   0.95    1.7  0.1  0.26  7   0.36         0.01         1            0.36       0.05       1          0.36        0.02        1           0.38      0.01      1
        InitWater
          percentmethod: percent=1; distributed=filled from top
        InitNitrogen: same as Sample Rotation 1.Paddock.#009 - Kupunn.InitNitrogen
  folder shared
    tclui Rotation Management: uiscript=source $apsuite/apsim/tcllink/lib/RotationsUI.tcl
      node Chickpea: desc=Chickpea
      node SummerFallow2: desc=New state
      node Wheat: desc=Wheat Crop
      node WinterFallow: desc=New state
      node Cotton: desc=A Cotton Crop
      node F1: desc=New state
      node SummerFallow1: desc=New state
      arc arc6: source=WinterFallow; target=Cotton; actions=sow_cotton; rules=[[canPlant_cotton], [areaPlanted Cotton] < 0.66]
      arc arc2: source=SummerFallow1; target=WinterFallow; rules=[apsimGet day]  == 192
      arc arc7: source=F1; target=SummerFallow1; rules=[apsimGet day]  == 192
      arc arc3: source=Wheat; target=SummerFallow2
        actions=[apsimSendMessage wheat harvest, apsimSendMessage wheat end_crop]
        rules={[apsimGet wheat.stagename] == "harvest_ripe" || [apsimGet wheat.plant_status] == "dead"}
      arc arc8: source=Chickpea; target=SummerFallow1
        actions=[apsimSendMessage chickpea harvest, apsimSendMessage chickpea end_crop]
        rules={[apsimGet chickpea.stagename] == "harvest_ripe" || [apsimGet chickpea.plant_status] == "dead"}
      arc arc0: source=F1; target=Chickpea; actions=sow_chickpea; rules=[canPlant_chickpea]
      arc arc9: source=SummerFallow2; target=WinterFallow; rules=[apsimGet day]  == 74
      arc arc5: source=Cotton; target=F1; actions=apsimSendMessage cotton harvest; rules=[apsimGet ozcot_status] > 0
      arc arc1: source=SummerFallow1; target=Wheat; actions=sow_wheat; rules=[canPlant_wheat]
      rule Init rule
        on init:
```
package require struct
::struct::graph stateGraph
stateGraph node insert "Chickpea"
set colour(Chickpea) "lightgreen"
stateGraph node insert "SummerFallow2"
set colour(SummerFallow2) "gray"
stateGraph node insert "Wheat"
set colour(Wheat) "darkgreen"
stateGraph node insert "WinterFallow"
set colour(WinterFallow) "gray"
stateGraph node insert "Cotton"
set colour(Cotton) "purple"
stateGraph node insert "F1"
set colour(F1) "gray"
stateGraph node insert "SummerFallow1"
set colour(SummerFallow1) "maroon"
stateGraph arc insert "WinterFallow" "Cotton" "arc6"
stateGraph arc lappend "arc6" actions {sow_cotton}
stateGraph arc lappend "arc6" rules {[canPlant_cotton]}
stateGraph arc lappend "arc6" rules {[areaPlanted Cotton] < 0.66}
stateGraph arc lappend "arc6" actions {}
stateGraph arc insert "SummerFallow1" "WinterFallow" "arc2"
stateGraph arc lappend "arc2" rules {[apsimGet day]  == 192}
stateGraph arc lappend "arc2" actions {}
stateGraph arc insert "F1" "SummerFallow1" "arc7"
stateGraph arc lappend "arc7" rules {[apsimGet day]  == 192}
stateGraph arc lappend "arc7" actions {}
stateGraph arc insert "Wheat" "SummerFallow2" "arc3"
stateGraph arc lappend "arc3" actions {apsimSendMessage wheat harvest}
stateGraph arc lappend "arc3" actions {apsimSendMessage wheat end_crop}
stateGraph arc lappend "arc3" rules {{[apsimGet wheat.stagename] == "harvest_ripe" || [apsimGet wheat.plant_status] == "dead"}}
stateGraph arc lappend "arc3" actions {}
stateGraph arc insert "Chickpea" "SummerFallow1" "arc8"
stateGraph arc lappend "arc8" actions {apsimSendMessage chickpea harvest}
stateGraph arc lappend "arc8" actions {apsimSendMessage chickpea end_crop}
stateGraph arc lappend "arc8" rules {{[apsimGet chickpea.stagename] == "harvest_ripe" || [apsimGet chickpea.plant_status] == "dead"}}
stateGraph arc lappend "arc8" actions {}
stateGraph arc insert "F1" "Chickpea" "arc0"
stateGraph arc lappend "arc0" actions {sow_chickpea}
stateGraph arc lappend "arc0" rules {[canPlant_chickpea]}
stateGraph arc lappend "arc0" actions {}
stateGraph arc insert "SummerFallow2" "WinterFallow" "arc9"
stateGraph arc lappend "arc9" rules {[apsimGet day]  == 74}
stateGraph arc lappend "arc9" actions {}
stateGraph arc insert "Cotton" "F1" "arc5"
stateGraph arc lappend "arc5" actions {apsimSendMessage cotton harvest}
stateGraph arc lappend "arc5" rules {[apsimGet ozcot_status] > 0}
stateGraph arc lappend "arc5" actions {}
stateGraph arc insert "SummerFallow1" "Wheat" "arc1"
stateGraph arc lappend "arc1" actions {sow_wheat}
stateGraph arc lappend "arc1" rules {[canPlant_wheat]}
stateGraph arc lappend "arc1" actions {}
```
    tclui Wheat Sowing Rule: uiscript=source $apsuite/apsim/tcllink/lib/GenericSowingUI.tcl; crop=wheat; criteria=variable; date1=15-may; date2=10-jul; raincrit=25; rainnumdays=3; esw_amount=50; must_sow=no; plants=100; sowing_depth=30; row_spacing=25; skipplant=0; skiprow=0; cultivar=hartog; class=plant; module=plant
      ruletemplate Sowing rule - initialisation:
        # Support procedures
        # Can we plant a crop today?
        proc canPlant_[crop] {} {
          if {"[criteria]" == "variable"} {
             set year [apsimGet year]; set day [apsimGet day]
             set d1 [clock format [clock scan "[date1]-$year"] -format %j]
             set d2 [clock format [clock scan "[date2]-$year"] -format %j]

             if {"[must_sow]" == "yes" && $day == $d2} {return 1}

             if {$d1 > $d2} {
                set dateOK [expr $day >= $d1 || $day <= $d2]
             } else {
                set dateOK [expr $day >= $d1 && $day <= $d2]
             }
             set rainOK [expr [apsimGet rain\[[rainnumdays]\]] >= [raincrit]]
             set eswOK [expr [apsimGet esw] >= [esw_amount]]
             return [expr $dateOK && $rainOK && $eswOK]
          } elseif {"[criteria]" == "fixed"} {
             set year [apsimGet year]; set day [apsimGet day]
             set d1 [clock format [clock scan "[date1]-$year"] -format %j]
             return [expr $day == $d1]
          } else {
             error "Unknown sowing criteria \"[criteria]\"."
          }
          return "notreached"
        }

        # Plant a crop now
        proc sow_[crop] {} {
          if {"[module]" == "plant"} {
             apsimSendMessage [crop] sow {plants [plants]} {sowing_depth [sowing_depth]} \
                     {cultivar [cultivar]} {row_spacing [row_spacing]} \
                     {skipplant [skipplant]} {skiprow [skiprow]} {crop_class [class]}
          } elseif {"[module]" == "cropmod"} {
             apsimSendMessage [crop] sow {plants [density]} {sowing_depth [depth]} \
                     {cultivar [cultivar]} {row_spacing [row_spacing]} {skiprow [skiprow]}
          } elseif {"[module]" == "growth"} {
             apsimSendMessage [crop] ???
          } elseif {"[module]" == "ozcot"} {
             apsimSendMessage [crop] sow {plants_pm [plants_pm]} {sowing_depth [sowing_depth]} \
                     {row_spacing [row_spacing]} {skiprow [skiprow]} {cultivar [cultivar]}
          } elseif {"[module]" == "oryza"} {
             apsimSendMessage [crop] sow {cultivar [cultivar]}
          } elseif {"[module]" == "sorghum"} {
             apsimSendMessage [crop] sow {plants [plants]} {sowing_depth [sowing_depth]} \
                     {cultivar [cultivar]} {row_spacing [row_spacing]} {skiprow [skiprow]} \
                     {tiller_no_fertile [tiller_no_fertile]}
          } elseif {"[module]" == "sugar"} {
             apsimSendMessage [crop] sow {plants [plants]} {cultivar [cultivar]} {sowing_depth [sowing_depth]}
          } else {
            error "Unknown crop module \"[module]\"."
          }
        }
      rule Wheat Sowing Rule.out - Sowing rule - initialisation
        on init:
```
# Support procedures
# Can we plant a crop today?
proc canPlant_wheat {} {
  if {"variable" == "variable"} {
     set year [apsimGet year]; set day [apsimGet day]
     set d1 [clock format [clock scan "15-may-$year"] -format %j]
     set d2 [clock format [clock scan "10-jul-$year"] -format %j]

     if {"no" == "yes" && $day == $d2} {return 1}

     if {$d1 > $d2} {
        set dateOK [expr $day >= $d1 || $day <= $d2]
     } else {   
        set dateOK [expr $day >= $d1 && $day <= $d2]
     }
     set rainOK [expr [apsimGet rain\[3\]] >= 25]
     set eswOK [expr [apsimGet esw] >= 50]
     return [expr $dateOK && $rainOK && $eswOK]
  } elseif {"variable" == "fixed"} {
     set year [apsimGet year]; set day [apsimGet day]
     set d1 [clock format [clock scan "15-may-$year"] -format %j]
     return [expr $day == $d1]
  } else {
     error "Unknown sowing criteria \"variable\"."
  }
  return "notreached"
}

# Plant a crop now
proc sow_wheat {} {
  if {"plant" == "plant"} {
     apsimSendMessage wheat sow {plants 100} {sowing_depth 30} \
             {cultivar hartog} {row_spacing 25} \
             {skipplant 0} {skiprow 0} {crop_class plant} 
  } elseif {"plant" == "cropmod"} {
     apsimSendMessage wheat sow {plants [density]} {sowing_depth [depth]} \
             {cultivar hartog} {row_spacing 25} {skiprow 0} 
  } elseif {"plant" == "growth"} {
     apsimSendMessage wheat ???
  } elseif {"plant" == "ozcot"} {
     apsimSendMessage wheat sow {plants_pm [plants_pm]} {sowing_depth 30} \
             {row_spacing 25} {skiprow 0} {cultivar hartog}
  } elseif {"plant" == "oryza"} {
     apsimSendMessage wheat sow {cultivar hartog} 
  } elseif {"plant" == "sorghum"} {
     apsimSendMessage wheat sow {plants 100} {sowing_depth 30} \
             {cultivar hartog} {row_spacing 25} {skiprow 0} \
             {tiller_no_fertile [tiller_no_fertile]}
  } elseif {"plant" == "sugar"} {
     apsimSendMessage wheat sow {plants 100} {cultivar hartog} {sowing_depth 30}
  } else {
    error "Unknown crop module \"plant\"."
  }
}
```
    tclui Cotton Sowing Rule: uiscript=source $apsuite/apsim/tcllink/lib/GenericSowingUI.tcl; crop=cotton; criteria=variable; date1=15-oct; date2=15-dec; raincrit=10; rainnumdays=3; esw_amount=100; must_sow=yes; plants_pm=10; sowing_depth=30; row_spacing=1000; skiprow=0; cultivar=Siok; module=ozcot; plants=100; skipplant=0; class=plant
      ruletemplate Sowing rule - initialisation:
        # Support procedures
        # Can we plant a crop today?
        proc canPlant_[crop] {} {
          if {"[criteria]" == "variable"} {
             set year [apsimGet year]; set day [apsimGet day]
             set d1 [clock format [clock scan "[date1]-$year"] -format %j]
             set d2 [clock format [clock scan "[date2]-$year"] -format %j]

             if {"[must_sow]" == "yes" && $day == $d2} {return 1}

             if {$d1 > $d2} {
                set dateOK [expr $day >= $d1 || $day <= $d2]
             } else {
                set dateOK [expr $day >= $d1 && $day <= $d2]
             }
             set rainOK [expr [apsimGet rain\[[rainnumdays]\]] >= [raincrit]]
             set eswOK [expr [apsimGet esw] >= [esw_amount]]
             return [expr $dateOK && $rainOK && $eswOK]
          } elseif {"[criteria]" == "fixed"} {
             set year [apsimGet year]; set day [apsimGet day]
             set d1 [clock format [clock scan "[date1]-$year"] -format %j]
             return [expr $day == $d1]
          } else {
             error "Unknown sowing criteria \"[criteria]\"."
          }
          return "notreached"
        }

        # Plant a crop now
        proc sow_[crop] {} {
          if {"[module]" == "plant"} {
             apsimSendMessage [crop] sow {plants [plants]} {sowing_depth [sowing_depth]} \
                     {cultivar [cultivar]} {row_spacing [row_spacing]} \
                     {skipplant [skipplant]} {skiprow [skiprow]} {crop_class [class]}
          } elseif {"[module]" == "cropmod"} {
             apsimSendMessage [crop] sow {plants [density]} {sowing_depth [depth]} \
                     {cultivar [cultivar]} {row_spacing [row_spacing]} {skiprow [skiprow]}
          } elseif {"[module]" == "growth"} {
             apsimSendMessage [crop] ???
          } elseif {"[module]" == "ozcot"} {
             apsimSendMessage [crop] sow {plants_pm [plants_pm]} {sowing_depth [sowing_depth]} \
                     {row_spacing [row_spacing]} {skiprow [skiprow]} {cultivar [cultivar]}
          } elseif {"[module]" == "oryza"} {
             apsimSendMessage [crop] sow {cultivar [cultivar]}
          } elseif {"[module]" == "sorghum"} {
             apsimSendMessage [crop] sow {plants [plants]} {sowing_depth [sowing_depth]} \
                     {cultivar [cultivar]} {row_spacing [row_spacing]} {skiprow [skiprow]} \
                     {tiller_no_fertile [tiller_no_fertile]}
          } elseif {"[module]" == "sugar"} {
             apsimSendMessage [crop] sow {plants [plants]} {cultivar [cultivar]} {sowing_depth [sowing_depth]}
          } else {
            error "Unknown crop module \"[module]\"."
          }
        }
      rule Cotton Sowing Rule.out - Sowing rule - initialisation: same as Sample Rotation 1.Paddock.Manager.Cotton Sowing Rule.Sample Rotation 1 Cotton Sowing Rule.out - Sowing rule - initialisation
    tclui Chickpea Sowing Rule: uiscript=source $apsuite/apsim/tcllink/lib/GenericSowingUI.tcl; crop=chickpea; criteria=variable; date1=15-may; date2=10-jul; raincrit=15; rainnumdays=3; esw_amount=100; must_sow=no; plants=25; sowing_depth=30; row_spacing=25; skipplant=0; skiprow=0; cultivar=amethyst; class=plant; module=plant
      ruletemplate Sowing rule - initialisation:
        # Support procedures
        # Can we plant a crop today?
        proc canPlant_[crop] {} {
          if {"[criteria]" == "variable"} {
             set year [apsimGet year]; set day [apsimGet day]
             set d1 [clock format [clock scan "[date1]-$year"] -format %j]
             set d2 [clock format [clock scan "[date2]-$year"] -format %j]

             if {"[must_sow]" == "yes" && $day == $d2} {return 1}

             if {$d1 > $d2} {
                set dateOK [expr $day >= $d1 || $day <= $d2]
             } else {
                set dateOK [expr $day >= $d1 && $day <= $d2]
             }
             set rainOK [expr [apsimGet rain\[[rainnumdays]\]] >= [raincrit]]
             set eswOK [expr [apsimGet esw] >= [esw_amount]]
             return [expr $dateOK && $rainOK && $eswOK]
          } elseif {"[criteria]" == "fixed"} {
             set year [apsimGet year]; set day [apsimGet day]
             set d1 [clock format [clock scan "[date1]-$year"] -format %j]
             return [expr $day == $d1]
          } else {
             error "Unknown sowing criteria \"[criteria]\"."
          }
          return "notreached"
        }

        # Plant a crop now
        proc sow_[crop] {} {
          if {"[module]" == "plant"} {
             apsimSendMessage [crop] sow {plants [plants]} {sowing_depth [sowing_depth]} \
                     {cultivar [cultivar]} {row_spacing [row_spacing]} \
                     {skipplant [skipplant]} {skiprow [skiprow]} {crop_class [class]}
          } elseif {"[module]" == "cropmod"} {
             apsimSendMessage [crop] sow {plants [density]} {sowing_depth [depth]} \
                     {cultivar [cultivar]} {row_spacing [row_spacing]} {skiprow [skiprow]}
          } elseif {"[module]" == "growth"} {
             apsimSendMessage [crop] ???
          } elseif {"[module]" == "ozcot"} {
             apsimSendMessage [crop] sow {plants_pm [plants_pm]} {sowing_depth [sowing_depth]} \
                     {row_spacing [row_spacing]} {skiprow [skiprow]} {cultivar [cultivar]}
          } elseif {"[module]" == "oryza"} {
             apsimSendMessage [crop] sow {cultivar [cultivar]}
          } elseif {"[module]" == "sorghum"} {
             apsimSendMessage [crop] sow {plants [plants]} {sowing_depth [sowing_depth]} \
                     {cultivar [cultivar]} {row_spacing [row_spacing]} {skiprow [skiprow]} \
                     {tiller_no_fertile [tiller_no_fertile]}
          } elseif {"[module]" == "sugar"} {
             apsimSendMessage [crop] sow {plants [plants]} {cultivar [cultivar]} {sowing_depth [sowing_depth]}
          } else {
            error "Unknown crop module \"[module]\"."
          }
        }
      rule Chickpea Sowing Rule.out - Sowing rule - initialisation
        on init:
```
# Support procedures
# Can we plant a crop today?
proc canPlant_chickpea {} {
  if {"variable" == "variable"} {
     set year [apsimGet year]; set day [apsimGet day]
     set d1 [clock format [clock scan "15-may-$year"] -format %j]
     set d2 [clock format [clock scan "10-jul-$year"] -format %j]

     if {"no" == "yes" && $day == $d2} {return 1}

     if {$d1 > $d2} {
        set dateOK [expr $day >= $d1 || $day <= $d2]
     } else {   
        set dateOK [expr $day >= $d1 && $day <= $d2]
     }
     set rainOK [expr [apsimGet rain\[3\]] >= 15]
     set eswOK [expr [apsimGet esw] >= 100]
     return [expr $dateOK && $rainOK && $eswOK]
  } elseif {"variable" == "fixed"} {
     set year [apsimGet year]; set day [apsimGet day]
     set d1 [clock format [clock scan "15-may-$year"] -format %j]
     return [expr $day == $d1]
  } else {
     error "Unknown sowing criteria \"variable\"."
  }
  return "notreached"
}

# Plant a crop now
proc sow_chickpea {} {
  if {"plant" == "plant"} {
     apsimSendMessage chickpea sow {plants 25} {sowing_depth 30} \
             {cultivar amethyst} {row_spacing 25} \
             {skipplant 0} {skiprow 0} {crop_class plant} 
  } elseif {"plant" == "cropmod"} {
     apsimSendMessage chickpea sow {plants [density]} {sowing_depth [depth]} \
             {cultivar amethyst} {row_spacing 25} {skiprow 0} 
  } elseif {"plant" == "growth"} {
     apsimSendMessage chickpea ???
  } elseif {"plant" == "ozcot"} {
     apsimSendMessage chickpea sow {plants_pm } {sowing_depth 30} \
             {row_spacing 25} {skiprow 0} {cultivar amethyst}
  } elseif {"plant" == "oryza"} {
     apsimSendMessage chickpea sow {cultivar amethyst} 
  } elseif {"plant" == "sorghum"} {
     apsimSendMessage chickpea sow {plants 25} {sowing_depth 30} \
             {cultivar amethyst} {row_spacing 25} {skiprow 0} \
             {tiller_no_fertile [tiller_no_fertile]}
  } elseif {"plant" == "sugar"} {
     apsimSendMessage chickpea sow {plants 25} {cultivar amethyst} {sowing_depth 30}
  } else {
    error "Unknown crop module \"plant\"."
  }
}
```
